# OpenSim document version 20302
CMCTool arm26:
  model_file: arm26.osim
  replace_force_set: false
  force_set_files: arm26_Reserve_Actuators.xml
  results_directory: Results
  output_precision: 20
  initial_time: 0
  final_time: 0.07
  solve_for_equilibrium_for_auxiliary_states: true
  maximum_number_of_integrator_steps: 30000
  maximum_integrator_step_size: 0.0001
  minimum_integrator_step_size: 0.00000001
  integrator_error_tolerance: 0.000005
  desired_kinematics_file: arm26_InverseKinematics.mot
  task_set_file: arm26_ComputedMuscleControl_Tasks.xml
  constraints_file: arm26_ComputedMuscleControl_ControlConstraints.xml
  lowpass_cutoff_frequency: 6
  cmc_time_window: 0.01
  use_curvature_filter: false
  use_fast_optimization_target: false
  optimizer_algorithm: ipopt
  optimizer_derivative_dx: 1
  optimizer_convergence_criterion: 0.1
  optimizer_max_iterations: 2000
  optimizer_print_level: 0
  use_verbose_printing: false
  AnalysisSet Analyses:
    Kinematics: start_time=-infinity end_time=infinity step_interval=10 in_degrees=true coordinates=all
    Actuation: start_time=-infinity end_time=infinity step_interval=10 in_degrees=true
