# OpenSim document version 20302
IKTaskSet arm26_InverseKinematics:
  IKMarkerTask r_acromion: apply=true weight=1
  IKMarkerTask r_humerus_epicondyle: apply=true weight=1
  IKMarkerTask r_radius_styloid: apply=true weight=1
  IKCoordinateTask r_shoulder_elev: apply=false weight=1 value_type=from_file value=0
  IKCoordinateTask r_elbow_flex: apply=false weight=1 value_type=from_file value=0
