# OpenSim document version 20302
ControlSet Control Set:
  defaults: ControlLinear default: is_model_control=true extrapolate=true default_min=0.02 default_max=1
      filter_on=false use_steps=true kp=100 kv=20
  ControlLinear [values shared by the 8 below unless stated]: is_model_control=true extrapolate=true filter_on=false
      kp=100 kv=20 default_min=0.02 default_max=1 use_steps=true
  ControlLinear r_shoulder_elev_reserve.excitation: default_min=-100 default_max=100 use_steps=false
  ControlLinear r_elbow_flex_reserve.excitation: default_min=-100 default_max=100 use_steps=false
  ControlLinear TRIlong.excitation
  ControlLinear TRIlat.excitation
  ControlLinear TRImed.excitation
  ControlLinear BIClong.excitation:
    min_nodes:
      ControlLinearNode: t=0 value=0.02
      ControlLinearNode: t=1 value=0.02
    max_nodes:
      ControlLinearNode: t=0 value=1
      ControlLinearNode: t=1 value=1
  ControlLinear BICshort.excitation
  ControlLinear BRA.excitation
