# OpenSim document version 20302
ForwardTool arm26:
  model_file: arm26.osim
  replace_force_set: false
  results_directory: Results
  output_precision: 20
  initial_time: 0
  final_time: 1
  solve_for_equilibrium_for_auxiliary_states: true
  maximum_number_of_integrator_steps: 30000
  maximum_integrator_step_size: 0.0001
  minimum_integrator_step_size: 0.00000001
  integrator_error_tolerance: 0.000005
  states_file: arm26_InitialStates.sto
  use_specified_dt: false
  AnalysisSet Analyses:
    Kinematics: start_time=-infinity end_time=infinity step_interval=1 in_degrees=true coordinates=all
    Actuation: start_time=-infinity end_time=infinity step_interval=1 in_degrees=true
    BodyKinematics: start_time=-infinity end_time=infinity step_interval=1 in_degrees=true bodies=all
        express_results_in_body_local_frame=false
  ControllerSet Controllers:
    ControlSetController: enable_controller=false controls_file=arm26_StaticOptimization_controls.xml
