Model arm26:
  angle_units: radians
  defaults: Thelen2003Muscle defaultmuscle: muscle_model=9
    tendon_force_length_curve: natCubicSpline: x=(-10 -0.002 -0.001 0 0.00131 0.00281 0.00431 0.00581 0.00731 0.00881 0.0103 0.0118 0.0123 9.2 9.201 9.202 20)
        y=(0 0 0 0 0.0108 0.0257 0.0435 0.0652 0.0915 0.123 0.161 0.208 0.227 345 345 345 345)
    active_force_length_curve: natCubicSpline: x=(-35 0 0.401 0.402 0.4035 0.52725 0.62875 0.71875 0.86125 1.045 1.2175 1.43875 1.61875 1.62 1.621 2.2 35)
        y=(0 0 0 0 0 0.226667 0.636667 0.856667 0.95 0.993333 0.77 0.246667 0 0 0 0 0)
    passive_force_length_curve: natCubicSpline: x=(-35 0.998 0.999 1.15 1.25 1.35 1.45 1.55 1.65 1.75 1.7501 1.7502 35)
        y=(0 0 0 0 0.035 0.12 0.26 0.55 1.17 2 2 2 2)
  ActuatorSet:
    Thelen2003Muscle TRIlong: max_isometric_force=798.52 optimal_fiber_length=0.134 tendon_slack_length=0.143
        pennation_angle=0.2094395 muscle_model=9
      MusclePoint: ground (-0.05365 -0.01373 0.14723)
      MusclePoint: r_humerus (-0.02714 -0.11441 -0.00664)
      MusclePoint: r_humerus (-0.03184 -0.22637 -0.01217)
      MusclePoint: r_humerus (-0.01743 -0.26757 -0.01208)
      MusclePoint: r_ulna_radius_hand (-0.0219 0.01046 -0.00078)
      MuscleWrap: wrap_object=TRI
      MuscleWrap: wrap_object=TRIlonghh method=hybrid
      MuscleWrap: wrap_object=TRIlongglen
    Thelen2003Muscle TRIlat: max_isometric_force=624.3 optimal_fiber_length=0.1138 tendon_slack_length=0.098
        pennation_angle=0.1570796 muscle_model=9
      MusclePoint: r_humerus (-0.00599 -0.12646 0.00428)
      MusclePoint: r_humerus (-0.02344 -0.14528 0.00928)
      MusclePoint: r_humerus (-0.03184 -0.22637 -0.01217)
      MusclePoint: r_humerus (-0.01743 -0.26757 -0.01208)
      MusclePoint: r_ulna_radius_hand (-0.0219 0.01046 -0.00078)
      MuscleWrap: wrap_object=TRI
    Thelen2003Muscle TRImed: max_isometric_force=624.3 optimal_fiber_length=0.1138 tendon_slack_length=0.0908
        pennation_angle=0.1570796 muscle_model=9
      MusclePoint: r_humerus (-0.00838 -0.13695 -0.00906)
      MusclePoint: r_humerus (-0.02601 -0.15139 -0.0108)
      MusclePoint: r_humerus (-0.03184 -0.22637 -0.01217)
      MusclePoint: r_humerus (-0.01743 -0.26757 -0.01208)
      MusclePoint: r_ulna_radius_hand (-0.0219 0.01046 -0.00078)
      MuscleWrap: wrap_object=TRI
    Thelen2003Muscle BIClong: max_isometric_force=624.3 optimal_fiber_length=0.1157 tendon_slack_length=0.2723
        pennation_angle=0 muscle_model=9
      MusclePoint: ground (-0.039235 0.00347 0.14795)
      MusclePoint: ground (-0.028945 0.01391 0.15639)
      MusclePoint: r_humerus (0.02131 0.01793 0.01028)
      MusclePoint: r_humerus (0.02378 -0.00511 0.01201)
      MusclePoint: r_humerus (0.01345 -0.02827 0.00136)
      MusclePoint: r_humerus (0.01068 -0.07736 -0.00165)
      MusclePoint: r_humerus (0.01703 -0.12125 0.00024)
      MusclePoint: r_humerus (0.0228 -0.1754 -0.0063)
      MusclePoint: r_ulna_radius_hand (0.00751 -0.04839 0.02179)
      MuscleWrap: wrap_object=BIClonghh method=hybrid range=(2 3)
    Thelen2003Muscle BICshort: max_isometric_force=435.56 optimal_fiber_length=0.1321 tendon_slack_length=0.1923
        pennation_angle=0 muscle_model=9
      MusclePoint: ground (0.004675 -0.01231 0.13475)
      MusclePoint: ground (-0.007075 -0.04004 0.14507)
      MusclePoint: r_humerus (0.01117 -0.07576 -0.01101)
      MusclePoint: r_humerus (0.01703 -0.12125 -0.01079)
      MusclePoint: r_humerus (0.0228 -0.1754 -0.0063)
      MusclePoint: r_ulna_radius_hand (0.00751 -0.04839 0.02179)
    Thelen2003Muscle BRA: max_isometric_force=987.26 optimal_fiber_length=0.0858 tendon_slack_length=0.0535
        pennation_angle=0 muscle_model=9
      MusclePoint: r_humerus (0.0068 -0.1739 -0.0036)
      MusclePoint: r_ulna_radius_hand (-0.0032 -0.0239 0.0009)
      MuscleWrap: wrap_object=TRI
  DynamicsEngine:
    SimbodyEngine: gravity=(0 -9.80665 0)
      MarkerSet:
        Marker r_acromion: ground (-0.01256 0.04 0.17) weight=1
        Marker r_humerus_epicondyle: r_humerus (0.005 -0.2904 0.03) weight=1
        Marker r_radius_styloid: r_ulna_radius_hand (-0.0011 -0.23559 0.0943) weight=1
      BodySet:
        SimbodyBody ground: mass=0 mass_center=(0 0 0) inertia=(0 0 0 0 0 0 0 0 0)
            meshes=(ground_ribs.vtp ground_spine.vtp ground_skull.vtp ground_jaw.vtp ground_r_clavicle.vtp ground_r_scapula.vtp)
          WrapCylinder TRIlongglen: radius=0.003 length=0.03 xyz_body_rotation=(1.375319 -0.2946116 2.435956)
              translation=(-0.043905 -0.0039 0.1478) quadrant=x
        SimbodyBody r_humerus: mass=1.864572 mass_center=(0 -0.180496 0)
            inertia=(0.01481 0 0 0 0.004551 0 0 0 0.013193) meshes=arm_r_humerus.vtp
          WrapEllipsoid TRIlonghh: dimensions=(0.035 0.02 0.02) xyz_body_rotation=(3.001617 -0.853466 2.574186)
              translation=(-0.0078 -0.0041 -0.0014) quadrant=z
          WrapEllipsoid BIClonghh: dimensions=(0.025 0.02 0.02) xyz_body_rotation=(-2.004336 -1.001644 0.9754645)
              translation=(0.0033 0.0073 0.0003) quadrant=-y
          WrapCylinder TRI: radius=0.016 length=0.05 xyz_body_rotation=(-0.1401499 -0.00628319 0.1549852)
              translation=(0.0028 -0.2919 -0.0069)
        SimbodyBody r_ulna_radius_hand: mass=1.534315 mass_center=(0 -0.181479 0)
            inertia=(0.019281 0 0 0 0.001571 0 0 0 0.020062)
            meshes=(arm_r_ulna.vtp arm_r_radius.vtp arm_r_lunate.vtp arm_r_scaphoid.vtp arm_r_pisiform.vtp arm_r_triquetrum.vtp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)
      SimbodyCoordinate r_shoulder_elev: range=(-1.570796 3.141593) default_value=0 tolerance=0 stiffness=0
          keys=(s_key leftmouse_button) clamped=true restraint_active=false
      SimbodyCoordinate r_elbow_flex: range=(0 2.268928) default_value=0 tolerance=0 stiffness=0
          keys=(e_key leftmouse_button) clamped=true restraint_active=false
      SpeedSet:
        SimbodySpeed r_shoulder_elev_u: default_value=0 coordinate=r_shoulder_elev
        SimbodySpeed r_elbow_flex_u: default_value=0 coordinate=r_elbow_flex
      JointSet:
        SimbodyJoint r_shoulder: bodies=(ground r_humerus)
          DofSet:
            SimbodyTranslationDof tx:
              Value: Constant(value=-0.017545)
            SimbodyTranslationDof ty:
              Value: Constant(value=-0.007)
            SimbodyTranslationDof tz:
              Value: Constant(value=0.17)
            SimbodyRotationDof r1: axis=(0.9973606 -0.04259798 -0.05879798)
              Value: Constant(value=0)
            SimbodyRotationDof r2: axis=(-0.05889802 0.002300001 0.9982614) coordinate=r_shoulder_elev
              Value:
                natCubicSpline: x=(-1.570796 3.141593) y=(-1.570796 3.141593)
            SimbodyRotationDof r3: axis=(0.04240001 0.9990892 -0.004800001)
              Value: Constant(value=0)
        SimbodyJoint r_elbow: bodies=(r_humerus r_ulna_radius_hand)
          DofSet:
            SimbodyTranslationDof tx:
              Value: Constant(value=0.0061)
            SimbodyTranslationDof ty:
              Value: Constant(value=-0.2904)
            SimbodyTranslationDof tz:
              Value: Constant(value=-0.0123)
            SimbodyRotationDof r1: axis=(1 0 0)
              Value: Constant(value=0)
            SimbodyRotationDof r2: axis=(0 1 0)
              Value: Constant(value=0)
            SimbodyRotationDof r3: axis=(0.04940001 0.03660001 0.9981082) coordinate=r_elbow_flex
              Value:
                natCubicSpline: x=(-6.283185 6.283185) y=(-6.283185 6.283185)
