# OpenSim document version 20302
IKTool arm26:
  results_directory: ./
  model_file: S26pre.osim
  constraint_weight: 20
  accuracy: 0.00001
  marker_file: arm26_elbow_flex.trc
  time_range: 0 1
  report_errors: true
  output_motion_file: arm26_InverseKinematics.mot
  IKTaskSet arm26_InverseKinematics:
    IKMarkerTask r_acromion: apply=true weight=1
    IKMarkerTask r_humerus_epicondyle: apply=true weight=1
    IKMarkerTask r_radius_styloid: apply=true weight=1
    IKCoordinateTask r_shoulder_elev: apply=false weight=1 value_type=from_file value=0
    IKCoordinateTask r_elbow_flex: apply=false weight=1 value_type=from_file value=0
