# OpenSim document version 10600
Model bucket:
  credits: Model authors names..
  publications: List of publications related to model...
  length_units: meters
  force_units: N
  DynamicsEngine:
    SimbodyEngine default: gravity=(0 -9.80665 0)
      BodySet:
        Body ground: mass=0 mass_center=(0 0 0) inertia_xx=0 inertia_yy=0 inertia_zz=0
        Body bucket: mass=1 mass_center=(0 -0.1 0) inertia_xx=0.00223958 inertia_yy=0.0028125 inertia_zz=0.00223958
            meshes=bucket.vtp
          CustomJoint r_handle: parent_body=ground location_in_parent=(0.031 -0.31 0.07) location=(0 0 0)
            Coordinate r_handle_rot: default_value=0 initial_value=0 tolerance=0 stiffness=0 range=(-3.141593 3.141593)
                keys=(e_key leftmouse_button) clamped=true restraint_active=false
            TransformAxis r3: coordinate=r_handle_rot axis=(0.04940001 0.03660001 0.9981083)
              # Specify axis direction(e.g., 0.04940001       0.03660001       0.99810825)
        # Add new Body and Joint above
