SimmModel 3DGaitModelSimple:
  gravity: 0 -9.80665 0
  SimmMuscleSet:
    SimmMuscle [values shared by the 54 below unless stated]: max_contraction_velocity=10 muscle_model=9 timescale=0.1
        damping=0.05 activation_time_constant=0.01 deactivation_time_constant=0.04 Af=0.3 Flen=1.8 Vmax=10 Vmax0=5
        FmaxTendonStrain=0.033 FmaxMuscleStrain=0.6 KshapeActive=0.5 KshapePassive=4 muscle_density=1056
        max_isometric_stress=350000
      tendon_force_length_curves: natCubicSpline: x=(-10 -0.002 -0.001 0 0.00131 0.00281 0.00431 0.00581 0.00731 0.00881 0.0103 0.0118 0.0123 9.2 9.201 9.202 20)
          y=(0 0 0 0 0.0108 0.0257 0.0435 0.0652 0.0915 0.123 0.161 0.208 0.227 345 345 345 345)
      active_force_length_curves: natCubicSpline: x=(-5.307692 -4.307692 -1.923077 -0.884615 -0.269231 0.230769 0.461538 0.52725 0.62875 0.71875 0.86125 1.045 1.2175 1.43875 1.5 1.615385 2 2.961538 3.692308 5.461538 9.901902)
          y=(0.012188 0.021899 0.036466 0.052493 0.075312 0.114158 0.157859 0.226667 0.636667 0.856667 0.95 0.993333 0.77 0.246667 0.193821 0.133252 0.072683 0.044417 0.036341 0.021899 0.007332)
      passive_force_length_curves: natCubicSpline: x=(-5 0.998 0.999 1 1.1 1.2 1.3 1.4 1.5 1.6 1.601 1.602 5)
          y=(0 0 0 0 0.035 0.12 0.26 0.55 1.17 2 2 2 2)
      force_velocity_curves: natCubicSpline: x=(-1 -0.95 -0.9 -0.85 -0.8 -0.75 -0.7 -0.65 -0.6 -0.55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)
          y=(0 0.010417 0.021739 0.034091 0.047619 0.0625 0.078947 0.097222 0.117647 0.140625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)
    SimmMuscle glut_med1_r: max_isometric_force=1119 optimal_fiber_length=0.05125785 tendon_slack_length=0.07473106
        pennation_angle=8 groups=(R_hip_abd R_hip_flex R_hip_inrot)
      SimmMusclePointSet:
        SimmMusclePoint: location=(-0.03797055 0.02829179 0.1125157) body=pelvis
        SimmMusclePoint: location=(-0.02275313 -0.01221154 0.05792655) body=femur_r
    SimmMuscle glut_med2_r: max_isometric_force=873 optimal_fiber_length=0.08099637 tendon_slack_length=0.05080246
        pennation_angle=0 groups=R_hip_abd
      SimmMusclePointSet:
        SimmMusclePoint: location=(-0.07957065 0.04141396 0.07128785) body=pelvis
        SimmMusclePoint: location=(-0.02692802 -0.00605359 0.05500413) body=femur_r
    SimmMuscle glut_med3_r: max_isometric_force=1000 optimal_fiber_length=0.06228115 tendon_slack_length=0.05109754
        pennation_angle=19 groups=(R_hip_abd R_hip_exrot R_hip_ext)
      SimmMusclePointSet:
        SimmMusclePoint: location=(-0.1138186 0.00977183 0.06030617) body=pelvis
        SimmMusclePoint: location=(-0.032251 -0.00490549 0.05406478) body=femur_r
    SimmMuscle bifemlh_r: max_isometric_force=2700 optimal_fiber_length=0.1130439 tendon_slack_length=0.3380945
        pennation_angle=0 groups=(R_hip_ext R_hip_add R_knee_bend)
      SimmMusclePointSet:
        SimmMusclePoint: location=(-0.1172248 -0.09545686 0.06462439) body=pelvis
        SimmMusclePoint: location=(-0.02815991 -0.03367963 0.0275331) body=tibia_r
        SimmMusclePoint: location=(-0.02189176 -0.0526712 0.0320892) body=tibia_r
    SimmMuscle bifemsh_r: max_isometric_force=804 optimal_fiber_length=0.1757658 tendon_slack_length=0.09042286
        pennation_angle=23 groups=R_knee_bend
      SimmMusclePointSet:
        SimmMusclePoint: location=(0.00521861 -0.2203296 0.02442309) body=femur_r
        SimmMusclePoint: location=(-0.02815991 -0.03367963 0.0275331) body=tibia_r
        SimmMusclePoint: location=(-0.02189176 -0.0526712 0.0320892) body=tibia_r
    SimmMuscle sar_r: max_isometric_force=156 optimal_fiber_length=0.5253663 tendon_slack_length=0.101032
        pennation_angle=0 groups=(R_hip_flex R_hip_abd R_knee_bend)
      SimmMusclePointSet:
        SimmMusclePoint: location=(-0.01423896 -0.00120985 0.1155868) body=pelvis
        SimmMusclePoint: location=(-0.00313116 -0.3723999 -0.04394068) body=femur_r
        SimmMusclePoint: location=(-0.00523905 -0.03919935 -0.03732826) body=tibia_r
        SimmMusclePoint: location=(0.00561327 -0.05510362 -0.03583138) body=tibia_r
        SimmMusclePoint: location=(0.02273375 -0.0785858 -0.02357574) body=tibia_r
    SimmMuscle add_mag2_r: max_isometric_force=2343 optimal_fiber_length=0.1282953 tendon_slack_length=0.127235
        pennation_angle=3 groups=(R_hip_ext R_hip_add)
      SimmMusclePointSet:
        SimmMusclePoint: location=(-0.07733708 -0.1109336 0.02866405) body=pelvis
        SimmMusclePoint: location=(0.0056361 -0.2384904 0.02369248) body=femur_r
    SimmMuscle tfl_r: max_isometric_force=233 optimal_fiber_length=0.0966896 tendon_slack_length=0.4325587
        pennation_angle=3 groups=(R_hip_abd R_hip_flex R_hip_inrot)
      SimmMusclePointSet:
        SimmMusclePoint: location=(-0.02894324 0.01991593 0.1154938) body=pelvis
        SimmMusclePoint: location=(0.03068542 -0.1038503 0.06231018) body=femur_r
        SimmMusclePoint: location=(0.0056361 -0.4226029 0.03726086) body=femur_r
        SimmMusclePoint: location=(0.00561327 -0.04556105 0.02778569) body=tibia_r
    SimmMuscle pect_r: max_isometric_force=266 optimal_fiber_length=0.1015453 tendon_slack_length=0.03350995
        pennation_angle=0 groups=(R_hip_add R_hip_flex)
      SimmMusclePointSet:
        SimmMusclePoint: location=(-0.04011105 -0.07147398 0.04197235) body=pelvis
        SimmMusclePoint: location=(-0.0127334 -0.08579392 0.02640616) body=femur_r
    SimmMuscle grac_r: max_isometric_force=162 optimal_fiber_length=0.3636339 tendon_slack_length=0.1301644
        pennation_angle=3 groups=(R_hip_add R_knee_bend R_hip_flex)
      SimmMusclePointSet:
        SimmMusclePoint: location=(-0.06887747 -0.1104683 0.02600238) body=pelvis
        SimmMuscleViaPoint: location=(-0.02485744 -0.02984389 -0.03530748) body=tibia_r coordinate=knee_angle_r
            range=(-25 10)
        SimmMusclePoint: location=(-0.01817764 -0.04820865 -0.03349252) body=tibia_r
        SimmMusclePoint: location=(0.00561327 -0.07821158 -0.02133043) body=tibia_r
    SimmMuscle glut_max1_r: max_isometric_force=573 optimal_fiber_length=0.1377749 tendon_slack_length=0.1212807
        pennation_angle=5 groups=(R_hip_ext R_hip_abd)
      SimmMusclePointSet:
        SimmMusclePoint: location=(-0.1112128 0.05695583 0.06514556) body=pelvis
        SimmMusclePoint: location=(-0.120147 0.00111678 0.08245566) body=pelvis
        SimmMusclePoint: location=(-0.04769808 -0.0258843 0.04091389) body=femur_r
        SimmMusclePoint: location=(-0.02891109 -0.05907465 0.04905492) body=femur_r
    SimmMuscle glut_max2_r: max_isometric_force=819 optimal_fiber_length=0.1449039 tendon_slack_length=0.125189
        pennation_angle=0 groups=R_hip_ext
      SimmMusclePointSet:
        SimmMusclePoint: location=(-0.1255448 0.01637945 0.05239564) body=pelvis
        SimmMusclePoint: location=(-0.1280575 -0.04839384 0.08506149) body=pelvis
        SimmMusclePoint: location=(-0.04446254 -0.05531725 0.03058104) body=femur_r
        SimmMusclePoint: location=(-0.01628206 -0.1060421 0.04373194) body=femur_r
    SimmMuscle glut_max3_r: max_isometric_force=552 optimal_fiber_length=0.1420833 tendon_slack_length=0.14307
        pennation_angle=5 groups=R_hip_ext
      SimmMusclePointSet:
        SimmMusclePoint: location=(-0.1448093 -0.02922244 0.00539777) body=pelvis
        SimmMusclePoint: location=(-0.1422965 -0.09790447 0.03750523) body=pelvis
        SimmMusclePoint: location=(-0.03120728 -0.1086514 0.01409024) body=femur_r
        SimmMusclePoint: location=(-0.00626233 -0.1481041 0.04289696) body=femur_r
    SimmMuscle iliacus_r: max_isometric_force=1073 optimal_fiber_length=0.0964828 tendon_slack_length=0.0964828
        pennation_angle=7 groups=(R_hip_flex R_hip_inrot)
      SimmMusclePointSet:
        SimmMusclePoint: location=(-0.06272587 0.03396876 0.07947758) body=pelvis
        SimmMusclePoint: location=(-0.02401079 -0.0511858 0.07547578) body=pelvis
        SimmMuscleViaPoint: location=(-0.02680274 -0.07491739 0.07594111) body=pelvis coordinate=hip_flexion_r
            range=(-90 45)
        SimmMusclePoint: location=(0.00177433 -0.05667409 0.00594921) body=femur_r
        SimmMusclePoint: location=(-0.02014383 -0.06481511 0.01346401) body=femur_r
    SimmMuscle psoas_r: max_isometric_force=1113 optimal_fiber_length=0.09556831 tendon_slack_length=0.1529093
        pennation_angle=8 groups=(R_hip_flex R_hip_inrot)
      SimmMusclePointSet:
        SimmMusclePoint: location=(-0.06021311 0.08254873 0.02689581) body=pelvis
        SimmMusclePoint: location=(-0.02214949 -0.0530471 0.0706364) body=pelvis
        SimmMuscleViaPoint: location=(-0.02680274 -0.07491739 0.07594111) body=pelvis coordinate=hip_flexion_r
            range=(-90 45)
        SimmMusclePoint: location=(0.00166995 -0.05291669 0.00396614) body=femur_r
        SimmMusclePoint: location=(-0.01962197 -0.06231018 0.01085471) body=femur_r
    SimmMuscle quad_fem_r: max_isometric_force=381 optimal_fiber_length=0.05279081 tendon_slack_length=0.02346258
        pennation_angle=0 groups=R_hip_exrot
      SimmMusclePointSet:
        SimmMusclePoint: location=(-0.1063734 -0.1071179 0.04839384) body=pelvis
        SimmMusclePoint: location=(-0.03976579 -0.03746961 0.03820021) body=femur_r
    SimmMuscle gem_r: max_isometric_force=164 optimal_fiber_length=0.0237231 tendon_slack_length=0.03855004
        pennation_angle=0 groups=R_hip_exrot
      SimmMusclePointSet:
        SimmMusclePoint: location=(-0.1054427 -0.07631337 0.06644847) body=pelvis
        SimmMusclePoint: location=(-0.01482085 -0.00344428 0.04623687) body=femur_r
    SimmMuscle peri_r: max_isometric_force=444 optimal_fiber_length=0.02483348 tendon_slack_length=0.1098404
        pennation_angle=10 groups=(R_hip_exrot R_hip_abd)
      SimmMusclePointSet:
        SimmMusclePoint: location=(-0.1299189 0.0002792 0.02187029) body=pelvis
        SimmMusclePoint: location=(-0.1110266 -0.02568596 0.06114376) body=pelvis
        SimmMusclePoint: location=(-0.01544708 -0.0037574 0.04561064) body=femur_r
    SimmMuscle rect_fem_r: max_isometric_force=1169 optimal_fiber_length=0.1171874 tendon_slack_length=0.3186674
        pennation_angle=5 groups=(R_hip_flex R_knee_ext)
      SimmMusclePointSet:
        SimmMusclePoint: location=(-0.0274542 -0.02894324 0.090087) body=pelvis
        SimmMuscleViaPoint: location=(0.0348603 -0.4206198 0.00198307) body=femur_r coordinate=knee_angle_r
            range=(-150 -83.65)
        SimmMusclePoint: location=(0.01262903 0.04561064 -0.00104372) body=patella_r
    SimmMuscle vas_int_r: max_isometric_force=5000 optimal_fiber_length=0.1099991 tendon_slack_length=0.1192513
        pennation_angle=3 groups=R_knee_ext
      SimmMusclePointSet:
        SimmMusclePoint: location=(0.03026793 -0.200812 0.03235537) body=femur_r
        SimmMusclePoint: location=(0.03496468 -0.2175116 0.02974607) body=femur_r
        SimmMuscleViaPoint: location=(0.03579965 -0.4206198 0.00574047) body=femur_r coordinate=knee_angle_r
            range=(-150 -81.36)
        SimmMusclePoint: location=(0.00605359 0.05009864 -0.00062623) body=patella_r
    SimmMuscle med_gas_r: max_isometric_force=2500 optimal_fiber_length=0.08373316 tendon_slack_length=0.3349327
        pennation_angle=17 groups=(R_knee_bend R_ankle_pf)
      SimmMusclePointSet:
        SimmMusclePoint: location=(-0.01983071 -0.4100782 -0.02452746) body=femur_r
        SimmMuscleViaPoint: location=(-0.03131165 -0.4197848 -0.02692802) body=femur_r coordinate=knee_angle_r
            range=(-45 10)
        SimmMusclePoint: location=(0 0.03225119 -0.00551391) body=calcn_r
    SimmMuscle soleus_r: max_isometric_force=4000 optimal_fiber_length=0.07396571 tendon_slack_length=0.2034057
        pennation_angle=25 groups=R_ankle_pf
      SimmMusclePointSet:
        SimmMusclePoint: location=(-0.00224531 -0.1434191 0.00664237) body=tibia_r
        SimmMusclePoint: location=(0 0.03225119 -0.00551391) body=calcn_r
    SimmMuscle tib_post_r: max_isometric_force=3600 optimal_fiber_length=0.02918454 tendon_slack_length=0.2918454
        pennation_angle=12 groups=(R_ankle_pf R_inverter)
      SimmMusclePointSet:
        SimmMusclePoint: location=(-0.00879413 -0.1261115 0.00177754) body=tibia_r
        SimmMusclePoint: location=(-0.01347185 -0.3789894 -0.02142399) body=tibia_r
        SimmMusclePoint: location=(0.04338306 0.03474806 -0.02975433) body=calcn_r
        SimmMusclePoint: location=(0.08031587 0.01654174 -0.02923415) body=calcn_r
    SimmMuscle tib_ant_r: max_isometric_force=3000 optimal_fiber_length=0.09356555 tendon_slack_length=0.2129094
        pennation_angle=5 groups=(R_ankle_df R_inverter)
      SimmMusclePointSet:
        SimmMusclePoint: location=(0.01674626 -0.1519325 0.01075877) body=tibia_r
        SimmMusclePoint: location=(0.03077944 -0.3696339 -0.01655915) body=tibia_r
        SimmMusclePoint: location=(0.1213061 0.01851843 -0.03173101) body=calcn_r
    SimmMuscle glut_med1_l: max_isometric_force=1119 optimal_fiber_length=0.05125785 tendon_slack_length=0.07473106
        pennation_angle=8 groups=(L_hip_abd L_hip_flex L_hip_inrot)
      SimmMusclePointSet:
        SimmMusclePoint: location=(-0.03797055 0.02829179 -0.1125157) body=pelvis
        SimmMusclePoint: location=(-0.02275313 -0.01221154 -0.05792655) body=femur_l
    SimmMuscle glut_med2_l: max_isometric_force=873 optimal_fiber_length=0.08099637 tendon_slack_length=0.05080246
        pennation_angle=0 groups=L_hip_abd
      SimmMusclePointSet:
        SimmMusclePoint: location=(-0.07957065 0.04141396 -0.07128785) body=pelvis
        SimmMusclePoint: location=(-0.02692802 -0.00605359 -0.05500413) body=femur_l
    SimmMuscle glut_med3_l: max_isometric_force=1000 optimal_fiber_length=0.06228115 tendon_slack_length=0.05109754
        pennation_angle=19 groups=(L_hip_abd L_hip_exrot L_hip_ext)
      SimmMusclePointSet:
        SimmMusclePoint: location=(-0.1138186 0.00977183 -0.06030617) body=pelvis
        SimmMusclePoint: location=(-0.032251 -0.00490549 -0.05406478) body=femur_l
    SimmMuscle bifemlh_l: max_isometric_force=2700 optimal_fiber_length=0.1130439 tendon_slack_length=0.3380945
        pennation_angle=0 groups=(L_hip_ext L_hip_add L_knee_bend)
      SimmMusclePointSet:
        SimmMusclePoint: location=(-0.1172248 -0.09545686 -0.06462439) body=pelvis
        SimmMusclePoint: location=(-0.02815991 -0.03367963 -0.0275331) body=tibia_l
        SimmMusclePoint: location=(-0.02189176 -0.0526712 -0.0320892) body=tibia_l
    SimmMuscle bifemsh_l: max_isometric_force=804 optimal_fiber_length=0.1757658 tendon_slack_length=0.09042286
        pennation_angle=23 groups=L_knee_bend
      SimmMusclePointSet:
        SimmMusclePoint: location=(0.00521861 -0.2203296 -0.02442309) body=femur_l
        SimmMusclePoint: location=(-0.02815991 -0.03367963 -0.0275331) body=tibia_l
        SimmMusclePoint: location=(-0.02189176 -0.0526712 -0.0320892) body=tibia_l
    SimmMuscle sar_l: max_isometric_force=156 optimal_fiber_length=0.5253663 tendon_slack_length=0.101032
        pennation_angle=0 groups=(L_hip_flex L_hip_abd L_knee_bend)
      SimmMusclePointSet:
        SimmMusclePoint: location=(-0.01423896 -0.00120985 -0.1155868) body=pelvis
        SimmMusclePoint: location=(-0.00313116 -0.3723999 0.04394068) body=femur_l
        SimmMusclePoint: location=(-0.00523905 -0.03919935 0.03732826) body=tibia_l
        SimmMusclePoint: location=(0.00561327 -0.05510362 0.03583138) body=tibia_l
        SimmMusclePoint: location=(0.02273375 -0.0785858 0.02357574) body=tibia_l
    SimmMuscle add_mag2_l: max_isometric_force=2343 optimal_fiber_length=0.1282953 tendon_slack_length=0.127235
        pennation_angle=3 groups=(L_hip_ext L_hip_add)
      SimmMusclePointSet:
        SimmMusclePoint: location=(-0.07733708 -0.1109336 -0.02866405) body=pelvis
        SimmMusclePoint: location=(0.0056361 -0.2384904 -0.02369248) body=femur_l
    SimmMuscle tfl_l: max_isometric_force=233 optimal_fiber_length=0.0966896 tendon_slack_length=0.4325587
        pennation_angle=3 groups=(L_hip_abd L_hip_flex L_hip_inrot)
      SimmMusclePointSet:
        SimmMusclePoint: location=(-0.02894324 0.01991593 -0.1154938) body=pelvis
        SimmMusclePoint: location=(0.03068542 -0.1038503 -0.06231018) body=femur_l
        SimmMusclePoint: location=(0.0056361 -0.4226029 -0.03726086) body=femur_l
        SimmMusclePoint: location=(0.00561327 -0.04556105 -0.02778569) body=tibia_l
    SimmMuscle pect_l: max_isometric_force=266 optimal_fiber_length=0.1015453 tendon_slack_length=0.03350995
        pennation_angle=0 groups=(L_hip_add L_hip_flex)
      SimmMusclePointSet:
        SimmMusclePoint: location=(-0.04011105 -0.07147398 -0.04197235) body=pelvis
        SimmMusclePoint: location=(-0.0127334 -0.08579392 -0.02640616) body=femur_l
    SimmMuscle grac_l: max_isometric_force=162 optimal_fiber_length=0.3636339 tendon_slack_length=0.1301644
        pennation_angle=3 groups=(L_hip_add L_knee_bend L_hip_flex)
      SimmMusclePointSet:
        SimmMusclePoint: location=(-0.06887747 -0.1104683 -0.02600238) body=pelvis
        SimmMuscleViaPoint: location=(-0.02485744 -0.02984389 0.03530748) body=tibia_l coordinate=knee_angle_l
            range=(-25 10)
        SimmMusclePoint: location=(-0.01817764 -0.04820865 0.03349252) body=tibia_l
        SimmMusclePoint: location=(0.00561327 -0.07821158 0.02133043) body=tibia_l
    SimmMuscle glut_max1_l: max_isometric_force=573 optimal_fiber_length=0.1377749 tendon_slack_length=0.1212807
        pennation_angle=5 groups=(L_hip_ext L_hip_abd)
      SimmMusclePointSet:
        SimmMusclePoint: location=(-0.1112128 0.05695583 -0.06514556) body=pelvis
        SimmMusclePoint: location=(-0.120147 0.00111678 -0.08245566) body=pelvis
        SimmMusclePoint: location=(-0.04769808 -0.0258843 -0.04091389) body=femur_l
        SimmMusclePoint: location=(-0.02891109 -0.05907465 -0.04905492) body=femur_l
    SimmMuscle glut_max2_l: max_isometric_force=819 optimal_fiber_length=0.1449039 tendon_slack_length=0.125189
        pennation_angle=0 groups=L_hip_ext
      SimmMusclePointSet:
        SimmMusclePoint: location=(-0.1255448 0.01637945 -0.05239564) body=pelvis
        SimmMusclePoint: location=(-0.1280575 -0.04839384 -0.08506149) body=pelvis
        SimmMusclePoint: location=(-0.04446254 -0.05531725 -0.03058104) body=femur_l
        SimmMusclePoint: location=(-0.01628206 -0.1060421 -0.04373194) body=femur_l
    SimmMuscle glut_max3_l: max_isometric_force=552 optimal_fiber_length=0.1420833 tendon_slack_length=0.14307
        pennation_angle=5 groups=L_hip_ext
      SimmMusclePointSet:
        SimmMusclePoint: location=(-0.1448093 -0.02922244 -0.00539777) body=pelvis
        SimmMusclePoint: location=(-0.1422965 -0.09790447 -0.03750523) body=pelvis
        SimmMusclePoint: location=(-0.03120728 -0.1086514 -0.01409024) body=femur_l
        SimmMusclePoint: location=(-0.00626233 -0.1481041 -0.04289696) body=femur_l
    SimmMuscle iliacus_l: max_isometric_force=1073 optimal_fiber_length=0.0964828 tendon_slack_length=0.0964828
        pennation_angle=7 groups=(L_hip_flex L_hip_inrot)
      SimmMusclePointSet:
        SimmMusclePoint: location=(-0.06272587 0.03396876 -0.07947758) body=pelvis
        SimmMusclePoint: location=(-0.02401079 -0.0511858 -0.07547578) body=pelvis
        SimmMuscleViaPoint: location=(-0.02680274 -0.07491739 -0.07594111) body=pelvis coordinate=hip_flexion_l
            range=(-90 45)
        SimmMusclePoint: location=(0.00177433 -0.05667409 -0.00594921) body=femur_l
        SimmMusclePoint: location=(-0.02014383 -0.06481511 -0.01346401) body=femur_l
    SimmMuscle psoas_l: max_isometric_force=1113 optimal_fiber_length=0.09556831 tendon_slack_length=0.1529093
        pennation_angle=8 groups=(L_hip_flex L_hip_inrot)
      SimmMusclePointSet:
        SimmMusclePoint: location=(-0.06021311 0.08254873 -0.02689581) body=pelvis
        SimmMusclePoint: location=(-0.02214949 -0.0530471 -0.0706364) body=pelvis
        SimmMuscleViaPoint: location=(-0.02680274 -0.07491739 -0.07594111) body=pelvis coordinate=hip_flexion_l
            range=(-90 45)
        SimmMusclePoint: location=(0.00166995 -0.05291669 -0.00396614) body=femur_l
        SimmMusclePoint: location=(-0.01962197 -0.06231018 -0.01085471) body=femur_l
    SimmMuscle quad_fem_l: max_isometric_force=381 optimal_fiber_length=0.05279081 tendon_slack_length=0.02346258
        pennation_angle=0 groups=L_hip_exrot
      SimmMusclePointSet:
        SimmMusclePoint: location=(-0.1063734 -0.1071179 -0.04839384) body=pelvis
        SimmMusclePoint: location=(-0.03976579 -0.03746961 -0.03820021) body=femur_l
    SimmMuscle gem_l: max_isometric_force=164 optimal_fiber_length=0.0237231 tendon_slack_length=0.03855004
        pennation_angle=0 groups=L_hip_exrot
      SimmMusclePointSet:
        SimmMusclePoint: location=(-0.1054427 -0.07631337 -0.06644847) body=pelvis
        SimmMusclePoint: location=(-0.01482085 -0.00344428 -0.04623687) body=femur_l
    SimmMuscle peri_l: max_isometric_force=444 optimal_fiber_length=0.02483348 tendon_slack_length=0.1098404
        pennation_angle=10 groups=(L_hip_exrot L_hip_abd)
      SimmMusclePointSet:
        SimmMusclePoint: location=(-0.1299189 0.0002792 -0.02187029) body=pelvis
        SimmMusclePoint: location=(-0.1110266 -0.02568596 -0.06114376) body=pelvis
        SimmMusclePoint: location=(-0.01544708 -0.0037574 -0.04561064) body=femur_l
    SimmMuscle rect_fem_l: max_isometric_force=1169 optimal_fiber_length=0.1171874 tendon_slack_length=0.3186674
        pennation_angle=5 groups=(L_hip_flex L_knee_ext)
      SimmMusclePointSet:
        SimmMusclePoint: location=(-0.0274542 -0.02894324 -0.090087) body=pelvis
        SimmMuscleViaPoint: location=(0.0348603 -0.4206198 -0.00198307) body=femur_l coordinate=knee_angle_l
            range=(-150 -83.65)
        SimmMusclePoint: location=(0.01262903 0.04561064 0.00104372) body=patella_l
    SimmMuscle vas_int_l: max_isometric_force=5000 optimal_fiber_length=0.1099991 tendon_slack_length=0.1192513
        pennation_angle=3 groups=L_knee_ext
      SimmMusclePointSet:
        SimmMusclePoint: location=(0.03026793 -0.200812 -0.03235537) body=femur_l
        SimmMusclePoint: location=(0.03496468 -0.2175116 -0.02974607) body=femur_l
        SimmMuscleViaPoint: location=(0.03579965 -0.4206198 -0.00574047) body=femur_l coordinate=knee_angle_l
            range=(-150 -81.36)
        SimmMusclePoint: location=(0.00605359 0.05009864 0.00062623) body=patella_l
    SimmMuscle med_gas_l: max_isometric_force=2500 optimal_fiber_length=0.08373316 tendon_slack_length=0.3349327
        pennation_angle=17 groups=(L_knee_bend L_ankle_pf)
      SimmMusclePointSet:
        SimmMusclePoint: location=(-0.01983071 -0.4100782 0.02452746) body=femur_l
        SimmMuscleViaPoint: location=(-0.03131165 -0.4197848 0.02692802) body=femur_l coordinate=knee_angle_l
            range=(-45 10)
        SimmMusclePoint: location=(0 0.03225119 0.00551391) body=calcn_l
    SimmMuscle soleus_l: max_isometric_force=4000 optimal_fiber_length=0.07396571 tendon_slack_length=0.2034057
        pennation_angle=25 groups=L_ankle_pf
      SimmMusclePointSet:
        SimmMusclePoint: location=(-0.00224531 -0.1434191 -0.00664237) body=tibia_l
        SimmMusclePoint: location=(0 0.03225119 0.00551391) body=calcn_l
    SimmMuscle tib_post_l: max_isometric_force=3600 optimal_fiber_length=0.02918454 tendon_slack_length=0.2918454
        pennation_angle=12 groups=(L_ankle_pf L_inverter)
      SimmMusclePointSet:
        SimmMusclePoint: location=(-0.00879413 -0.1261115 -0.00177754) body=tibia_l
        SimmMusclePoint: location=(-0.01347185 -0.3789894 0.02142399) body=tibia_l
        SimmMusclePoint: location=(0.04338306 0.03474806 0.02975433) body=calcn_l
        SimmMusclePoint: location=(0.08031587 0.01654174 0.02923415) body=calcn_l
    SimmMuscle tib_ant_l: max_isometric_force=3000 optimal_fiber_length=0.09356555 tendon_slack_length=0.2129094
        pennation_angle=5 groups=(L_ankle_df L_inverter)
      SimmMusclePointSet:
        SimmMusclePoint: location=(0.01674626 -0.1519325 -0.01075877) body=tibia_l
        SimmMusclePoint: location=(0.03077944 -0.3696339 0.01655915) body=tibia_l
        SimmMusclePoint: location=(0.1213061 0.01851843 0.03173101) body=calcn_l
    SimmMuscle ercspn_r: max_isometric_force=2500 optimal_fiber_length=0.1136908 tendon_slack_length=0.0284227
        pennation_angle=0 groups=(back_ext back_rlb back_introt)
      SimmMusclePointSet:
        SimmMusclePoint: location=(-0.1302911 0.04085557 0.04057638) body=pelvis
        SimmMusclePoint: location=(-0.0524261 0.1048522 0.02297216) body=torso
    SimmMuscle ercspn_l: max_isometric_force=2500 optimal_fiber_length=0.1136908 tendon_slack_length=0.0284227
        pennation_angle=0 groups=(back_ext back_llb back_extrot)
      SimmMusclePointSet:
        SimmMusclePoint: location=(-0.1302911 0.04085557 -0.04057638) body=pelvis
        SimmMusclePoint: location=(-0.0524261 0.1048522 -0.02297216) body=torso
    SimmMuscle intobl_r: max_isometric_force=900 optimal_fiber_length=0.09458601 tendon_slack_length=0.09458601
        pennation_angle=0 groups=(back_introt back_flex back_rlb)
      SimmMusclePointSet:
        SimmMusclePoint: location=(-0.03722603 0.06514556 0.1076763) body=pelvis
        SimmMusclePoint: location=(0.06672413 0.1525123 0.01429803) body=torso
    SimmMuscle intobl_l: max_isometric_force=900 optimal_fiber_length=0.09458601 tendon_slack_length=0.09458601
        pennation_angle=0 groups=(back_extrot back_flex back_llb)
      SimmMusclePointSet:
        SimmMusclePoint: location=(-0.03722603 0.06514556 -0.1076763) body=pelvis
        SimmMusclePoint: location=(0.06672413 0.1525123 -0.01429803) body=torso
    SimmMuscle extobl_r: max_isometric_force=900 optimal_fiber_length=0.1130758 tendon_slack_length=0.1319217
        pennation_angle=0 groups=(back_extrot back_flex back_rlb)
      SimmMusclePointSet:
        SimmMusclePoint: location=(-0.02791952 -0.05918939 0.00930651) body=pelvis
        SimmMusclePoint: location=(0.06195812 0.1048522 0.1048522) body=torso
    SimmMuscle extobl_l: max_isometric_force=900 optimal_fiber_length=0.1130758 tendon_slack_length=0.1319217
        pennation_angle=0 groups=(back_introt back_flex back_llb)
      SimmMusclePointSet:
        SimmMusclePoint: location=(-0.02791952 -0.05918939 -0.00930651) body=pelvis
        SimmMusclePoint: location=(0.06195812 0.1048522 -0.1048522) body=torso
  DynamicsEngine:
    SimmKinematicsEngine:
      SimmBodySet:
        SimmBody ground: mass=0 mass_center=(0 0 0) inertia=(0 0 0 0 0 0 0 0 0)
        SimmBody pelvis: mass=10.40894 mass_center=(-0.06579701 0 0)
            inertia=(0.09467627 0 0 0 0.08021696 0 0 0 0.05332447) meshes=(sacrum2.vtp pelvis.vtp l_pelvis.vtp)
          SimmMarkerSet:
            SimmMarker asis_r: weight=1 location=(0.02354424 0.04137408 0.1252253) body=pelvis
            SimmMarker asis_l: weight=1 location=(0.02679692 0.03929681 -0.1129901) body=pelvis
            SimmMarker midasis: weight=1 location=(0.02517058 0.04033544 0.00611762) body=pelvis
            SimmMarker psis_r: weight=1 location=(-0.1641319 0.08013606 0.03539024) body=pelvis
            SimmMarker psis_l: weight=1 location=(-0.1583625 0.07626622 -0.05019195) body=pelvis
            SimmMarker hip_r: weight=1 location=(-0.06149843 -0.04664993 0.08091916) body=pelvis
            SimmMarker hip_l: weight=1 location=(-0.059444 -0.04796203 -0.06948784) body=pelvis
            SimmMarker midhip: weight=1 location=(-0.06047124 -0.047306 0.00571568) body=pelvis
        SimmBody femur_r: mass=8.220919 mass_center=(0 -0.1774327 0)
            inertia=(0.1233186 0 0 0 0.03232624 0 0 0 0.1300417) meshes=femur.vtp
          SimmMarkerSet:
            SimmMarker epicondLat_r: weight=1 location=(0.00277635 -0.3972951 0.07488714) body=femur_r
            SimmMarker epicondMed_r: weight=1 location=(-0.00501342 -0.3880658 -0.03720041) body=femur_r
            SimmMarker thighwand_r: weight=1 location=(0.03696611 -0.2844804 0.1560803) body=femur_r
            SimmMarker upperleg1_r: weight=1 location=(0.05958489 -0.2174382 0.09135399) body=femur_r
            SimmMarker upperleg2_r: weight=1 location=(0.05989178 -0.3040443 0.06858607) body=femur_r
        SimmBody tibia_r: mass=3.276825 mass_center=(0 -0.1746663 0)
            inertia=(0.04641716 0 0 0 0.00469697 0 0 0 0.04706184) meshes=(tibia.vtp fibula.vtp)
          SimmMarkerSet:
            SimmMarker malleolusLat_r: weight=1000 location=(-0.01505143 -0.389141 0.02045175) body=tibia_r
            SimmMarker malleolusMedv_r: weight=1000 location=(0.01837102 -0.3694317 -0.04048319) body=tibia_r
            SimmMarker shankwand_r: weight=1 location=(-0.0136902 -0.2615403 0.118446) body=tibia_r
            SimmMarker lowerleg1_r: weight=1 location=(-0.01104073 -0.2890837 0.04252256) body=tibia_r
            SimmMarker knee_r: weight=1 location=(0.00780469 0.01446053 0.01640967) body=tibia_r
            SimmMarker ankle_r: weight=1000 location=(0.00531085 -0.3866736 -0.01388865) body=tibia_r
        SimmBody patella_r: mass=0.08838367 mass_center=(0 0 0) inertia=(0.00092098 0 0 0 0.00092098 0 0 0 0.00092098)
            meshes=pat.vtp
        SimmBody talus_r: mass=0.08838367 mass_center=(0 0 0) inertia=(0.00092098 0 0 0 0.00092098 0 0 0 0.00092098)
            meshes=talus.vtp
        SimmBody calcn_r: mass=1.104796 mass_center=(0.1040361 0.03121083 0)
            inertia=(0.00128937 0 0 0 0.0035918 0 0 0 0.003776) meshes=foot.vtp
          SimmMarkerSet:
            SimmMarker toe_r: weight=1000 location=(0.1662457 0.02062724 0.02253173) body=calcn_r
            SimmMarker heel_r: weight=1000 location=(-0.00814643 0.02956853 -0.04794058) body=calcn_r
        SimmBody toes_r: mass=0.191439 mass_center=(0.03599649 0.00624217 -0.01820632)
            inertia=(0.0000921 0 0 0 0.0001842 0 0 0 0.00092098) meshes=bofoot.vtp
        SimmBody femur_l: mass=8.220919 mass_center=(0 -0.1774327 0)
            inertia=(0.1233186 0 0 0 0.03232624 0 0 0 0.1300417) meshes=l_femur.vtp
          SimmMarkerSet:
            SimmMarker epicondLat_l: weight=1 location=(0.00825845 -0.4113858 -0.0550833) body=femur_l
            SimmMarker epicondMed_l: weight=1 location=(0.00959873 -0.4046277 0.05626129) body=femur_l
            SimmMarker thighwand_l: weight=1 location=(0.1605533 -0.3027258 -0.00813678) body=femur_l
            SimmMarker upperleg1_l: weight=1 location=(0.08880544 -0.2458942 -0.04310242) body=femur_l
            SimmMarker upperleg2_l: weight=1 location=(0.07184229 -0.3311688 -0.04020156) body=femur_l
        SimmBody tibia_l: mass=3.276825 mass_center=(0 -0.1746663 0)
            inertia=(0.04641716 0 0 0 0.00469697 0 0 0 0.04706184) meshes=(l_tibia.vtp l_fibula.vtp)
          SimmMarkerSet:
            SimmMarker malleolusLat_l: weight=1000 location=(-0.01109024 -0.3921279 -0.01639704) body=tibia_l
            SimmMarker malleolusMedv_l: weight=1000 location=(0.02121315 -0.3762136 0.04172586) body=tibia_l
            SimmMarker shankwand_l: weight=1 location=(0.00239498 -0.2554822 -0.1065515) body=tibia_l
            SimmMarker lowerleg1_l: weight=1 location=(-0.00470892 -0.2916303 -0.03398965) body=tibia_l
            SimmMarker knee_l: weight=1 location=(0.01241505 0.00143375 0.00291198) body=tibia_l
            SimmMarker ankle_l: weight=1000 location=(0.01106559 -0.3911605 0.0156837) body=tibia_l
        SimmBody patella_l: mass=0.08838367 mass_center=(0 0 0) inertia=(0.00092098 0 0 0 0.00092098 0 0 0 0.00092098)
            meshes=l_patella.vtp
        SimmBody talus_l: mass=0.08838367 mass_center=(0 0 0) inertia=(0.00092098 0 0 0 0.00092098 0 0 0 0.00092098)
            meshes=l_talus.vtp
        SimmBody calcn_l: mass=1.104796 mass_center=(0.1040361 0.03121083 0)
            inertia=(0.00128937 0 0 0 0.0035918 0 0 0 0.003776) meshes=l_foot.vtp
          SimmMarkerSet:
            SimmMarker toe_l: weight=1000 location=(0.1694972 0.01798662 -0.02961974) body=calcn_l
            SimmMarker heel_l: weight=1000 location=(-0.00401318 0.02120547 0.04673179) body=calcn_l
        SimmBody toes_l: mass=0.191439 mass_center=(0.03599649 0.00624217 0.01820632)
            inertia=(0.0000921 0 0 0 0.0001842 0 0 0 0.00092098) meshes=l_bofoot.vtp
        SimmBody torso: mass=30.25956 mass_center=(-0.02859606 0.3050246 0)
            inertia=(1.357978 0 0 0 0.6957969 0 0 0 1.318284)
            meshes=(hat_spine.vtp hat_jaw.vtp hat_skull.vtp hat_ribs.vtp)
          SimmMarkerSet:
            SimmMarker subclavicle_r: weight=1 location=(0.02740781 0.3574832 0.04460743) body=torso
            SimmMarker subclavicle_l: weight=1 location=(0.02887966 0.3571912 -0.0636747) body=torso
            SimmMarker neck: weight=1 location=(-0.1060293 0.4227855 -0.00218916) body=torso
            SimmMarker sternalnotch: weight=1 location=(0.01158657 0.364411 -0.00686511) body=torso
            SimmMarker xyphoidprocess: weight=1 location=(0.1037151 0.2060791 -0.01693242) body=torso
      SimmCoordinateSet:
        SimmCoordinate [values shared by the 23 below unless stated]: tolerance=0 stiffness=0 clamped=true
            restraint_active=false default_value=0
          RestraintFunctions
          MinRestraintFunctions
          MaxRestraintFunctions
        SimmCoordinate pelvis_tx: range=(-5 5) default_value=0.12 keys=p_key value=1.536836 weight=1
        SimmCoordinate pelvis_ty: range=(-1 2) default_value=0.93 keys=q_key value=0.9230086 weight=1
        SimmCoordinate pelvis_tz: range=(-3 3) keys=q_key value=-0.2553475 weight=1
        SimmCoordinate pelvis_list: range=(-90 90) keys=q_key value=2.064738 weight=1
        SimmCoordinate pelvis_rotation: range=(-90 90) keys=q_key value=-1.79218 weight=1
        SimmCoordinate pelvis_tilt: range=(-90 90) keys=q_key value=-5.617444 weight=1
        SimmCoordinate hip_flexion_r: range=(-120 120) keys=(h_key leftmouse_button) value=2.185642 weight=1000
        SimmCoordinate hip_adduction_r: range=(-120 120) keys=(h_key leftmouse_button) value=-6.771439 weight=1
        SimmCoordinate hip_rotation_r: range=(-120 120) keys=(h_key leftmouse_button) value=10.88541 weight=1
        SimmCoordinate knee_angle_r: range=(-120 10) keys=k_key value=-0.6604458 weight=1000
        SimmCoordinate ankle_angle_r: range=(-90 90) keys=a_key value=5.063121 weight=1000
        SimmCoordinate subtalar_angle_r: range=(-90 90) keys=a_key value=-5.520353e-5 weight=1000
        SimmCoordinate mtp_angle_r: range=(-90 90) keys=t_key value=0 weight=1000
        SimmCoordinate hip_flexion_l: range=(-120 120) keys=(h_key leftmouse_button) value=-0.3161111 weight=1000
        SimmCoordinate hip_adduction_l: range=(-120 120) keys=(h_key leftmouse_button) value=-1.011725 weight=1
        SimmCoordinate hip_rotation_l: range=(-120 120) keys=(h_key leftmouse_button) value=5.357681 weight=10
        SimmCoordinate knee_angle_l: range=(-120 10) keys=k_key value=-1.032989 weight=1000
        SimmCoordinate ankle_angle_l: range=(-60 60) keys=a_key value=6.667901 weight=1000
        SimmCoordinate subtalar_angle_l: range=(-90 90) keys=a_key value=-6.43639e-5 weight=1000
        SimmCoordinate mtp_angle_l: range=(-60 60) keys=t_key value=0 weight=1000
        SimmCoordinate lumbar_extension: range=(-90 90) keys=q_key value=1.859751 weight=1000
        SimmCoordinate lumbar_bending: range=(-90 90) keys=q_key value=1.971357 weight=1000
        SimmCoordinate lumbar_rotation: range=(-90 90) keys=q_key value=-4.711796 weight=1000
      SimmJointSet:
        SimmJoint ground_pelvis: Bodies=(ground pelvis)
          SimmDofSet:
            SimmTranslationDof tx: DOF_coordinate=pelvis_tx
              Value:
                natCubicSpline: x=(-360 360) y=(-360 360)
            SimmTranslationDof ty: DOF_coordinate=pelvis_ty
              Value:
                natCubicSpline: x=(-360 360) y=(-360 360)
            SimmTranslationDof tz: DOF_coordinate=pelvis_tz
              Value:
                natCubicSpline: x=(-360 360) y=(-360 360)
            SimmRotationDof r1: axis=(0 0 1) DOF_coordinate=pelvis_tilt
              Value:
                natCubicSpline: x=(-360 360) y=(-360 360)
            SimmRotationDof r2: axis=(1 0 0) DOF_coordinate=pelvis_list
              Value:
                natCubicSpline: x=(-360 360) y=(-360 360)
            SimmRotationDof r3: axis=(0 1 0) DOF_coordinate=pelvis_rotation
              Value:
                natCubicSpline: x=(-360 360) y=(-360 360)
        SimmJoint hip_r: Bodies=(pelvis femur_r)
          SimmDofSet:
            SimmTranslationDof tx:
              Value: Constant(value=-0.06579701)
            SimmTranslationDof ty:
              Value: Constant(value=-0.06151602)
            SimmTranslationDof tz:
              Value: Constant(value=0.07770934)
            SimmRotationDof r1: axis=(0 0 1) DOF_coordinate=hip_flexion_r
              Value:
                natCubicSpline: x=(-360 360) y=(-360 360)
            SimmRotationDof r2: axis=(1 0 0) DOF_coordinate=hip_adduction_r
              Value:
                natCubicSpline: x=(-360 360) y=(-360 360)
            SimmRotationDof r3: axis=(0 1 0) DOF_coordinate=hip_rotation_r
              Value:
                natCubicSpline: x=(-360 360) y=(-360 360)
        SimmJoint knee_r: Bodies=(femur_r tibia_r)
          SimmDofSet:
            SimmTranslationDof tx: DOF_coordinate=knee_angle_r
              Value:
                natCubicSpline: x=(-120 -100 -80 -60 -40 -20 -10 11.30699 19.33131 28.08511 87.17325 120)
                    y=(-0.00333991 0.00186826 0.0042897 0.00427926 0.00221269 -0.00104372 -0.00323554 -0.00545553 -0.00567263 -0.0058177 -0.00567263 -0.00547954)
            SimmTranslationDof ty: DOF_coordinate=knee_angle_r
              Value:
                natCubicSpline: x=(-120 -70 -30 -20 -10 9.118541 120)
                    y=(-0.4410768 -0.4260472 -0.4164449 -0.4149837 -0.41394 -0.4125456 -0.4133138)
            SimmTranslationDof tz:
              Value: Constant(value=0)
            SimmRotationDof r1: axis=(0 0 1) DOF_coordinate=knee_angle_r
              Value:
                natCubicSpline: x=(-360 360) y=(-360 360)
            SimmRotationDof r2: axis=(1 0 0)
              Value: Constant(value=0)
            SimmRotationDof r3: axis=(0 1 0)
              Value: Constant(value=0)
        SimmJoint tib_pat_r: Bodies=(tibia_r patella_r)
          SimmDofSet:
            SimmTranslationDof tx: DOF_coordinate=knee_angle_r
              Value:
                natCubicSpline: x=(-120 -80 -60 -40 -20 -10 0 0.01 0.02 5 120)
                    y=(0.01618493 0.03031167 0.03564427 0.04022845 0.04387707 0.04528039 0.04640305 0.04640305 0.04640305 0.04640305 0.04640305)
            SimmTranslationDof ty: DOF_coordinate=knee_angle_r
              Value:
                natCubicSpline: x=(-120 -90 -80 -60 -40 -20 -10 0 0.01 0.02 5 120)
                    y=(-0.02048844 -0.01889801 -0.01871091 -0.01908512 -0.01974001 -0.02048844 -0.02086266 -0.02123688 -0.02123688 -0.02123688 -0.02123688 -0.02123688)
            SimmTranslationDof tz:
              Value: Constant(value=0.00224531)
            SimmRotationDof r1: axis=(0 0 1) DOF_coordinate=knee_angle_r
              Value:
                natCubicSpline: x=(-120 -114.59 -83.51 -30.16 1.6 10) y=(17.65 17.65 17.55 15.48 -2.12 -16.04)
            SimmRotationDof r2: axis=(1 0 0)
              Value: Constant(value=0)
            SimmRotationDof r3: axis=(0 1 0)
              Value: Constant(value=0)
        SimmJoint ankle_r: Bodies=(tibia_r talus_r)
          SimmDofSet:
            SimmTranslationDof tx:
              Value: Constant(value=0)
            SimmTranslationDof ty:
              Value: Constant(value=-0.4022845)
            SimmTranslationDof tz:
              Value: Constant(value=0)
            SimmRotationDof r1: axis=(-0.1050135 -0.1740224 0.9791263) DOF_coordinate=ankle_angle_r
              Value:
                natCubicSpline: x=(-360 360) y=(-360 360)
            SimmRotationDof r2: axis=(1 0 0)
              Value: Constant(value=0)
            SimmRotationDof r3: axis=(0 1 0)
              Value: Constant(value=0)
        SimmJoint subtalar_r: Bodies=(talus_r calcn_r)
          SimmDofSet:
            SimmTranslationDof tx:
              Value: Constant(value=-0.04562654)
            SimmTranslationDof ty:
              Value: Constant(value=-0.03924612)
            SimmTranslationDof tz:
              Value: Constant(value=0.00740952)
            SimmRotationDof r1: axis=(0.7871796 0.6047475 -0.1209495) DOF_coordinate=subtalar_angle_r
              Value:
                natCubicSpline: x=(-360 360) y=(-360 360)
            SimmRotationDof r2: axis=(0 1 0)
              Value: Constant(value=0)
            SimmRotationDof r3: axis=(0 0 1)
              Value: Constant(value=0)
        SimmJoint mtp_r: Bodies=(calcn_r toes_r)
          SimmDofSet:
            SimmTranslationDof tx:
              Value: Constant(value=0.1860166)
            SimmTranslationDof ty:
              Value: Constant(value=-0.00208072)
            SimmTranslationDof tz:
              Value: Constant(value=0.00112359)
            SimmRotationDof r1: axis=(-0.5809544 0 0.8139361) DOF_coordinate=mtp_angle_r
              Value:
                natCubicSpline: x=(-360 360) y=(-360 360)
            SimmRotationDof r2: axis=(1 0 0)
              Value: Constant(value=0)
            SimmRotationDof r3: axis=(0 1 0)
              Value: Constant(value=0)
        SimmJoint hip_l: Bodies=(pelvis femur_l)
          SimmDofSet:
            SimmTranslationDof tx:
              Value: Constant(value=-0.06579701)
            SimmTranslationDof ty:
              Value: Constant(value=-0.06151602)
            SimmTranslationDof tz:
              Value: Constant(value=-0.07770934)
            SimmRotationDof r1: axis=(0 0 1) DOF_coordinate=hip_flexion_l
              Value:
                natCubicSpline: x=(-360 360) y=(-360 360)
            SimmRotationDof r2: axis=(-1 0 0) DOF_coordinate=hip_adduction_l
              Value:
                natCubicSpline: x=(-360 360) y=(-360 360)
            SimmRotationDof r3: axis=(0 -1 0) DOF_coordinate=hip_rotation_l
              Value:
                natCubicSpline: x=(-360 360) y=(-360 360)
        SimmJoint knee_l: Bodies=(femur_l tibia_l)
          SimmDofSet:
            SimmTranslationDof tx: DOF_coordinate=knee_angle_l
              Value:
                natCubicSpline: x=(-120 -100 -80 -60 -40 -20 -10 11.30699 19.33131 28.08511 87.17325 120)
                    y=(-0.00333991 0.00186826 0.0042897 0.00427926 0.00221269 -0.00104372 -0.00323554 -0.00545553 -0.00567263 -0.0058177 -0.00567263 -0.00547954)
            SimmTranslationDof ty: DOF_coordinate=knee_angle_l
              Value:
                natCubicSpline: x=(-120 -70 -30 -20 -10 9.118541 120)
                    y=(-0.4410768 -0.4260472 -0.4164449 -0.4149837 -0.41394 -0.4125456 -0.4133138)
            SimmTranslationDof tz:
              Value: Constant(value=0)
            SimmRotationDof r1: axis=(0 0 1) DOF_coordinate=knee_angle_l
              Value:
                natCubicSpline: x=(-360 360) y=(-360 360)
            SimmRotationDof r2: axis=(1 0 0)
              Value: Constant(value=0)
            SimmRotationDof r3: axis=(0 1 0)
              Value: Constant(value=0)
        SimmJoint tib_pat_l: Bodies=(tibia_l patella_l)
          SimmDofSet:
            SimmTranslationDof tx: DOF_coordinate=knee_angle_l
              Value:
                natCubicSpline: x=(-120 -80 -60 -40 -20 -10 0 0.01 0.02 5 120)
                    y=(0.01618493 0.03031167 0.03564427 0.04022845 0.04387707 0.04528039 0.04640305 0.04640305 0.04640305 0.04640305 0.04640305)
            SimmTranslationDof ty: DOF_coordinate=knee_angle_l
              Value:
                natCubicSpline: x=(-120 -90 -80 -60 -40 -20 -10 0 0.01 0.02 5 120)
                    y=(-0.02048844 -0.01889801 -0.01871091 -0.01908512 -0.01974001 -0.02048844 -0.02086266 -0.02123688 -0.02123688 -0.02123688 -0.02123688 -0.02123688)
            SimmTranslationDof tz:
              Value: Constant(value=-0.00224531)
            SimmRotationDof r1: axis=(0 0 1) DOF_coordinate=knee_angle_l
              Value:
                natCubicSpline: x=(-120 -114.59 -83.51 -30.16 1.6 10) y=(17.65 17.65 17.55 15.48 -2.12 -16.04)
            SimmRotationDof r2: axis=(1 0 0)
              Value: Constant(value=0)
            SimmRotationDof r3: axis=(0 1 0)
              Value: Constant(value=0)
        SimmJoint ankle_l: Bodies=(tibia_l talus_l)
          SimmDofSet:
            SimmTranslationDof tx:
              Value: Constant(value=0)
            SimmTranslationDof ty:
              Value: Constant(value=-0.4022845)
            SimmTranslationDof tz:
              Value: Constant(value=0)
            SimmRotationDof r1: axis=(0.1050135 -0.1740224 0.9791263) DOF_coordinate=ankle_angle_l
              Value:
                natCubicSpline: x=(-360 360) y=(-360 360)
            SimmRotationDof r2: axis=(1 0 0)
              Value: Constant(value=0)
            SimmRotationDof r3: axis=(0 1 0)
              Value: Constant(value=0)
        SimmJoint subtalar_l: Bodies=(talus_l calcn_l)
          SimmDofSet:
            SimmTranslationDof tx:
              Value: Constant(value=-0.04562654)
            SimmTranslationDof ty:
              Value: Constant(value=-0.03924612)
            SimmTranslationDof tz:
              Value: Constant(value=-0.00740952)
            SimmRotationDof r1: axis=(-0.7871796 -0.6047475 -0.1209495) DOF_coordinate=subtalar_angle_l
              Value:
                natCubicSpline: x=(-360 360) y=(-360 360)
            SimmRotationDof r2: axis=(0 1 0)
              Value: Constant(value=0)
            SimmRotationDof r3: axis=(0 0 1)
              Value: Constant(value=0)
        SimmJoint mtp_l: Bodies=(calcn_l toes_l)
          SimmDofSet:
            SimmTranslationDof tx:
              Value: Constant(value=0.1860166)
            SimmTranslationDof ty:
              Value: Constant(value=-0.00208072)
            SimmTranslationDof tz:
              Value: Constant(value=-0.00112359)
            SimmRotationDof r1: axis=(0.5809544 0 0.8139361) DOF_coordinate=mtp_angle_l
              Value:
                natCubicSpline: x=(-360 360) y=(-360 360)
            SimmRotationDof r2: axis=(1 0 0)
              Value: Constant(value=0)
            SimmRotationDof r3: axis=(0 1 0)
              Value: Constant(value=0)
        SimmJoint back: Bodies=(pelvis torso)
          SimmDofSet:
            SimmTranslationDof tx:
              Value: Constant(value=-0.09371654)
            SimmTranslationDof ty:
              Value: Constant(value=0.07584804)
            SimmTranslationDof tz:
              Value: Constant(value=0)
            SimmRotationDof r1: axis=(0 0 1) DOF_coordinate=lumbar_extension
              Value:
                natCubicSpline: x=(-360 360) y=(-360 360)
            SimmRotationDof r2: axis=(1 0 0) DOF_coordinate=lumbar_bending
              Value:
                natCubicSpline: x=(-360 360) y=(-360 360)
            SimmRotationDof r3: axis=(0 1 0) DOF_coordinate=lumbar_rotation
              Value:
                natCubicSpline: x=(-360 360) y=(-360 360)
