AbstractModel 3DGaitModelSimple:
  gravity: 0 -9.80665 0
  ActuatorSet:
    SimmZajacHill [values shared by the 54 below unless stated]: max_contraction_velocity=10 muscle_model=9
        timescale=0.1 damping=0.05 activation_time_constant=0.01 deactivation_time_constant=0.04 Af=0.3 Flen=1.8
        Vmax=10 Vmax0=5 FmaxTendonStrain=0.033 FmaxMuscleStrain=0.6 KshapeActive=0.5 KshapePassive=4
        muscle_density=1056 max_isometric_stress=350000
      tendon_force_length_curve: natCubicSpline: x=(-10 -0.002 -0.001 0 0.00131 0.00281 0.00431 0.00581 0.00731 0.00881 0.0103 0.0118 0.0123 9.2 9.201 9.202 20)
          y=(0 0 0 0 0.0108 0.0257 0.0435 0.0652 0.0915 0.123 0.161 0.208 0.227 345 345 345 345)
      active_force_length_curve: natCubicSpline: x=(-5.307692 -4.307692 -1.923077 -0.884615 -0.269231 0.230769 0.461538 0.52725 0.62875 0.71875 0.86125 1.045 1.2175 1.43875 1.5 1.615385 2 2.961538 3.692308 5.461538 9.901902)
          y=(0.012188 0.021899 0.036466 0.052493 0.075312 0.114158 0.157859 0.226667 0.636667 0.856667 0.95 0.993333 0.77 0.246667 0.193821 0.133252 0.072683 0.044417 0.036341 0.021899 0.007332)
      passive_force_length_curve: natCubicSpline: x=(-5 0.998 0.999 1 1.1 1.2 1.3 1.4 1.5 1.6 1.601 1.602 5)
          y=(0 0 0 0 0.035 0.12 0.26 0.55 1.17 2 2 2 2)
      force_velocity_curve: natCubicSpline: x=(-1 -0.95 -0.9 -0.85 -0.8 -0.75 -0.7 -0.65 -0.6 -0.55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)
          y=(0 0.010417 0.021739 0.034091 0.047619 0.0625 0.078947 0.097222 0.117647 0.140625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)
    SimmZajacHill glut_med1_r: max_isometric_force=1119 optimal_fiber_length=0.0535 tendon_slack_length=0.078
        pennation_angle=8 groups=(R_hip_abd R_hip_flex R_hip_inrot)
      SimmMusclePointSet:
        SimmMusclePoint: location=(-0.0408 0.0304 0.1209) body=pelvis
        SimmMusclePoint: location=(-0.0218 -0.0117 0.0555) body=femur_r
    SimmZajacHill glut_med2_r: max_isometric_force=873 optimal_fiber_length=0.0845 tendon_slack_length=0.053
        pennation_angle=0 groups=R_hip_abd
      SimmMusclePointSet:
        SimmMusclePoint: location=(-0.0855 0.0445 0.0766) body=pelvis
        SimmMusclePoint: location=(-0.0258 -0.0058 0.0527) body=femur_r
    SimmZajacHill glut_med3_r: max_isometric_force=1000 optimal_fiber_length=0.0646 tendon_slack_length=0.053
        pennation_angle=19 groups=(R_hip_abd R_hip_exrot R_hip_ext)
      SimmMusclePointSet:
        SimmMusclePoint: location=(-0.1223 0.0105 0.0648) body=pelvis
        SimmMusclePoint: location=(-0.0309 -0.0047 0.0518) body=femur_r
    SimmZajacHill bifemlh_r: max_isometric_force=2700 optimal_fiber_length=0.109 tendon_slack_length=0.326
        pennation_angle=0 groups=(R_hip_ext R_hip_add R_knee_bend)
      SimmMusclePointSet:
        SimmMusclePoint: location=(-0.12596 -0.10257 0.06944) body=pelvis
        SimmMusclePoint: location=(-0.0301 -0.036 0.02943) body=tibia_r
        SimmMusclePoint: location=(-0.0234 -0.0563 0.0343) body=tibia_r
    SimmZajacHill bifemsh_r: max_isometric_force=804 optimal_fiber_length=0.173 tendon_slack_length=0.089
        pennation_angle=23 groups=R_knee_bend
      SimmMusclePointSet:
        SimmMusclePoint: location=(0.005 -0.2111 0.0234) body=femur_r
        SimmMusclePoint: location=(-0.0301 -0.036 0.02943) body=tibia_r
        SimmMusclePoint: location=(-0.0234 -0.0563 0.0343) body=tibia_r
    SimmZajacHill sar_r: max_isometric_force=156 optimal_fiber_length=0.52 tendon_slack_length=0.1 pennation_angle=0
        groups=(R_hip_flex R_hip_abd R_knee_bend)
      SimmMusclePointSet:
        SimmMusclePoint: location=(-0.0153 -0.0013 0.1242) body=pelvis
        SimmMusclePoint: location=(-0.003 -0.3568 -0.0421) body=femur_r
        SimmMusclePoint: location=(-0.0056 -0.0419 -0.0399) body=tibia_r
        SimmMusclePoint: location=(0.006 -0.0589 -0.0383) body=tibia_r
        SimmMusclePoint: location=(0.0243 -0.084 -0.0252) body=tibia_r
    SimmZajacHill add_mag2_r: max_isometric_force=2343 optimal_fiber_length=0.121 tendon_slack_length=0.12
        pennation_angle=3 groups=(R_hip_ext R_hip_add)
      SimmMusclePointSet:
        SimmMusclePoint: location=(-0.0831 -0.1192 0.0308) body=pelvis
        SimmMusclePoint: location=(0.0054 -0.2285 0.0227) body=femur_r
    SimmZajacHill tfl_r: max_isometric_force=233 optimal_fiber_length=0.095 tendon_slack_length=0.425 pennation_angle=3
        groups=(R_hip_abd R_hip_flex R_hip_inrot)
      SimmMusclePointSet:
        SimmMusclePoint: location=(-0.0311 0.0214 0.1241) body=pelvis
        SimmMusclePoint: location=(0.0294 -0.0995 0.0597) body=femur_r
        SimmMusclePoint: location=(0.0054 -0.4049 0.0357) body=femur_r
        SimmMusclePoint: location=(0.006 -0.0487 0.0297) body=tibia_r
    SimmZajacHill pect_r: max_isometric_force=266 optimal_fiber_length=0.1 tendon_slack_length=0.033 pennation_angle=0
        groups=(R_hip_add R_hip_flex)
      SimmMusclePointSet:
        SimmMusclePoint: location=(-0.0431 -0.0768 0.0451) body=pelvis
        SimmMusclePoint: location=(-0.0122 -0.0822 0.0253) body=femur_r
    SimmZajacHill grac_r: max_isometric_force=162 optimal_fiber_length=0.352 tendon_slack_length=0.126
        pennation_angle=3 groups=(R_hip_add R_knee_bend R_hip_flex)
      SimmMusclePointSet:
        SimmMusclePoint: location=(-0.07401 -0.1187 0.02794) body=pelvis
        SimmMuscleViaPoint: location=(-0.02657 -0.0319 -0.03774) body=tibia_r coordinate=knee_angle_r range=(-25 10)
        SimmMusclePoint: location=(-0.01943 -0.05153 -0.0358) body=tibia_r
        SimmMusclePoint: location=(0.006 -0.0836 -0.0228) body=tibia_r
    SimmZajacHill glut_max1_r: max_isometric_force=573 optimal_fiber_length=0.142 tendon_slack_length=0.125
        pennation_angle=5 groups=(R_hip_ext R_hip_abd)
      SimmMusclePointSet:
        SimmMusclePoint: location=(-0.1195 0.0612 0.07) body=pelvis
        SimmMusclePoint: location=(-0.1291 0.0012 0.0886) body=pelvis
        SimmMusclePoint: location=(-0.0457 -0.0248 0.0392) body=femur_r
        SimmMusclePoint: location=(-0.0277 -0.0566 0.047) body=femur_r
    SimmZajacHill glut_max2_r: max_isometric_force=819 optimal_fiber_length=0.147 tendon_slack_length=0.127
        pennation_angle=0 groups=R_hip_ext
      SimmMusclePointSet:
        SimmMusclePoint: location=(-0.1349 0.0176 0.0563) body=pelvis
        SimmMusclePoint: location=(-0.1376 -0.052 0.0914) body=pelvis
        SimmMusclePoint: location=(-0.0426 -0.053 0.0293) body=femur_r
        SimmMusclePoint: location=(-0.0156 -0.1016 0.0419) body=femur_r
    SimmZajacHill glut_max3_r: max_isometric_force=552 optimal_fiber_length=0.144 tendon_slack_length=0.145
        pennation_angle=5 groups=R_hip_ext
      SimmMusclePointSet:
        SimmMusclePoint: location=(-0.1556 -0.0314 0.0058) body=pelvis
        SimmMusclePoint: location=(-0.1529 -0.1052 0.0403) body=pelvis
        SimmMusclePoint: location=(-0.0299 -0.1041 0.0135) body=femur_r
        SimmMusclePoint: location=(-0.006 -0.1419 0.0411) body=femur_r
    SimmZajacHill iliacus_r: max_isometric_force=1073 optimal_fiber_length=0.1 tendon_slack_length=0.1
        pennation_angle=7 groups=(R_hip_flex R_hip_inrot)
      SimmMusclePointSet:
        SimmMusclePoint: location=(-0.0674 0.0365 0.0854) body=pelvis
        SimmMusclePoint: location=(-0.0258 -0.055 0.0811) body=pelvis
        SimmMuscleViaPoint: location=(-0.0288 -0.0805 0.0816) body=pelvis coordinate=hip_flexion_r range=(-90 45)
        SimmMusclePoint: location=(0.0017 -0.0543 0.0057) body=femur_r
        SimmMusclePoint: location=(-0.0193 -0.0621 0.0129) body=femur_r
    SimmZajacHill psoas_r: max_isometric_force=1113 optimal_fiber_length=0.1 tendon_slack_length=0.16 pennation_angle=8
        groups=(R_hip_flex R_hip_inrot)
      SimmMusclePointSet:
        SimmMusclePoint: location=(-0.0647 0.0887 0.0289) body=pelvis
        SimmMusclePoint: location=(-0.0238 -0.057 0.0759) body=pelvis
        SimmMuscleViaPoint: location=(-0.0288 -0.0805 0.0816) body=pelvis coordinate=hip_flexion_r range=(-90 45)
        SimmMusclePoint: location=(0.0016 -0.0507 0.0038) body=femur_r
        SimmMusclePoint: location=(-0.0188 -0.0597 0.0104) body=femur_r
    SimmZajacHill quad_fem_r: max_isometric_force=381 optimal_fiber_length=0.054 tendon_slack_length=0.024
        pennation_angle=0 groups=R_hip_exrot
      SimmMusclePointSet:
        SimmMusclePoint: location=(-0.1143 -0.1151 0.052) body=pelvis
        SimmMusclePoint: location=(-0.0381 -0.0359 0.0366) body=femur_r
    SimmZajacHill gem_r: max_isometric_force=164 optimal_fiber_length=0.024 tendon_slack_length=0.039 pennation_angle=0
        groups=R_hip_exrot
      SimmMusclePointSet:
        SimmMusclePoint: location=(-0.1133 -0.082 0.0714) body=pelvis
        SimmMusclePoint: location=(-0.0142 -0.0033 0.0443) body=femur_r
    SimmZajacHill peri_r: max_isometric_force=444 optimal_fiber_length=0.026 tendon_slack_length=0.115
        pennation_angle=10 groups=(R_hip_exrot R_hip_abd)
      SimmMusclePointSet:
        SimmMusclePoint: location=(-0.1396 0.0003 0.0235) body=pelvis
        SimmMusclePoint: location=(-0.1193 -0.0276 0.0657) body=pelvis
        SimmMusclePoint: location=(-0.0148 -0.0036 0.0437) body=femur_r
    SimmZajacHill rect_fem_r: max_isometric_force=1169 optimal_fiber_length=0.114 tendon_slack_length=0.31
        pennation_angle=5 groups=(R_hip_flex R_knee_ext)
      SimmMusclePointSet:
        SimmMusclePoint: location=(-0.0295 -0.0311 0.0968) body=pelvis
        SimmMuscleViaPoint: location=(0.0334 -0.403 0.0019) body=femur_r coordinate=knee_angle_r range=(-150 -83.65)
        SimmMusclePoint: location=(0.0121 0.0437 -0.001) body=patella_r
    SimmZajacHill vas_int_r: max_isometric_force=5000 optimal_fiber_length=0.107 tendon_slack_length=0.116
        pennation_angle=3 groups=R_knee_ext
      SimmMusclePointSet:
        SimmMusclePoint: location=(0.029 -0.1924 0.031) body=femur_r
        SimmMusclePoint: location=(0.0335 -0.2084 0.0285) body=femur_r
        SimmMuscleViaPoint: location=(0.0343 -0.403 0.0055) body=femur_r coordinate=knee_angle_r range=(-150 -81.36)
        SimmMusclePoint: location=(0.0058 0.048 -0.0006) body=patella_r
    SimmZajacHill med_gas_r: max_isometric_force=2500 optimal_fiber_length=0.09 tendon_slack_length=0.36
        pennation_angle=17 groups=(R_knee_bend R_ankle_pf)
      SimmMusclePointSet:
        SimmMusclePoint: location=(-0.019 -0.3929 -0.0235) body=femur_r
        SimmMuscleViaPoint: location=(-0.03 -0.4022 -0.0258) body=femur_r coordinate=knee_angle_r range=(-45 10)
        SimmMusclePoint: location=(0 0.031 -0.0053) body=calcn_r
    SimmZajacHill soleus_r: max_isometric_force=4000 optimal_fiber_length=0.08 tendon_slack_length=0.22
        pennation_angle=25 groups=R_ankle_pf
      SimmMusclePointSet:
        SimmMusclePoint: location=(-0.0024 -0.1533 0.0071) body=tibia_r
        SimmMusclePoint: location=(0 0.031 -0.0053) body=calcn_r
    SimmZajacHill tib_post_r: max_isometric_force=3600 optimal_fiber_length=0.031 tendon_slack_length=0.31
        pennation_angle=12 groups=(R_ankle_pf R_inverter)
      SimmMusclePointSet:
        SimmMusclePoint: location=(-0.0094 -0.1348 0.0019) body=tibia_r
        SimmMusclePoint: location=(-0.0144 -0.4051 -0.0229) body=tibia_r
        SimmMusclePoint: location=(0.0417 0.0334 -0.0286) body=calcn_r
        SimmMusclePoint: location=(0.0772 0.0159 -0.0281) body=calcn_r
    SimmZajacHill tib_ant_r: max_isometric_force=3000 optimal_fiber_length=0.098 tendon_slack_length=0.223
        pennation_angle=5 groups=(R_ankle_df R_inverter)
      SimmMusclePointSet:
        SimmMusclePoint: location=(0.0179 -0.1624 0.0115) body=tibia_r
        SimmMusclePoint: location=(0.0329 -0.3951 -0.0177) body=tibia_r
        SimmMusclePoint: location=(0.1166 0.0178 -0.0305) body=calcn_r
    SimmZajacHill glut_med1_l: max_isometric_force=1119 optimal_fiber_length=0.0535 tendon_slack_length=0.078
        pennation_angle=8 groups=(L_hip_abd L_hip_flex L_hip_inrot)
      SimmMusclePointSet:
        SimmMusclePoint: location=(-0.0408 0.0304 -0.1209) body=pelvis
        SimmMusclePoint: location=(-0.0218 -0.0117 -0.0555) body=femur_l
    SimmZajacHill glut_med2_l: max_isometric_force=873 optimal_fiber_length=0.0845 tendon_slack_length=0.053
        pennation_angle=0 groups=L_hip_abd
      SimmMusclePointSet:
        SimmMusclePoint: location=(-0.0855 0.0445 -0.0766) body=pelvis
        SimmMusclePoint: location=(-0.0258 -0.0058 -0.0527) body=femur_l
    SimmZajacHill glut_med3_l: max_isometric_force=1000 optimal_fiber_length=0.0646 tendon_slack_length=0.053
        pennation_angle=19 groups=(L_hip_abd L_hip_exrot L_hip_ext)
      SimmMusclePointSet:
        SimmMusclePoint: location=(-0.1223 0.0105 -0.0648) body=pelvis
        SimmMusclePoint: location=(-0.0309 -0.0047 -0.0518) body=femur_l
    SimmZajacHill bifemlh_l: max_isometric_force=2700 optimal_fiber_length=0.109 tendon_slack_length=0.326
        pennation_angle=0 groups=(L_hip_ext L_hip_add L_knee_bend)
      SimmMusclePointSet:
        SimmMusclePoint: location=(-0.12596 -0.10257 -0.06944) body=pelvis
        SimmMusclePoint: location=(-0.0301 -0.036 -0.02943) body=tibia_l
        SimmMusclePoint: location=(-0.0234 -0.0563 -0.0343) body=tibia_l
    SimmZajacHill bifemsh_l: max_isometric_force=804 optimal_fiber_length=0.173 tendon_slack_length=0.089
        pennation_angle=23 groups=L_knee_bend
      SimmMusclePointSet:
        SimmMusclePoint: location=(0.005 -0.2111 -0.0234) body=femur_l
        SimmMusclePoint: location=(-0.0301 -0.036 -0.02943) body=tibia_l
        SimmMusclePoint: location=(-0.0234 -0.0563 -0.0343) body=tibia_l
    SimmZajacHill sar_l: max_isometric_force=156 optimal_fiber_length=0.52 tendon_slack_length=0.1 pennation_angle=0
        groups=(L_hip_flex L_hip_abd L_knee_bend)
      SimmMusclePointSet:
        SimmMusclePoint: location=(-0.0153 -0.0013 -0.1242) body=pelvis
        SimmMusclePoint: location=(-0.003 -0.3568 0.0421) body=femur_l
        SimmMusclePoint: location=(-0.0056 -0.0419 0.0399) body=tibia_l
        SimmMusclePoint: location=(0.006 -0.0589 0.0383) body=tibia_l
        SimmMusclePoint: location=(0.0243 -0.084 0.0252) body=tibia_l
    SimmZajacHill add_mag2_l: max_isometric_force=2343 optimal_fiber_length=0.121 tendon_slack_length=0.12
        pennation_angle=3 groups=(L_hip_ext L_hip_add)
      SimmMusclePointSet:
        SimmMusclePoint: location=(-0.0831 -0.1192 -0.0308) body=pelvis
        SimmMusclePoint: location=(0.0054 -0.2285 -0.0227) body=femur_l
    SimmZajacHill tfl_l: max_isometric_force=233 optimal_fiber_length=0.095 tendon_slack_length=0.425 pennation_angle=3
        groups=(L_hip_abd L_hip_flex L_hip_inrot)
      SimmMusclePointSet:
        SimmMusclePoint: location=(-0.0311 0.0214 -0.1241) body=pelvis
        SimmMusclePoint: location=(0.0294 -0.0995 -0.0597) body=femur_l
        SimmMusclePoint: location=(0.0054 -0.4049 -0.0357) body=femur_l
        SimmMusclePoint: location=(0.006 -0.0487 -0.0297) body=tibia_l
    SimmZajacHill pect_l: max_isometric_force=266 optimal_fiber_length=0.1 tendon_slack_length=0.033 pennation_angle=0
        groups=(L_hip_add L_hip_flex)
      SimmMusclePointSet:
        SimmMusclePoint: location=(-0.0431 -0.0768 -0.0451) body=pelvis
        SimmMusclePoint: location=(-0.0122 -0.0822 -0.0253) body=femur_l
    SimmZajacHill grac_l: max_isometric_force=162 optimal_fiber_length=0.352 tendon_slack_length=0.126
        pennation_angle=3 groups=(L_hip_add L_knee_bend L_hip_flex)
      SimmMusclePointSet:
        SimmMusclePoint: location=(-0.07401 -0.1187 -0.02794) body=pelvis
        SimmMuscleViaPoint: location=(-0.02657 -0.0319 0.03774) body=tibia_l coordinate=knee_angle_l range=(-25 10)
        SimmMusclePoint: location=(-0.01943 -0.05153 0.0358) body=tibia_l
        SimmMusclePoint: location=(0.006 -0.0836 0.0228) body=tibia_l
    SimmZajacHill glut_max1_l: max_isometric_force=573 optimal_fiber_length=0.142 tendon_slack_length=0.125
        pennation_angle=5 groups=(L_hip_ext L_hip_abd)
      SimmMusclePointSet:
        SimmMusclePoint: location=(-0.1195 0.0612 -0.07) body=pelvis
        SimmMusclePoint: location=(-0.1291 0.0012 -0.0886) body=pelvis
        SimmMusclePoint: location=(-0.0457 -0.0248 -0.0392) body=femur_l
        SimmMusclePoint: location=(-0.0277 -0.0566 -0.047) body=femur_l
    SimmZajacHill glut_max2_l: max_isometric_force=819 optimal_fiber_length=0.147 tendon_slack_length=0.127
        pennation_angle=0 groups=L_hip_ext
      SimmMusclePointSet:
        SimmMusclePoint: location=(-0.1349 0.0176 -0.0563) body=pelvis
        SimmMusclePoint: location=(-0.1376 -0.052 -0.0914) body=pelvis
        SimmMusclePoint: location=(-0.0426 -0.053 -0.0293) body=femur_l
        SimmMusclePoint: location=(-0.0156 -0.1016 -0.0419) body=femur_l
    SimmZajacHill glut_max3_l: max_isometric_force=552 optimal_fiber_length=0.144 tendon_slack_length=0.145
        pennation_angle=5 groups=L_hip_ext
      SimmMusclePointSet:
        SimmMusclePoint: location=(-0.1556 -0.0314 -0.0058) body=pelvis
        SimmMusclePoint: location=(-0.1529 -0.1052 -0.0403) body=pelvis
        SimmMusclePoint: location=(-0.0299 -0.1041 -0.0135) body=femur_l
        SimmMusclePoint: location=(-0.006 -0.1419 -0.0411) body=femur_l
    SimmZajacHill iliacus_l: max_isometric_force=1073 optimal_fiber_length=0.1 tendon_slack_length=0.1
        pennation_angle=7 groups=(L_hip_flex L_hip_inrot)
      SimmMusclePointSet:
        SimmMusclePoint: location=(-0.0674 0.0365 -0.0854) body=pelvis
        SimmMusclePoint: location=(-0.0258 -0.055 -0.0811) body=pelvis
        SimmMuscleViaPoint: location=(-0.0288 -0.0805 -0.0816) body=pelvis coordinate=hip_flexion_l range=(-90 45)
        SimmMusclePoint: location=(0.0017 -0.0543 -0.0057) body=femur_l
        SimmMusclePoint: location=(-0.0193 -0.0621 -0.0129) body=femur_l
    SimmZajacHill psoas_l: max_isometric_force=1113 optimal_fiber_length=0.1 tendon_slack_length=0.16 pennation_angle=8
        groups=(L_hip_flex L_hip_inrot)
      SimmMusclePointSet:
        SimmMusclePoint: location=(-0.0647 0.0887 -0.0289) body=pelvis
        SimmMusclePoint: location=(-0.0238 -0.057 -0.0759) body=pelvis
        SimmMuscleViaPoint: location=(-0.0288 -0.0805 -0.0816) body=pelvis coordinate=hip_flexion_l range=(-90 45)
        SimmMusclePoint: location=(0.0016 -0.0507 -0.0038) body=femur_l
        SimmMusclePoint: location=(-0.0188 -0.0597 -0.0104) body=femur_l
    SimmZajacHill quad_fem_l: max_isometric_force=381 optimal_fiber_length=0.054 tendon_slack_length=0.024
        pennation_angle=0 groups=L_hip_exrot
      SimmMusclePointSet:
        SimmMusclePoint: location=(-0.1143 -0.1151 -0.052) body=pelvis
        SimmMusclePoint: location=(-0.0381 -0.0359 -0.0366) body=femur_l
    SimmZajacHill gem_l: max_isometric_force=164 optimal_fiber_length=0.024 tendon_slack_length=0.039 pennation_angle=0
        groups=L_hip_exrot
      SimmMusclePointSet:
        SimmMusclePoint: location=(-0.1133 -0.082 -0.0714) body=pelvis
        SimmMusclePoint: location=(-0.0142 -0.0033 -0.0443) body=femur_l
    SimmZajacHill peri_l: max_isometric_force=444 optimal_fiber_length=0.026 tendon_slack_length=0.115
        pennation_angle=10 groups=(L_hip_exrot L_hip_abd)
      SimmMusclePointSet:
        SimmMusclePoint: location=(-0.1396 0.0003 -0.0235) body=pelvis
        SimmMusclePoint: location=(-0.1193 -0.0276 -0.0657) body=pelvis
        SimmMusclePoint: location=(-0.0148 -0.0036 -0.0437) body=femur_l
    SimmZajacHill rect_fem_l: max_isometric_force=1169 optimal_fiber_length=0.114 tendon_slack_length=0.31
        pennation_angle=5 groups=(L_hip_flex L_knee_ext)
      SimmMusclePointSet:
        SimmMusclePoint: location=(-0.0295 -0.0311 -0.0968) body=pelvis
        SimmMuscleViaPoint: location=(0.0334 -0.403 -0.0019) body=femur_l coordinate=knee_angle_l range=(-150 -83.65)
        SimmMusclePoint: location=(0.0121 0.0437 0.001) body=patella_l
    SimmZajacHill vas_int_l: max_isometric_force=5000 optimal_fiber_length=0.107 tendon_slack_length=0.116
        pennation_angle=3 groups=L_knee_ext
      SimmMusclePointSet:
        SimmMusclePoint: location=(0.029 -0.1924 -0.031) body=femur_l
        SimmMusclePoint: location=(0.0335 -0.2084 -0.0285) body=femur_l
        SimmMuscleViaPoint: location=(0.0343 -0.403 -0.0055) body=femur_l coordinate=knee_angle_l range=(-150 -81.36)
        SimmMusclePoint: location=(0.0058 0.048 0.0006) body=patella_l
    SimmZajacHill med_gas_l: max_isometric_force=2500 optimal_fiber_length=0.09 tendon_slack_length=0.36
        pennation_angle=17 groups=(L_knee_bend L_ankle_pf)
      SimmMusclePointSet:
        SimmMusclePoint: location=(-0.019 -0.3929 0.0235) body=femur_l
        SimmMuscleViaPoint: location=(-0.03 -0.4022 0.0258) body=femur_l coordinate=knee_angle_l range=(-45 10)
        SimmMusclePoint: location=(0 0.031 0.0053) body=calcn_l
    SimmZajacHill soleus_l: max_isometric_force=4000 optimal_fiber_length=0.08 tendon_slack_length=0.22
        pennation_angle=25 groups=L_ankle_pf
      SimmMusclePointSet:
        SimmMusclePoint: location=(-0.0024 -0.1533 -0.0071) body=tibia_l
        SimmMusclePoint: location=(0 0.031 0.0053) body=calcn_l
    SimmZajacHill tib_post_l: max_isometric_force=3600 optimal_fiber_length=0.031 tendon_slack_length=0.31
        pennation_angle=12 groups=(L_ankle_pf L_inverter)
      SimmMusclePointSet:
        SimmMusclePoint: location=(-0.0094 -0.1348 -0.0019) body=tibia_l
        SimmMusclePoint: location=(-0.0144 -0.4051 0.0229) body=tibia_l
        SimmMusclePoint: location=(0.0417 0.0334 0.0286) body=calcn_l
        SimmMusclePoint: location=(0.0772 0.0159 0.0281) body=calcn_l
    SimmZajacHill tib_ant_l: max_isometric_force=3000 optimal_fiber_length=0.098 tendon_slack_length=0.223
        pennation_angle=5 groups=(L_ankle_df L_inverter)
      SimmMusclePointSet:
        SimmMusclePoint: location=(0.0179 -0.1624 -0.0115) body=tibia_l
        SimmMusclePoint: location=(0.0329 -0.3951 0.0177) body=tibia_l
        SimmMusclePoint: location=(0.1166 0.0178 0.0305) body=calcn_l
    SimmZajacHill ercspn_r: max_isometric_force=2500 optimal_fiber_length=0.12 tendon_slack_length=0.03
        pennation_angle=0 groups=(back_ext back_rlb back_introt)
      SimmMusclePointSet:
        SimmMusclePoint: location=(-0.14 0.0439 0.0436) body=pelvis
        SimmMusclePoint: location=(-0.055 0.11 0.0241) body=torso
    SimmZajacHill ercspn_l: max_isometric_force=2500 optimal_fiber_length=0.12 tendon_slack_length=0.03
        pennation_angle=0 groups=(back_ext back_llb back_extrot)
      SimmMusclePointSet:
        SimmMusclePoint: location=(-0.14 0.0439 -0.0436) body=pelvis
        SimmMusclePoint: location=(-0.055 0.11 -0.0241) body=torso
    SimmZajacHill intobl_r: max_isometric_force=900 optimal_fiber_length=0.1 tendon_slack_length=0.1 pennation_angle=0
        groups=(back_introt back_flex back_rlb)
      SimmMusclePointSet:
        SimmMusclePoint: location=(-0.04 0.07 0.1157) body=pelvis
        SimmMusclePoint: location=(0.07 0.16 0.015) body=torso
    SimmZajacHill intobl_l: max_isometric_force=900 optimal_fiber_length=0.1 tendon_slack_length=0.1 pennation_angle=0
        groups=(back_extrot back_flex back_llb)
      SimmMusclePointSet:
        SimmMusclePoint: location=(-0.04 0.07 -0.1157) body=pelvis
        SimmMusclePoint: location=(0.07 0.16 -0.015) body=torso
    SimmZajacHill extobl_r: max_isometric_force=900 optimal_fiber_length=0.12 tendon_slack_length=0.14
        pennation_angle=0 groups=(back_extrot back_flex back_rlb)
      SimmMusclePointSet:
        SimmMusclePoint: location=(-0.03 -0.0636 0.01) body=pelvis
        SimmMusclePoint: location=(0.065 0.11 0.11) body=torso
    SimmZajacHill extobl_l: max_isometric_force=900 optimal_fiber_length=0.12 tendon_slack_length=0.14
        pennation_angle=0 groups=(back_introt back_flex back_llb)
      SimmMusclePointSet:
        SimmMusclePoint: location=(-0.03 -0.0636 -0.01) body=pelvis
        SimmMusclePoint: location=(0.065 0.11 -0.11) body=torso
  DynamicsEngine:
    SimmKinematicsEngine:
      BodySet:
        SimmBody ground: mass=0 mass_center=(0 0 0) inertia=(0 0 0 0 0 0 0 0 0)
        SimmBody pelvis: mass=11.777 mass_center=(-0.0707 0 0) inertia=(0.1028 0 0 0 0.0871 0 0 0 0.0579)
            meshes=(sacrum2.vtp pelvis.vtp l_pelvis.vtp)
          MarkerSet:
            SimmMarker asis_r: location=(0.014 0 0.128) weight=1
            SimmMarker asis_l: location=(0.014 0 -0.128) weight=1
            SimmMarker midasis: location=(0.014 0 0) weight=1
            SimmMarker psis_r: location=(-0.158 0.037853 0.055989) weight=1
            SimmMarker psis_l: location=(-0.158 0.037853 -0.055989) weight=1
            SimmMarker sacralwand: location=(-0.2 0.05 0) weight=1
            SimmMarker hip_r: location=(-0.0707 -0.0661 0.0835) weight=1
            SimmMarker hip_l: location=(-0.0707 -0.0661 -0.0835) weight=1
            SimmMarker midhip: location=(-0.0707 -0.0661 0) weight=1
        SimmBody femur_r: mass=9.3014 mass_center=(0 -0.17 0) inertia=(0.1339 0 0 0 0.0351 0 0 0 0.1412)
            meshes=femur.vtp
          MarkerSet:
            SimmMarker epicondLat_r: location=(-0.002 -0.401 0.045) weight=1
            SimmMarker epicondMed_r: location=(0.007 -0.403 -0.04) weight=1
            SimmMarker thighwand_r: location=(0 -0.24 0.15) weight=1
            SimmMarker upperleg1_r: location=(0 -0.14 0.1) weight=1
            SimmMarker upperleg2_r: location=(0 -0.34 0.075) weight=1
        SimmBody tibia_r: mass=3.7075 mass_center=(0 -0.1867 0) inertia=(0.0504 0 0 0 0.0051 0 0 0 0.0511)
            meshes=(tibia.vtp fibula.vtp)
          MarkerSet:
            SimmMarker malleolusLat_r: location=(-0.007 -0.415 0.05) weight=1
            SimmMarker malleolusMedv_r: location=(0.009 -0.401 -0.035) weight=1
            SimmMarker shankwand_r: location=(0 -0.3 0.125) weight=1
            SimmMarker lowerleg1_r: location=(0 -0.13 0.06) weight=1
            SimmMarker knee_r: location=(0 0 0) weight=1
            SimmMarker ankle_r: location=(0 -0.43 0) weight=1
        SimmBody patella_r: mass=0.1 mass_center=(0 0 0) inertia=(0.001 0 0 0 0.001 0 0 0 0.001) meshes=pat.vtp
        SimmBody talus_r: mass=0.1 mass_center=(0 0 0) inertia=(0.001 0 0 0 0.001 0 0 0 0.001) meshes=talus.vtp
        SimmBody calcn_r: mass=1.25 mass_center=(0.1 0.03 0) inertia=(0.0014 0 0 0 0.0039 0 0 0 0.0041) meshes=foot.vtp
          MarkerSet:
            SimmMarker toe_r: location=(0.17 0.025 0) weight=1
            SimmMarker heel_r: location=(-0.011 0.025 0) weight=1
        SimmBody toes_r: mass=0.2166 mass_center=(0.0346 0.006 -0.0175) inertia=(0.0001 0 0 0 0.0002 0 0 0 0.001)
            meshes=bofoot.vtp
        SimmBody femur_l: mass=9.3014 mass_center=(0 -0.17 0) inertia=(0.1339 0 0 0 0.0351 0 0 0 0.1412)
            meshes=l_femur.vtp
          MarkerSet:
            SimmMarker epicondLat_l: location=(-0.002 -0.401 -0.045) weight=1
            SimmMarker epicondMed_l: location=(0.007 -0.403 0.04) weight=1
            SimmMarker thighwand_l: location=(0 -0.24 -0.15) weight=1
            SimmMarker upperleg1_l: location=(0 -0.14 -0.1) weight=1
            SimmMarker upperleg2_l: location=(0 -0.34 -0.075) weight=1
        SimmBody tibia_l: mass=3.7075 mass_center=(0 -0.1867 0) inertia=(0.0504 0 0 0 0.0051 0 0 0 0.0511)
            meshes=(l_tibia.vtp l_fibula.vtp)
          MarkerSet:
            SimmMarker malleolusLat_l: location=(-0.007 -0.415 -0.05) weight=1
            SimmMarker malleolusMedv_l: location=(0.009 -0.401 0.035) weight=1
            SimmMarker shankwand_l: location=(0 -0.3 -0.125) weight=1
            SimmMarker lowerleg1_l: location=(0 -0.13 -0.06) weight=1
            SimmMarker knee_l: location=(0 0 0) weight=1
            SimmMarker ankle_l: location=(0 -0.43 0) weight=1
        SimmBody patella_l: mass=0.1 mass_center=(0 0 0) inertia=(0.001 0 0 0 0.001 0 0 0 0.001) meshes=l_patella.vtp
        SimmBody talus_l: mass=0.1 mass_center=(0 0 0) inertia=(0.001 0 0 0 0.001 0 0 0 0.001) meshes=l_talus.vtp
        SimmBody calcn_l: mass=1.25 mass_center=(0.1 0.03 0) inertia=(0.0014 0 0 0 0.0039 0 0 0 0.0041)
            meshes=l_foot.vtp
          MarkerSet:
            SimmMarker toe_l: location=(0.17 0.025 0) weight=1
            SimmMarker heel_l: location=(-0.011 0.025 0) weight=1
        SimmBody toes_l: mass=0.2166 mass_center=(0.0346 0.006 0.0175) inertia=(0.0001 0 0 0 0.0002 0 0 0 0.001)
            meshes=l_bofoot.vtp
        SimmBody torso: mass=34.2366 mass_center=(-0.03 0.32 0) inertia=(1.4745 0 0 0 0.7555 0 0 0 1.4314)
            meshes=(hat_spine.vtp hat_jaw.vtp hat_skull.vtp hat_ribs.vtp)
          MarkerSet:
            SimmMarker subclavicle_r: location=(0.03 0.38 0.0675) weight=1
            SimmMarker subclavicle_l: location=(0.03 0.38 -0.0675) weight=1
            SimmMarker neck: location=(-0.075 0.4225 0) weight=1
            SimmMarker sternalnotch: location=(0.03 0.38 0) weight=1
            SimmMarker xyphoidprocess: location=(0.0975 0.23 0) weight=1
      SimmCoordinate [values shared by the 23 below unless stated]: tolerance=0 stiffness=0 clamped=true
          restraint_active=false default_value=0
      SimmCoordinate pelvis_tx: range=(-5 5) default_value=0.12 keys=p_key
      SimmCoordinate pelvis_ty: range=(-1 2) default_value=0.93 keys=q_key
      SimmCoordinate pelvis_tz: range=(-3 3) keys=q_key
      SimmCoordinate pelvis_list: range=(-90 90) keys=q_key
      SimmCoordinate pelvis_rotation: range=(-90 90) keys=q_key
      SimmCoordinate pelvis_tilt: range=(-90 90) keys=q_key
      SimmCoordinate hip_flexion_r: range=(-120 120) keys=(h_key leftmouse_button)
      SimmCoordinate hip_adduction_r: range=(-120 120) keys=(h_key leftmouse_button)
      SimmCoordinate hip_rotation_r: range=(-120 120) keys=(h_key leftmouse_button)
      SimmCoordinate knee_angle_r: range=(-120 10) keys=k_key
      SimmCoordinate ankle_angle_r: range=(-90 90) keys=a_key
      SimmCoordinate subtalar_angle_r: range=(-90 90) keys=a_key
      SimmCoordinate mtp_angle_r: range=(-90 90) keys=t_key
      SimmCoordinate hip_flexion_l: range=(-120 120) keys=(h_key leftmouse_button)
      SimmCoordinate hip_adduction_l: range=(-120 120) keys=(h_key leftmouse_button)
      SimmCoordinate hip_rotation_l: range=(-120 120) keys=(h_key leftmouse_button)
      SimmCoordinate knee_angle_l: range=(-120 10) keys=k_key
      SimmCoordinate ankle_angle_l: range=(-60 60) keys=a_key
      SimmCoordinate subtalar_angle_l: range=(-90 90) keys=a_key
      SimmCoordinate mtp_angle_l: range=(-60 60) keys=t_key
      SimmCoordinate lumbar_extension: range=(-90 90) keys=q_key
      SimmCoordinate lumbar_bending: range=(-90 90) keys=q_key
      SimmCoordinate lumbar_rotation: range=(-90 90) keys=q_key
      JointSet:
        SimmJoint ground_pelvis: bodies=(ground pelvis)
          DofSet:
            SimmTranslationDof tx: coordinate=pelvis_tx
              Value:
                natCubicSpline: x=(-360 360) y=(-360 360)
            SimmTranslationDof ty: coordinate=pelvis_ty
              Value:
                natCubicSpline: x=(-360 360) y=(-360 360)
            SimmTranslationDof tz: coordinate=pelvis_tz
              Value:
                natCubicSpline: x=(-360 360) y=(-360 360)
            SimmRotationDof r1: axis=(0 0 1) coordinate=pelvis_tilt
              Value:
                natCubicSpline: x=(-360 360) y=(-360 360)
            SimmRotationDof r2: axis=(1 0 0) coordinate=pelvis_list
              Value:
                natCubicSpline: x=(-360 360) y=(-360 360)
            SimmRotationDof r3: axis=(0 1 0) coordinate=pelvis_rotation
              Value:
                natCubicSpline: x=(-360 360) y=(-360 360)
        SimmJoint hip_r: bodies=(pelvis femur_r)
          DofSet:
            SimmTranslationDof tx:
              Value: Constant(value=-0.0707)
            SimmTranslationDof ty:
              Value: Constant(value=-0.0661)
            SimmTranslationDof tz:
              Value: Constant(value=0.0835)
            SimmRotationDof r1: axis=(0 0 1) coordinate=hip_flexion_r
              Value:
                natCubicSpline: x=(-360 360) y=(-360 360)
            SimmRotationDof r2: axis=(1 0 0) coordinate=hip_adduction_r
              Value:
                natCubicSpline: x=(-360 360) y=(-360 360)
            SimmRotationDof r3: axis=(0 1 0) coordinate=hip_rotation_r
              Value:
                natCubicSpline: x=(-360 360) y=(-360 360)
        SimmJoint knee_r: bodies=(femur_r tibia_r)
          DofSet:
            SimmTranslationDof tx: coordinate=knee_angle_r
              Value:
                natCubicSpline: x=(-120 -100 -80 -60 -40 -20 -10 11.30699 19.33131 28.08511 87.17325 120)
                    y=(-0.0032 0.00179 0.00411 0.0041 0.00212 -0.001 -0.0031 -0.005227 -0.005435 -0.005574 -0.005435 -0.00525)
            SimmTranslationDof ty: coordinate=knee_angle_r
              Value:
                natCubicSpline: x=(-120 -70 -30 -20 -10 9.118541 120)
                    y=(-0.4226 -0.4082 -0.399 -0.3976 -0.3966 -0.395264 -0.396)
            SimmTranslationDof tz:
              Value: Constant(value=0)
            SimmRotationDof r1: axis=(0 0 1) coordinate=knee_angle_r
              Value:
                natCubicSpline: x=(-360 360) y=(-360 360)
            SimmRotationDof r2: axis=(1 0 0)
              Value: Constant(value=0)
            SimmRotationDof r3: axis=(0 1 0)
              Value: Constant(value=0)
        SimmJoint tib_pat_r: bodies=(tibia_r patella_r)
          DofSet:
            SimmTranslationDof tx: coordinate=knee_angle_r
              Value:
                natCubicSpline: x=(-120 -80 -60 -40 -20 -10 0 0.01 0.02 5 120)
                    y=(0.0173 0.0324 0.0381 0.043 0.0469 0.0484 0.0496 0.0496 0.0496 0.0496 0.0496)
            SimmTranslationDof ty: coordinate=knee_angle_r
              Value:
                natCubicSpline: x=(-120 -90 -80 -60 -40 -20 -10 0 0.01 0.02 5 120)
                    y=(-0.0219 -0.0202 -0.02 -0.0204 -0.0211 -0.0219 -0.0223 -0.0227 -0.0227 -0.0227 -0.0227 -0.0227)
            SimmTranslationDof tz:
              Value: Constant(value=0.0024)
            SimmRotationDof r1: axis=(0 0 1) coordinate=knee_angle_r
              Value:
                natCubicSpline: x=(-120 -114.59 -83.51 -30.16 1.6 10) y=(17.65 17.65 17.55 15.48 -2.12 -16.04)
            SimmRotationDof r2: axis=(1 0 0)
              Value: Constant(value=0)
            SimmRotationDof r3: axis=(0 1 0)
              Value: Constant(value=0)
        SimmJoint ankle_r: bodies=(tibia_r talus_r)
          DofSet:
            SimmTranslationDof tx:
              Value: Constant(value=0)
            SimmTranslationDof ty:
              Value: Constant(value=-0.43)
            SimmTranslationDof tz:
              Value: Constant(value=0)
            SimmRotationDof r1: axis=(-0.1050135 -0.1740225 0.9791263) coordinate=ankle_angle_r
              Value:
                natCubicSpline: x=(-360 360) y=(-360 360)
            SimmRotationDof r2: axis=(1 0 0)
              Value: Constant(value=0)
            SimmRotationDof r3: axis=(0 1 0)
              Value: Constant(value=0)
        SimmJoint subtalar_r: bodies=(talus_r calcn_r)
          DofSet:
            SimmTranslationDof tx:
              Value: Constant(value=-0.04877)
            SimmTranslationDof ty:
              Value: Constant(value=-0.04195)
            SimmTranslationDof tz:
              Value: Constant(value=0.00792)
            SimmRotationDof r1: axis=(0.7871796 0.6047475 -0.1209495) coordinate=subtalar_angle_r
              Value:
                natCubicSpline: x=(-360 360) y=(-360 360)
            SimmRotationDof r2: axis=(0 1 0)
              Value: Constant(value=0)
            SimmRotationDof r3: axis=(0 0 1)
              Value: Constant(value=0)
        SimmJoint mtp_r: bodies=(calcn_r toes_r)
          DofSet:
            SimmTranslationDof tx:
              Value: Constant(value=0.1788)
            SimmTranslationDof ty:
              Value: Constant(value=-0.002)
            SimmTranslationDof tz:
              Value: Constant(value=0.00108)
            SimmRotationDof r1: axis=(-0.5809544 0 0.8139361) coordinate=mtp_angle_r
              Value:
                natCubicSpline: x=(-360 360) y=(-360 360)
            SimmRotationDof r2: axis=(1 0 0)
              Value: Constant(value=0)
            SimmRotationDof r3: axis=(0 1 0)
              Value: Constant(value=0)
        SimmJoint hip_l: bodies=(pelvis femur_l)
          DofSet:
            SimmTranslationDof tx:
              Value: Constant(value=-0.0707)
            SimmTranslationDof ty:
              Value: Constant(value=-0.0661)
            SimmTranslationDof tz:
              Value: Constant(value=-0.0835)
            SimmRotationDof r1: axis=(0 0 1) coordinate=hip_flexion_l
              Value:
                natCubicSpline: x=(-360 360) y=(-360 360)
            SimmRotationDof r2: axis=(-1 0 0) coordinate=hip_adduction_l
              Value:
                natCubicSpline: x=(-360 360) y=(-360 360)
            SimmRotationDof r3: axis=(0 -1 0) coordinate=hip_rotation_l
              Value:
                natCubicSpline: x=(-360 360) y=(-360 360)
        SimmJoint knee_l: bodies=(femur_l tibia_l)
          DofSet:
            SimmTranslationDof tx: coordinate=knee_angle_l
              Value:
                natCubicSpline: x=(-120 -100 -80 -60 -40 -20 -10 11.30699 19.33131 28.08511 87.17325 120)
                    y=(-0.0032 0.00179 0.00411 0.0041 0.00212 -0.001 -0.0031 -0.005227 -0.005435 -0.005574 -0.005435 -0.00525)
            SimmTranslationDof ty: coordinate=knee_angle_l
              Value:
                natCubicSpline: x=(-120 -70 -30 -20 -10 9.118541 120)
                    y=(-0.4226 -0.4082 -0.399 -0.3976 -0.3966 -0.395264 -0.396)
            SimmTranslationDof tz:
              Value: Constant(value=0)
            SimmRotationDof r1: axis=(0 0 1) coordinate=knee_angle_l
              Value:
                natCubicSpline: x=(-360 360) y=(-360 360)
            SimmRotationDof r2: axis=(1 0 0)
              Value: Constant(value=0)
            SimmRotationDof r3: axis=(0 1 0)
              Value: Constant(value=0)
        SimmJoint tib_pat_l: bodies=(tibia_l patella_l)
          DofSet:
            SimmTranslationDof tx: coordinate=knee_angle_l
              Value:
                natCubicSpline: x=(-120 -80 -60 -40 -20 -10 0 0.01 0.02 5 120)
                    y=(0.0173 0.0324 0.0381 0.043 0.0469 0.0484 0.0496 0.0496 0.0496 0.0496 0.0496)
            SimmTranslationDof ty: coordinate=knee_angle_l
              Value:
                natCubicSpline: x=(-120 -90 -80 -60 -40 -20 -10 0 0.01 0.02 5 120)
                    y=(-0.0219 -0.0202 -0.02 -0.0204 -0.0211 -0.0219 -0.0223 -0.0227 -0.0227 -0.0227 -0.0227 -0.0227)
            SimmTranslationDof tz:
              Value: Constant(value=-0.0024)
            SimmRotationDof r1: axis=(0 0 1) coordinate=knee_angle_l
              Value:
                natCubicSpline: x=(-120 -114.59 -83.51 -30.16 1.6 10) y=(17.65 17.65 17.55 15.48 -2.12 -16.04)
            SimmRotationDof r2: axis=(1 0 0)
              Value: Constant(value=0)
            SimmRotationDof r3: axis=(0 1 0)
              Value: Constant(value=0)
        SimmJoint ankle_l: bodies=(tibia_l talus_l)
          DofSet:
            SimmTranslationDof tx:
              Value: Constant(value=0)
            SimmTranslationDof ty:
              Value: Constant(value=-0.43)
            SimmTranslationDof tz:
              Value: Constant(value=0)
            SimmRotationDof r1: axis=(0.1050135 -0.1740225 0.9791263) coordinate=ankle_angle_l
              Value:
                natCubicSpline: x=(-360 360) y=(-360 360)
            SimmRotationDof r2: axis=(1 0 0)
              Value: Constant(value=0)
            SimmRotationDof r3: axis=(0 1 0)
              Value: Constant(value=0)
        SimmJoint subtalar_l: bodies=(talus_l calcn_l)
          DofSet:
            SimmTranslationDof tx:
              Value: Constant(value=-0.04877)
            SimmTranslationDof ty:
              Value: Constant(value=-0.04195)
            SimmTranslationDof tz:
              Value: Constant(value=-0.00792)
            SimmRotationDof r1: axis=(-0.7871796 -0.6047475 -0.1209495) coordinate=subtalar_angle_l
              Value:
                natCubicSpline: x=(-360 360) y=(-360 360)
            SimmRotationDof r2: axis=(0 1 0)
              Value: Constant(value=0)
            SimmRotationDof r3: axis=(0 0 1)
              Value: Constant(value=0)
        SimmJoint mtp_l: bodies=(calcn_l toes_l)
          DofSet:
            SimmTranslationDof tx:
              Value: Constant(value=0.1788)
            SimmTranslationDof ty:
              Value: Constant(value=-0.002)
            SimmTranslationDof tz:
              Value: Constant(value=-0.00108)
            SimmRotationDof r1: axis=(0.5809544 0 0.8139361) coordinate=mtp_angle_l
              Value:
                natCubicSpline: x=(-360 360) y=(-360 360)
            SimmRotationDof r2: axis=(1 0 0)
              Value: Constant(value=0)
            SimmRotationDof r3: axis=(0 1 0)
              Value: Constant(value=0)
        SimmJoint back: bodies=(pelvis torso)
          DofSet:
            SimmTranslationDof tx:
              Value: Constant(value=-0.1007)
            SimmTranslationDof ty:
              Value: Constant(value=0.0815)
            SimmTranslationDof tz:
              Value: Constant(value=0)
            SimmRotationDof r1: axis=(0 0 1) coordinate=lumbar_extension
              Value:
                natCubicSpline: x=(-360 360) y=(-360 360)
            SimmRotationDof r2: axis=(1 0 0) coordinate=lumbar_bending
              Value:
                natCubicSpline: x=(-360 360) y=(-360 360)
            SimmRotationDof r3: axis=(0 1 0) coordinate=lumbar_rotation
              Value:
                natCubicSpline: x=(-360 360) y=(-360 360)
