Model 3DGaitModelSimple:
  angle_units: radians
  defaults: Thelen2003Muscle default: muscle_model=9 max_isometric_force=0 optimal_fiber_length=0 tendon_slack_length=0
      pennation_angle=0 activation_time_constant=0.01 deactivation_time_constant=0.04 Vmax=10 Vmax0=5
      FmaxTendonStrain=0.033 FmaxMuscleStrain=0.6 KshapeActive=0.5 KshapePassive=4 damping=0.05 Af=0.3 Flen=1.8
  ActuatorSet:
    ObjectGroup R_hip_abd: members=(glut_max1_r glut_med1_r glut_med2_r glut_med3_r peri_r sar_r tfl_r)
    ObjectGroup R_hip_flex: members=(glut_med1_r grac_r iliacus_r pect_r psoas_r rect_fem_r sar_r tfl_r)
    ObjectGroup R_hip_inrot: members=(glut_med1_r iliacus_r psoas_r tfl_r)
    ObjectGroup R_hip_exrot: members=(gem_r glut_med3_r peri_r quad_fem_r)
    ObjectGroup R_hip_ext: members=(add_mag2_r bifemlh_r glut_max1_r glut_max2_r glut_max3_r glut_med3_r)
    ObjectGroup R_hip_add: members=(add_mag2_r bifemlh_r grac_r pect_r)
    ObjectGroup R_knee_bend: members=(bifemlh_r bifemsh_r grac_r med_gas_r sar_r)
    ObjectGroup R_knee_ext: members=(rect_fem_r vas_int_r)
    ObjectGroup R_ankle_pf: members=(med_gas_r soleus_r tib_post_r)
    ObjectGroup R_inverter: members=(tib_ant_r tib_post_r)
    ObjectGroup R_ankle_df: members=tib_ant_r
    ObjectGroup L_hip_abd: members=(glut_max1_l glut_med1_l glut_med2_l glut_med3_l peri_l sar_l tfl_l)
    ObjectGroup L_hip_flex: members=(glut_med1_l grac_l iliacus_l pect_l psoas_l rect_fem_l sar_l tfl_l)
    ObjectGroup L_hip_inrot: members=(glut_med1_l iliacus_l psoas_l tfl_l)
    ObjectGroup L_hip_exrot: members=(gem_l glut_med3_l peri_l quad_fem_l)
    ObjectGroup L_hip_ext: members=(add_mag2_l bifemlh_l glut_max1_l glut_max2_l glut_max3_l glut_med3_l)
    ObjectGroup L_hip_add: members=(add_mag2_l bifemlh_l grac_l pect_l)
    ObjectGroup L_knee_bend: members=(bifemlh_l bifemsh_l grac_l med_gas_l sar_l)
    ObjectGroup L_knee_ext: members=(rect_fem_l vas_int_l)
    ObjectGroup L_ankle_pf: members=(med_gas_l soleus_l tib_post_l)
    ObjectGroup L_inverter: members=(tib_ant_l tib_post_l)
    ObjectGroup L_ankle_df: members=tib_ant_l
    ObjectGroup back_ext: members=(ercspn_l ercspn_r)
    ObjectGroup back_rlb: members=(ercspn_r extobl_r intobl_r)
    ObjectGroup back_introt: members=(ercspn_r extobl_l intobl_r)
    ObjectGroup back_llb: members=(ercspn_l extobl_l intobl_l)
    ObjectGroup back_extrot: members=(ercspn_l extobl_r intobl_l)
    ObjectGroup back_flex: members=(extobl_l extobl_r intobl_l intobl_r)
    Thelen2003Muscle glut_med1_r: max_isometric_force=1119 optimal_fiber_length=0.05640635
        tendon_slack_length=0.08223729 pennation_angle=0.1396263 muscle_model=9
      MusclePoint: pelvis (-0.04180274 0.03114714 0.1238714)
      MusclePoint: femur_r (-0.02500983 -0.01342271 0.06367182)
    Thelen2003Muscle glut_med2_r: max_isometric_force=873 optimal_fiber_length=0.08913177
        tendon_slack_length=0.05590513 pennation_angle=0 muscle_model=9
      MusclePoint: pelvis (-0.08760134 0.04559368 0.0784826)
      MusclePoint: femur_r (-0.02959879 -0.00665399 0.06045955)
    Thelen2003Muscle glut_med3_r: max_isometric_force=1000 optimal_fiber_length=0.06853064
        tendon_slack_length=0.05622483 pennation_angle=0.3316126 muscle_model=9
      MusclePoint: pelvis (-0.1253058 0.01075806 0.06639259)
      MusclePoint: femur_r (-0.03544972 -0.00539203 0.05942703)
    Thelen2003Muscle bifemlh_r: max_isometric_force=2700 optimal_fiber_length=0.1236311 tendon_slack_length=0.369759
        pennation_angle=0 muscle_model=9
      MusclePoint: pelvis (-0.1290557 -0.1050909 0.07114663)
      MusclePoint: tibia_r (-0.02975454 -0.03558683 0.02909223)
      MusclePoint: tibia_r (-0.02313144 -0.05565384 0.03390634)
    Thelen2003Muscle bifemsh_r: max_isometric_force=804 optimal_fiber_length=0.1914449 tendon_slack_length=0.09848899
        pennation_angle=0.4014257 muscle_model=9
      MusclePoint: femur_r (0.0057362 -0.2421824 0.02684542)
      MusclePoint: tibia_r (-0.02975454 -0.03558683 0.02909223)
      MusclePoint: tibia_r (-0.02313144 -0.05565384 0.03390634)
    Thelen2003Muscle sar_r: max_isometric_force=156 optimal_fiber_length=0.5742156 tendon_slack_length=0.1104261
        pennation_angle=0 muscle_model=9
      MusclePoint: pelvis (-0.01567603 -0.00133195 0.1272525)
      MusclePoint: femur_r (-0.00344172 -0.4093352 -0.0482988)
      MusclePoint: tibia_r (-0.00553573 -0.04141911 -0.03944207)
      MusclePoint: tibia_r (0.00593114 -0.058224 -0.03786043)
      MusclePoint: tibia_r (0.02402111 -0.08303593 -0.02491078)
    Thelen2003Muscle add_mag2_r: max_isometric_force=2343 optimal_fiber_length=0.1409897 tendon_slack_length=0.1398245
        pennation_angle=0.05235988 muscle_model=9
      MusclePoint: pelvis (-0.08514235 -0.1221296 0.03155697)
      MusclePoint: femur_r (0.0061951 -0.2621443 0.02604235)
    Thelen2003Muscle tfl_r: max_isometric_force=233 optimal_fiber_length=0.1060379 tendon_slack_length=0.4743801
        pennation_angle=0.05235988 muscle_model=9
      MusclePoint: pelvis (-0.03186435 0.02192595 0.12715)
      MusclePoint: femur_r (0.03372886 -0.1141504 0.06849023)
      MusclePoint: femur_r (0.0061951 -0.4645175 0.04095647)
      MusclePoint: tibia_r (0.00593114 -0.04814107 0.02935913)
    Thelen2003Muscle pect_r: max_isometric_force=266 optimal_fiber_length=0.1116559 tendon_slack_length=0.03684646
        pennation_angle=0 muscle_model=9
      MusclePoint: pelvis (-0.04415927 -0.07868752 0.04620842)
      MusclePoint: femur_r (-0.01399633 -0.09430313 0.02902517)
    Thelen2003Muscle grac_r: max_isometric_force=162 optimal_fiber_length=0.3965859 tendon_slack_length=0.1419597
        pennation_angle=0.05235988 muscle_model=9
      MusclePoint: pelvis (-0.07582895 -0.1216173 0.02862668)
      MuscleViaPoint: tibia_r (-0.02626506 -0.03153388 -0.03730686) coordinate=knee_angle_r
          range=(-0.4363323 0.1745329)
      MusclePoint: tibia_r (-0.019207 -0.05093859 -0.03538912)
      MusclePoint: tibia_r (0.00593114 -0.08264052 -0.02253832)
    Thelen2003Muscle glut_max1_r: max_isometric_force=573 optimal_fiber_length=0.151587 tendon_slack_length=0.1334393
        pennation_angle=0.08726646 muscle_model=9
      MusclePoint: pelvis (-0.122437 0.06270411 0.07172039)
      MusclePoint: pelvis (-0.1322729 0.00122949 0.09077753)
      MusclePoint: femur_r (-0.05242887 -0.02845155 0.04497181)
      MusclePoint: femur_r (-0.03177855 -0.06493378 0.05392028)
    Thelen2003Muscle glut_max2_r: max_isometric_force=819 optimal_fiber_length=0.1593947 tendon_slack_length=0.1377084
        pennation_angle=0 muscle_model=9
      MusclePoint: pelvis (-0.1382154 0.01803256 0.05768369)
      MusclePoint: pelvis (-0.1409818 -0.05327801 0.09364634)
      MusclePoint: femur_r (-0.04887242 -0.06080372 0.03361413)
      MusclePoint: femur_r (-0.01789694 -0.1165596 0.04806936)
    Thelen2003Muscle glut_max3_r: max_isometric_force=552 optimal_fiber_length=0.1562884 tendon_slack_length=0.1573737
        pennation_angle=0.08726646 muscle_model=9
      MusclePoint: pelvis (-0.1594242 -0.03217172 0.00594255)
      MusclePoint: pelvis (-0.1566578 -0.1077855 0.04129045)
      MusclePoint: femur_r (-0.03430248 -0.1194277 0.01548774)
      MusclePoint: femur_r (-0.00688344 -0.1627934 0.04715156)
    Thelen2003Muscle iliacus_r: max_isometric_force=1073 optimal_fiber_length=0.1061641 tendon_slack_length=0.1061641
        pennation_angle=0.1221731 muscle_model=9
      MusclePoint: pelvis (-0.06905649 0.03739706 0.08749888)
      MusclePoint: pelvis (-0.02643409 -0.05635174 0.0830932)
      MuscleViaPoint: pelvis (-0.02950782 -0.08247845 0.08360549) coordinate=hip_flexion_r range=(-1.570796 0.7853982)
      MusclePoint: femur_r (0.00195031 -0.06229513 0.00653927)
      MusclePoint: femur_r (-0.02214173 -0.0712436 0.0147994)
    Thelen2003Muscle psoas_r: max_isometric_force=1113 optimal_fiber_length=0.1051723 tendon_slack_length=0.1682757
        pennation_angle=0.1396263 muscle_model=9
      MusclePoint: pelvis (-0.06629013 0.09087998 0.02961028)
      MusclePoint: pelvis (-0.02438493 -0.05840089 0.0777654)
      MuscleViaPoint: pelvis (-0.02950782 -0.08247845 0.08360549) coordinate=hip_flexion_r range=(-1.570796 0.7853982)
      MusclePoint: femur_r (0.00183558 -0.05816507 0.00435951)
      MusclePoint: femur_r (-0.02156811 -0.06849023 0.0119313)
    Thelen2003Muscle quad_fem_r: max_isometric_force=381 optimal_fiber_length=0.05807418 tendon_slack_length=0.02581075
        pennation_angle=0 muscle_model=9
      MusclePoint: pelvis (-0.1171092 -0.1179288 0.05327801)
      MusclePoint: femur_r (-0.04370984 -0.04118592 0.04198898)
    Thelen2003Muscle gem_r: max_isometric_force=164 optimal_fiber_length=0.02609439 tendon_slack_length=0.04240338
        pennation_angle=0 muscle_model=9
      MusclePoint: pelvis (-0.1160846 -0.08401532 0.0731548)
      MusclePoint: femur_r (-0.01629081 -0.00378589 0.05082273)
    Thelen2003Muscle peri_r: max_isometric_force=444 optimal_fiber_length=0.02732926 tendon_slack_length=0.1208794
        pennation_angle=0.1745329 muscle_model=9
      MusclePoint: pelvis (-0.1430309 0.00030737 0.02407756)
      MusclePoint: pelvis (-0.122232 -0.02827833 0.06731471)
      MusclePoint: femur_r (-0.01697915 -0.00413006 0.05013439)
    Thelen2003Muscle rect_fem_r: max_isometric_force=1169 optimal_fiber_length=0.1294757 tendon_slack_length=0.3520829
        pennation_angle=0.08726646 muscle_model=9
      MusclePoint: pelvis (-0.03022502 -0.03186435 0.09917906)
      MuscleViaPoint: femur_r (0.03831782 -0.4623377 0.00217976) coordinate=knee_angle_r range=(-2.617994 -1.459968)
      MusclePoint: patella_r (0.01295466 0.04678665 -0.00107063)
    Thelen2003Muscle vas_int_r: max_isometric_force=5000 optimal_fiber_length=0.1224194 tendon_slack_length=0.1327163
        pennation_angle=0.05235988 muscle_model=9
      MusclePoint: femur_r (0.03326996 -0.220729 0.03556444)
      MusclePoint: femur_r (0.03843254 -0.2390848 0.03269634)
      MuscleViaPoint: femur_r (0.03935033 -0.4623377 0.00630982) coordinate=knee_angle_r range=(-2.617994 -1.42)
      MusclePoint: patella_r (0.00620967 0.05139037 -0.00064238)
    Thelen2003Muscle med_gas_r: max_isometric_force=2500 optimal_fiber_length=0.0901287 tendon_slack_length=0.3605148
        pennation_angle=0.296706 muscle_model=9
      MusclePoint: femur_r (-0.02179756 -0.4507506 -0.02696014)
      MuscleViaPoint: femur_r (-0.0344172 -0.4614199 -0.02959879) coordinate=knee_angle_r range=(-0.7853982 0.1745329)
      MusclePoint: calcn_r (0 0.03183963 -0.00544355)
    Thelen2003Muscle soleus_r: max_isometric_force=4000 optimal_fiber_length=0.08046208 tendon_slack_length=0.2212707
        pennation_angle=0.4363323 muscle_model=9
      MusclePoint: tibia_r (-0.00237246 -0.1515406 0.00701851)
      MusclePoint: calcn_r (0 0.03183963 -0.00544355)
    Thelen2003Muscle tib_post_r: max_isometric_force=3600 optimal_fiber_length=0.03107549 tendon_slack_length=0.3107549
        pennation_angle=0.2094395 muscle_model=9
      MusclePoint: tibia_r (-0.00929212 -0.1332529 0.00187819)
      MusclePoint: tibia_r (-0.01423473 -0.4004507 -0.02263718)
      MusclePoint: calcn_r (0.04282943 0.03430463 -0.02937462)
      MusclePoint: calcn_r (0.07929094 0.01633065 -0.02886108)
    Thelen2003Muscle tib_ant_r: max_isometric_force=3000 optimal_fiber_length=0.09791263 tendon_slack_length=0.2228012
        pennation_angle=0.08726646 muscle_model=9
      MusclePoint: tibia_r (0.01769456 -0.1605361 0.01136801)
      MusclePoint: tibia_r (0.03252241 -0.3905654 -0.01749686)
      MusclePoint: calcn_r (0.1197581 0.01828211 -0.03132609)
    Thelen2003Muscle glut_med1_l: max_isometric_force=1119 optimal_fiber_length=0.05640635
        tendon_slack_length=0.08223729 pennation_angle=0.1396263 muscle_model=9
      MusclePoint: pelvis (-0.04180274 0.03114714 -0.1238714)
      MusclePoint: femur_l (-0.02500983 -0.01342271 -0.06367182)
    Thelen2003Muscle glut_med2_l: max_isometric_force=873 optimal_fiber_length=0.08913177
        tendon_slack_length=0.05590513 pennation_angle=0 muscle_model=9
      MusclePoint: pelvis (-0.08760134 0.04559368 -0.0784826)
      MusclePoint: femur_l (-0.02959879 -0.00665399 -0.06045955)
    Thelen2003Muscle glut_med3_l: max_isometric_force=1000 optimal_fiber_length=0.06853064
        tendon_slack_length=0.05622483 pennation_angle=0.3316126 muscle_model=9
      MusclePoint: pelvis (-0.1253058 0.01075806 -0.06639259)
      MusclePoint: femur_l (-0.03544972 -0.00539203 -0.05942703)
    Thelen2003Muscle bifemlh_l: max_isometric_force=2700 optimal_fiber_length=0.1236311 tendon_slack_length=0.369759
        pennation_angle=0 muscle_model=9
      MusclePoint: pelvis (-0.1290557 -0.1050909 -0.07114663)
      MusclePoint: tibia_l (-0.02975454 -0.03558683 -0.02909223)
      MusclePoint: tibia_l (-0.02313144 -0.05565384 -0.03390634)
    Thelen2003Muscle bifemsh_l: max_isometric_force=804 optimal_fiber_length=0.1914449 tendon_slack_length=0.09848899
        pennation_angle=0.4014257 muscle_model=9
      MusclePoint: femur_l (0.0057362 -0.2421824 -0.02684542)
      MusclePoint: tibia_l (-0.02975454 -0.03558683 -0.02909223)
      MusclePoint: tibia_l (-0.02313144 -0.05565384 -0.03390634)
    Thelen2003Muscle sar_l: max_isometric_force=156 optimal_fiber_length=0.5742156 tendon_slack_length=0.1104261
        pennation_angle=0 muscle_model=9
      MusclePoint: pelvis (-0.01567603 -0.00133195 -0.1272525)
      MusclePoint: femur_l (-0.00344172 -0.4093352 0.0482988)
      MusclePoint: tibia_l (-0.00553573 -0.04141911 0.03944207)
      MusclePoint: tibia_l (0.00593114 -0.058224 0.03786043)
      MusclePoint: tibia_l (0.02402111 -0.08303593 0.02491078)
    Thelen2003Muscle add_mag2_l: max_isometric_force=2343 optimal_fiber_length=0.1409897 tendon_slack_length=0.1398245
        pennation_angle=0.05235988 muscle_model=9
      MusclePoint: pelvis (-0.08514235 -0.1221296 -0.03155697)
      MusclePoint: femur_l (0.0061951 -0.2621443 -0.02604235)
    Thelen2003Muscle tfl_l: max_isometric_force=233 optimal_fiber_length=0.1060379 tendon_slack_length=0.4743801
        pennation_angle=0.05235988 muscle_model=9
      MusclePoint: pelvis (-0.03186435 0.02192595 -0.12715)
      MusclePoint: femur_l (0.03372886 -0.1141504 -0.06849023)
      MusclePoint: femur_l (0.0061951 -0.4645175 -0.04095647)
      MusclePoint: tibia_l (0.00593114 -0.04814107 -0.02935913)
    Thelen2003Muscle pect_l: max_isometric_force=266 optimal_fiber_length=0.1116559 tendon_slack_length=0.03684646
        pennation_angle=0 muscle_model=9
      MusclePoint: pelvis (-0.04415927 -0.07868752 -0.04620842)
      MusclePoint: femur_l (-0.01399633 -0.09430313 -0.02902517)
    Thelen2003Muscle grac_l: max_isometric_force=162 optimal_fiber_length=0.3965859 tendon_slack_length=0.1419597
        pennation_angle=0.05235988 muscle_model=9
      MusclePoint: pelvis (-0.07582895 -0.1216173 -0.02862668)
      MuscleViaPoint: tibia_l (-0.02626506 -0.03153388 0.03730686) coordinate=knee_angle_l range=(-0.4363323 0.1745329)
      MusclePoint: tibia_l (-0.019207 -0.05093859 0.03538912)
      MusclePoint: tibia_l (0.00593114 -0.08264052 0.02253832)
    Thelen2003Muscle glut_max1_l: max_isometric_force=573 optimal_fiber_length=0.151587 tendon_slack_length=0.1334393
        pennation_angle=0.08726646 muscle_model=9
      MusclePoint: pelvis (-0.122437 0.06270411 -0.07172039)
      MusclePoint: pelvis (-0.1322729 0.00122949 -0.09077753)
      MusclePoint: femur_l (-0.05242887 -0.02845155 -0.04497181)
      MusclePoint: femur_l (-0.03177855 -0.06493378 -0.05392028)
    Thelen2003Muscle glut_max2_l: max_isometric_force=819 optimal_fiber_length=0.1593947 tendon_slack_length=0.1377084
        pennation_angle=0 muscle_model=9
      MusclePoint: pelvis (-0.1382154 0.01803256 -0.05768369)
      MusclePoint: pelvis (-0.1409818 -0.05327801 -0.09364634)
      MusclePoint: femur_l (-0.04887242 -0.06080372 -0.03361413)
      MusclePoint: femur_l (-0.01789694 -0.1165596 -0.04806936)
    Thelen2003Muscle glut_max3_l: max_isometric_force=552 optimal_fiber_length=0.1562884 tendon_slack_length=0.1573737
        pennation_angle=0.08726646 muscle_model=9
      MusclePoint: pelvis (-0.1594242 -0.03217172 -0.00594255)
      MusclePoint: pelvis (-0.1566578 -0.1077855 -0.04129045)
      MusclePoint: femur_l (-0.03430248 -0.1194277 -0.01548774)
      MusclePoint: femur_l (-0.00688344 -0.1627934 -0.04715156)
    Thelen2003Muscle iliacus_l: max_isometric_force=1073 optimal_fiber_length=0.1061641 tendon_slack_length=0.1061641
        pennation_angle=0.1221731 muscle_model=9
      MusclePoint: pelvis (-0.06905649 0.03739706 -0.08749888)
      MusclePoint: pelvis (-0.02643409 -0.05635174 -0.0830932)
      MuscleViaPoint: pelvis (-0.02950782 -0.08247845 -0.08360549) coordinate=hip_flexion_l range=(-1.570796 0.7853982)
      MusclePoint: femur_l (0.00195031 -0.06229513 -0.00653927)
      MusclePoint: femur_l (-0.02214173 -0.0712436 -0.0147994)
    Thelen2003Muscle psoas_l: max_isometric_force=1113 optimal_fiber_length=0.1051723 tendon_slack_length=0.1682757
        pennation_angle=0.1396263 muscle_model=9
      MusclePoint: pelvis (-0.06629013 0.09087998 -0.02961028)
      MusclePoint: pelvis (-0.02438493 -0.05840089 -0.0777654)
      MuscleViaPoint: pelvis (-0.02950782 -0.08247845 -0.08360549) coordinate=hip_flexion_l range=(-1.570796 0.7853982)
      MusclePoint: femur_l (0.00183558 -0.05816507 -0.00435951)
      MusclePoint: femur_l (-0.02156811 -0.06849023 -0.0119313)
    Thelen2003Muscle quad_fem_l: max_isometric_force=381 optimal_fiber_length=0.05807418 tendon_slack_length=0.02581075
        pennation_angle=0 muscle_model=9
      MusclePoint: pelvis (-0.1171092 -0.1179288 -0.05327801)
      MusclePoint: femur_l (-0.04370984 -0.04118592 -0.04198898)
    Thelen2003Muscle gem_l: max_isometric_force=164 optimal_fiber_length=0.02609439 tendon_slack_length=0.04240338
        pennation_angle=0 muscle_model=9
      MusclePoint: pelvis (-0.1160846 -0.08401532 -0.0731548)
      MusclePoint: femur_l (-0.01629081 -0.00378589 -0.05082273)
    Thelen2003Muscle peri_l: max_isometric_force=444 optimal_fiber_length=0.02732926 tendon_slack_length=0.1208794
        pennation_angle=0.1745329 muscle_model=9
      MusclePoint: pelvis (-0.1430309 0.00030737 -0.02407756)
      MusclePoint: pelvis (-0.122232 -0.02827833 -0.06731471)
      MusclePoint: femur_l (-0.01697915 -0.00413006 -0.05013439)
    Thelen2003Muscle rect_fem_l: max_isometric_force=1169 optimal_fiber_length=0.1294757 tendon_slack_length=0.3520829
        pennation_angle=0.08726646 muscle_model=9
      MusclePoint: pelvis (-0.03022502 -0.03186435 -0.09917906)
      MuscleViaPoint: femur_l (0.03831782 -0.4623377 -0.00217976) coordinate=knee_angle_l range=(-2.617994 -1.459968)
      MusclePoint: patella_l (0.01295466 0.04678665 0.00107063)
    Thelen2003Muscle vas_int_l: max_isometric_force=5000 optimal_fiber_length=0.1224194 tendon_slack_length=0.1327163
        pennation_angle=0.05235988 muscle_model=9
      MusclePoint: femur_l (0.03326996 -0.220729 -0.03556444)
      MusclePoint: femur_l (0.03843254 -0.2390848 -0.03269634)
      MuscleViaPoint: femur_l (0.03935033 -0.4623377 -0.00630982) coordinate=knee_angle_l range=(-2.617994 -1.42)
      MusclePoint: patella_l (0.00620967 0.05139037 0.00064238)
    Thelen2003Muscle med_gas_l: max_isometric_force=2500 optimal_fiber_length=0.0901287 tendon_slack_length=0.3605148
        pennation_angle=0.296706 muscle_model=9
      MusclePoint: femur_l (-0.02179756 -0.4507506 0.02696014)
      MuscleViaPoint: femur_l (-0.0344172 -0.4614199 0.02959879) coordinate=knee_angle_l range=(-0.7853982 0.1745329)
      MusclePoint: calcn_l (0 0.03183963 0.00544355)
    Thelen2003Muscle soleus_l: max_isometric_force=4000 optimal_fiber_length=0.08046208 tendon_slack_length=0.2212707
        pennation_angle=0.4363323 muscle_model=9
      MusclePoint: tibia_l (-0.00237246 -0.1515406 -0.00701851)
      MusclePoint: calcn_l (0 0.03183963 0.00544355)
    Thelen2003Muscle tib_post_l: max_isometric_force=3600 optimal_fiber_length=0.03107549 tendon_slack_length=0.3107549
        pennation_angle=0.2094395 muscle_model=9
      MusclePoint: tibia_l (-0.00929212 -0.1332529 -0.00187819)
      MusclePoint: tibia_l (-0.01423473 -0.4004507 0.02263718)
      MusclePoint: calcn_l (0.04282943 0.03430463 0.02937462)
      MusclePoint: calcn_l (0.07929094 0.01633065 0.02886108)
    Thelen2003Muscle tib_ant_l: max_isometric_force=3000 optimal_fiber_length=0.09791263 tendon_slack_length=0.2228012
        pennation_angle=0.08726646 muscle_model=9
      MusclePoint: tibia_l (0.01769456 -0.1605361 -0.01136801)
      MusclePoint: tibia_l (0.03252241 -0.3905654 0.01749686)
      MusclePoint: calcn_l (0.1197581 0.01828211 0.03132609)
    Thelen2003Muscle ercspn_r: max_isometric_force=2500 optimal_fiber_length=0.1278847 tendon_slack_length=0.03197118
        pennation_angle=0 muscle_model=9
      MusclePoint: pelvis (-0.1434408 0.04497893 0.04467156)
      MusclePoint: torso (-0.05938459 0.1187692 0.02602125)
    Thelen2003Muscle ercspn_l: max_isometric_force=2500 optimal_fiber_length=0.1278847 tendon_slack_length=0.03197118
        pennation_angle=0 muscle_model=9
      MusclePoint: pelvis (-0.1434408 0.04497893 -0.04467156)
      MusclePoint: torso (-0.05938459 0.1187692 -0.02602125)
    Thelen2003Muscle intobl_r: max_isometric_force=900 optimal_fiber_length=0.106202 tendon_slack_length=0.106202
        pennation_angle=0 muscle_model=9
      MusclePoint: pelvis (-0.04098308 0.07172039 0.1185436)
      MusclePoint: torso (0.07558039 0.1727552 0.0161958)
    Thelen2003Muscle intobl_l: max_isometric_force=900 optimal_fiber_length=0.106202 tendon_slack_length=0.106202
        pennation_angle=0 muscle_model=9
      MusclePoint: pelvis (-0.04098308 0.07172039 -0.1185436)
      MusclePoint: torso (0.07558039 0.1727552 -0.0161958)
    Thelen2003Muscle extobl_r: max_isometric_force=900 optimal_fiber_length=0.1263775 tendon_slack_length=0.1474404
        pennation_angle=0 muscle_model=9
      MusclePoint: pelvis (-0.03073731 -0.0651631 0.01024577)
      MusclePoint: torso (0.07018179 0.1187692 0.1187692)
    Thelen2003Muscle extobl_l: max_isometric_force=900 optimal_fiber_length=0.1263775 tendon_slack_length=0.1474404
        pennation_angle=0 muscle_model=9
      MusclePoint: pelvis (-0.03073731 -0.0651631 -0.01024577)
      MusclePoint: torso (0.07018179 0.1187692 -0.1187692)
  DynamicsEngine:
    SimmKinematicsEngine: gravity=(0 -9.80665 0)
      BodySet:
        SimmBody ground: mass=0 mass_center=(0 0 0) inertia=(0 0 0 0 0 0 0 0 0)
        SimmBody pelvis: mass=11.34498 mass_center=(-0.0724376 0 0)
            inertia=(0.1039565 0 0 0 0.08807986 0 0 0 0.05855136) meshes=(sacrum2.vtp pelvis.vtp l_pelvis.vtp)
        SimmBody femur_r: mass=8.960197 mass_center=(0 -0.1950308 0)
            inertia=(0.169769 0 0 0 0.04450255 0 0 0 0.1790245) meshes=femur.vtp
        SimmBody tibia_r: mass=3.571498 mass_center=(0 -0.1845572 0)
            inertia=(0.04744313 0 0 0 0.00480079 0 0 0 0.04810206) meshes=(tibia.vtp fibula.vtp)
        SimmBody patella_r: mass=0.0963317 mass_center=(0 0 0) inertia=(0.00110421 0 0 0 0.00110421 0 0 0 0.00110421)
            meshes=pat.vtp
        SimmBody talus_r: mass=0.0963317 mass_center=(0 0 0) inertia=(0.00119543 0 0 0 0.00119543 0 0 0 0.00119543)
            meshes=talus.vtp
        SimmBody calcn_r: mass=1.204146 mass_center=(0.1027085 0.03081254 0)
            inertia=(0.00142269 0 0 0 0.0039632 0 0 0 0.00416645) meshes=foot.vtp
        SimmBody toes_r: mass=0.2086545 mass_center=(0.03553713 0.00616251 -0.01797398)
            inertia=(0.00010162 0 0 0 0.00020324 0 0 0 0.00101621) meshes=bofoot.vtp
        SimmBody femur_l: mass=8.960197 mass_center=(0 -0.1950308 0)
            inertia=(0.169769 0 0 0 0.04450255 0 0 0 0.1790245) meshes=l_femur.vtp
        SimmBody tibia_l: mass=3.571498 mass_center=(0 -0.1845572 0)
            inertia=(0.04744313 0 0 0 0.00480079 0 0 0 0.04810206) meshes=(l_tibia.vtp l_fibula.vtp)
        SimmBody patella_l: mass=0.0963317 mass_center=(0 0 0) inertia=(0.00110421 0 0 0 0.00110421 0 0 0 0.00110421)
            meshes=l_patella.vtp
        SimmBody talus_l: mass=0.0963317 mass_center=(0 0 0) inertia=(0.00119543 0 0 0 0.00119543 0 0 0 0.00119543)
            meshes=l_talus.vtp
        SimmBody calcn_l: mass=1.204146 mass_center=(0.1027085 0.03081254 0)
            inertia=(0.00142269 0 0 0 0.0039632 0 0 0 0.00416645) meshes=l_foot.vtp
        SimmBody toes_l: mass=0.2086545 mass_center=(0.03553713 0.00616251 0.01797398)
            inertia=(0.00010162 0 0 0 0.00020324 0 0 0 0.00101621) meshes=l_bofoot.vtp
        SimmBody torso: mass=32.9807 mass_center=(-0.0323916 0.3455104 0)
            inertia=(1.655908 0 0 0 0.8484493 0 0 0 1.607505)
            meshes=(hat_spine.vtp hat_jaw.vtp hat_skull.vtp hat_ribs.vtp)
      SimmCoordinate [values shared by the 23 below unless stated]: tolerance=0.00000001 stiffness=0 clamped=true
          restraint_active=false default_value=0
      SimmCoordinate pelvis_tx: range=(-5 5) default_value=0.12 keys=p_key
      SimmCoordinate pelvis_ty: range=(-1 2) default_value=0.93 keys=q_key
      SimmCoordinate pelvis_tz: range=(-3 3) keys=q_key
      SimmCoordinate pelvis_list: range=(-1.570796 1.570796) keys=q_key
      SimmCoordinate pelvis_rotation: range=(-1.570796 1.570796) keys=q_key
      SimmCoordinate pelvis_tilt: range=(-1.570796 1.570796) keys=q_key
      SimmCoordinate hip_flexion_r: range=(-2.094395 2.094395) keys=(h_key leftmouse_button)
      SimmCoordinate hip_adduction_r: range=(-2.094395 2.094395) keys=(h_key leftmouse_button)
      SimmCoordinate hip_rotation_r: range=(-2.094395 2.094395) keys=(h_key leftmouse_button)
      SimmCoordinate knee_angle_r: range=(-2.094395 0.1745329) keys=k_key
      SimmCoordinate ankle_angle_r: range=(-1.570796 1.570796) keys=a_key
      SimmCoordinate subtalar_angle_r: range=(-1.570796 1.570796) keys=a_key locked=true
      SimmCoordinate mtp_angle_r: range=(-1.570796 1.570796) keys=t_key locked=true
      SimmCoordinate hip_flexion_l: range=(-2.094395 2.094395) keys=(h_key leftmouse_button)
      SimmCoordinate hip_adduction_l: range=(-2.094395 2.094395) keys=(h_key leftmouse_button)
      SimmCoordinate hip_rotation_l: range=(-2.094395 2.094395) keys=(h_key leftmouse_button)
      SimmCoordinate knee_angle_l: range=(-2.094395 0.1745329) keys=k_key
      SimmCoordinate ankle_angle_l: range=(-1.047198 1.047198) keys=a_key
      SimmCoordinate subtalar_angle_l: range=(-1.570796 1.570796) keys=a_key locked=true
      SimmCoordinate mtp_angle_l: range=(-1.047198 1.047198) keys=t_key locked=true
      SimmCoordinate lumbar_extension: range=(-1.570796 1.570796) keys=q_key
      SimmCoordinate lumbar_bending: range=(-1.570796 1.570796) keys=q_key
      SimmCoordinate lumbar_rotation: range=(-1.570796 1.570796) keys=q_key
      JointSet:
        SimmJoint ground_pelvis: bodies=(ground pelvis)
          DofSet:
            SimmTranslationDof tx: coordinate=pelvis_tx
              Value:
                natCubicSpline: x=(-360 360) y=(-360 360)
            SimmTranslationDof ty: coordinate=pelvis_ty
              Value:
                natCubicSpline: x=(-360 360) y=(-360 360)
            SimmTranslationDof tz: coordinate=pelvis_tz
              Value:
                natCubicSpline: x=(-360 360) y=(-360 360)
            SimmRotationDof r1: axis=(0 0 1) coordinate=pelvis_tilt
              Value:
                natCubicSpline: x=(-6.283185 6.283185) y=(-6.283185 6.283185)
            SimmRotationDof r2: axis=(1 0 0) coordinate=pelvis_list
              Value:
                natCubicSpline: x=(-6.283185 6.283185) y=(-6.283185 6.283185)
            SimmRotationDof r3: axis=(0 1 0) coordinate=pelvis_rotation
              Value:
                natCubicSpline: x=(-6.283185 6.283185) y=(-6.283185 6.283185)
        SimmJoint hip_r: bodies=(pelvis femur_r)
          DofSet:
            SimmTranslationDof tx:
              Value: Constant(value=-0.0724376)
            SimmTranslationDof ty:
              Value: Constant(value=-0.06772454)
            SimmTranslationDof tz:
              Value: Constant(value=0.08555218)
            SimmRotationDof r1: axis=(0 0 1) coordinate=hip_flexion_r
              Value:
                natCubicSpline: x=(-6.283185 6.283185) y=(-6.283185 6.283185)
            SimmRotationDof r2: axis=(1 0 0) coordinate=hip_adduction_r
              Value:
                natCubicSpline: x=(-6.283185 6.283185) y=(-6.283185 6.283185)
            SimmRotationDof r3: axis=(0 1 0) coordinate=hip_rotation_r
              Value:
                natCubicSpline: x=(-6.283185 6.283185) y=(-6.283185 6.283185)
        SimmJoint knee_r: bodies=(femur_r tibia_r)
          DofSet:
            SimmTranslationDof tx: coordinate=knee_angle_r
              Value:
                natCubicSpline: x=(-2.094395 -1.745329 -1.396263 -1.047198 -0.6981317 -0.3490659 -0.1745329 0.1973442 0.337395 0.4901776 1.52146 2.094395)
                    y=(-0.00367117 0.00205356 0.00471516 0.00470368 0.00243215 -0.00114724 -0.00355644 -0.00599662 -0.00623525 -0.00639472 -0.00623525 -0.00602301)
            SimmTranslationDof ty: coordinate=knee_angle_r
              Value:
                natCubicSpline: x=(-2.094395 -1.22173 -0.5235988 -0.3490659 -0.1745329 0.1591486 2.094395)
                    y=(-0.4848236 -0.4683034 -0.4577488 -0.4561426 -0.4549954 -0.4534627 -0.454307)
            SimmTranslationDof tz:
              Value: Constant(value=0)
            SimmRotationDof r1: axis=(0 0 1) coordinate=knee_angle_r
              Value:
                natCubicSpline: x=(-6.283185 6.283185) y=(-6.283185 6.283185)
            SimmRotationDof r2: axis=(1 0 0)
              Value: Constant(value=0)
            SimmRotationDof r3: axis=(0 1 0)
              Value: Constant(value=0)
        SimmJoint tib_pat_r: bodies=(tibia_r patella_r)
          DofSet:
            SimmTranslationDof tx: coordinate=knee_angle_r
              Value:
                natCubicSpline: x=(-2.094395 -1.396263 -1.047198 -0.6981317 -0.3490659 -0.1745329 0 0.00017453 0.00034907 0.08726646 2.094395)
                    y=(0.01710145 0.03202815 0.03766273 0.04250649 0.04636173 0.04784451 0.04903074 0.04903074 0.04903074 0.04903074 0.04903074)
            SimmTranslationDof ty: coordinate=knee_angle_r
              Value:
                natCubicSpline: x=(-2.094395 -1.570796 -1.396263 -1.047198 -0.6981317 -0.3490659 -0.1745329 0 0.00017453 0.00034907 0.08726646 2.094395)
                    y=(-0.02164865 -0.01996816 -0.01977046 -0.02016587 -0.02085784 -0.02164865 -0.02204406 -0.02243947 -0.02243947 -0.02243947 -0.02243947 -0.02243947)
            SimmTranslationDof tz:
              Value: Constant(value=0.00237246)
            SimmRotationDof r1: axis=(0 0 1) coordinate=knee_angle_r
              Value:
                natCubicSpline: x=(-2.094395 -1.999973 -1.457524 -0.5263913 0.02792527 0.1745329)
                    y=(0.3080506 0.3080506 0.3063053 0.270177 -0.03700098 -0.2799508)
            SimmRotationDof r2: axis=(1 0 0)
              Value: Constant(value=0)
            SimmRotationDof r3: axis=(0 1 0)
              Value: Constant(value=0)
        SimmJoint ankle_r: bodies=(tibia_r talus_r)
          DofSet:
            SimmTranslationDof tx:
              Value: Constant(value=0)
            SimmTranslationDof ty:
              Value: Constant(value=-0.4250649)
            SimmTranslationDof tz:
              Value: Constant(value=0)
            SimmRotationDof r1: axis=(-0.1050135 -0.1740224 0.9791263) coordinate=ankle_angle_r
              Value:
                natCubicSpline: x=(-6.283185 6.283185) y=(-6.283185 6.283185)
            SimmRotationDof r2: axis=(1 0 0)
              Value: Constant(value=0)
            SimmRotationDof r3: axis=(0 1 0)
              Value: Constant(value=0)
        SimmJoint subtalar_r: bodies=(talus_r calcn_r)
          DofSet:
            SimmTranslationDof tx:
              Value: Constant(value=-0.05432871)
            SimmTranslationDof ty:
              Value: Constant(value=-0.04673138)
            SimmTranslationDof tz:
              Value: Constant(value=0.00882271)
            SimmRotationDof r1: axis=(0.7871796 0.6047475 -0.1209495) coordinate=subtalar_angle_r
              Value:
                natCubicSpline: x=(-6.283185 6.283185) y=(-6.283185 6.283185)
            SimmRotationDof r2: axis=(0 1 0)
              Value: Constant(value=0)
            SimmRotationDof r3: axis=(0 0 1)
              Value: Constant(value=0)
        SimmJoint mtp_r: bodies=(calcn_r toes_r)
          DofSet:
            SimmTranslationDof tx:
              Value: Constant(value=0.1836428)
            SimmTranslationDof ty:
              Value: Constant(value=-0.00205417)
            SimmTranslationDof tz:
              Value: Constant(value=0.00110925)
            SimmRotationDof r1: axis=(-0.5809544 0 0.8139361) coordinate=mtp_angle_r
              Value:
                natCubicSpline: x=(-6.283185 6.283185) y=(-6.283185 6.283185)
            SimmRotationDof r2: axis=(1 0 0)
              Value: Constant(value=0)
            SimmRotationDof r3: axis=(0 1 0)
              Value: Constant(value=0)
        SimmJoint hip_l: bodies=(pelvis femur_l)
          DofSet:
            SimmTranslationDof tx:
              Value: Constant(value=-0.0724376)
            SimmTranslationDof ty:
              Value: Constant(value=-0.06772454)
            SimmTranslationDof tz:
              Value: Constant(value=-0.08555218)
            SimmRotationDof r1: axis=(0 0 1) coordinate=hip_flexion_l
              Value:
                natCubicSpline: x=(-6.283185 6.283185) y=(-6.283185 6.283185)
            SimmRotationDof r2: axis=(-1 0 0) coordinate=hip_adduction_l
              Value:
                natCubicSpline: x=(-6.283185 6.283185) y=(-6.283185 6.283185)
            SimmRotationDof r3: axis=(0 -1 0) coordinate=hip_rotation_l
              Value:
                natCubicSpline: x=(-6.283185 6.283185) y=(-6.283185 6.283185)
        SimmJoint knee_l: bodies=(femur_l tibia_l)
          DofSet:
            SimmTranslationDof tx: coordinate=knee_angle_l
              Value:
                natCubicSpline: x=(-2.094395 -1.745329 -1.396263 -1.047198 -0.6981317 -0.3490659 -0.1745329 0.1973442 0.337395 0.4901776 1.52146 2.094395)
                    y=(-0.00367117 0.00205356 0.00471516 0.00470368 0.00243215 -0.00114724 -0.00355644 -0.00599662 -0.00623525 -0.00639472 -0.00623525 -0.00602301)
            SimmTranslationDof ty: coordinate=knee_angle_l
              Value:
                natCubicSpline: x=(-2.094395 -1.22173 -0.5235988 -0.3490659 -0.1745329 0.1591486 2.094395)
                    y=(-0.4848236 -0.4683034 -0.4577488 -0.4561426 -0.4549954 -0.4534627 -0.454307)
            SimmTranslationDof tz:
              Value: Constant(value=0)
            SimmRotationDof r1: axis=(0 0 1) coordinate=knee_angle_l
              Value:
                natCubicSpline: x=(-6.283185 6.283185) y=(-6.283185 6.283185)
            SimmRotationDof r2: axis=(1 0 0)
              Value: Constant(value=0)
            SimmRotationDof r3: axis=(0 1 0)
              Value: Constant(value=0)
        SimmJoint tib_pat_l: bodies=(tibia_l patella_l)
          DofSet:
            SimmTranslationDof tx: coordinate=knee_angle_l
              Value:
                natCubicSpline: x=(-2.094395 -1.396263 -1.047198 -0.6981317 -0.3490659 -0.1745329 0 0.00017453 0.00034907 0.08726646 2.094395)
                    y=(0.01710145 0.03202815 0.03766273 0.04250649 0.04636173 0.04784451 0.04903074 0.04903074 0.04903074 0.04903074 0.04903074)
            SimmTranslationDof ty: coordinate=knee_angle_l
              Value:
                natCubicSpline: x=(-2.094395 -1.570796 -1.396263 -1.047198 -0.6981317 -0.3490659 -0.1745329 0 0.00017453 0.00034907 0.08726646 2.094395)
                    y=(-0.02164865 -0.01996816 -0.01977046 -0.02016587 -0.02085784 -0.02164865 -0.02204406 -0.02243947 -0.02243947 -0.02243947 -0.02243947 -0.02243947)
            SimmTranslationDof tz:
              Value: Constant(value=-0.00237246)
            SimmRotationDof r1: axis=(0 0 1) coordinate=knee_angle_l
              Value:
                natCubicSpline: x=(-2.094395 -1.999973 -1.457524 -0.5263913 0.02792527 0.1745329)
                    y=(0.3080506 0.3080506 0.3063053 0.270177 -0.03700098 -0.2799508)
            SimmRotationDof r2: axis=(1 0 0)
              Value: Constant(value=0)
            SimmRotationDof r3: axis=(0 1 0)
              Value: Constant(value=0)
        SimmJoint ankle_l: bodies=(tibia_l talus_l)
          DofSet:
            SimmTranslationDof tx:
              Value: Constant(value=0)
            SimmTranslationDof ty:
              Value: Constant(value=-0.4250649)
            SimmTranslationDof tz:
              Value: Constant(value=0)
            SimmRotationDof r1: axis=(0.1050135 -0.1740224 0.9791263) coordinate=ankle_angle_l
              Value:
                natCubicSpline: x=(-6.283185 6.283185) y=(-6.283185 6.283185)
            SimmRotationDof r2: axis=(1 0 0)
              Value: Constant(value=0)
            SimmRotationDof r3: axis=(0 1 0)
              Value: Constant(value=0)
        SimmJoint subtalar_l: bodies=(talus_l calcn_l)
          DofSet:
            SimmTranslationDof tx:
              Value: Constant(value=-0.05432871)
            SimmTranslationDof ty:
              Value: Constant(value=-0.04673138)
            SimmTranslationDof tz:
              Value: Constant(value=-0.00882271)
            SimmRotationDof r1: axis=(-0.7871796 -0.6047475 -0.1209495) coordinate=subtalar_angle_l
              Value:
                natCubicSpline: x=(-6.283185 6.283185) y=(-6.283185 6.283185)
            SimmRotationDof r2: axis=(0 1 0)
              Value: Constant(value=0)
            SimmRotationDof r3: axis=(0 0 1)
              Value: Constant(value=0)
        SimmJoint mtp_l: bodies=(calcn_l toes_l)
          DofSet:
            SimmTranslationDof tx:
              Value: Constant(value=0.1836428)
            SimmTranslationDof ty:
              Value: Constant(value=-0.00205417)
            SimmTranslationDof tz:
              Value: Constant(value=-0.00110925)
            SimmRotationDof r1: axis=(0.5809544 0 0.8139361) coordinate=mtp_angle_l
              Value:
                natCubicSpline: x=(-6.283185 6.283185) y=(-6.283185 6.283185)
            SimmRotationDof r2: axis=(1 0 0)
              Value: Constant(value=0)
            SimmRotationDof r3: axis=(0 1 0)
              Value: Constant(value=0)
        SimmJoint back: bodies=(pelvis torso)
          DofSet:
            SimmTranslationDof tx:
              Value: Constant(value=-0.1031749)
            SimmTranslationDof ty:
              Value: Constant(value=0.08350303)
            SimmTranslationDof tz:
              Value: Constant(value=0)
            SimmRotationDof r1: axis=(0 0 1) coordinate=lumbar_extension
              Value:
                natCubicSpline: x=(-6.283185 6.283185) y=(-6.283185 6.283185)
            SimmRotationDof r2: axis=(1 0 0) coordinate=lumbar_bending
              Value:
                natCubicSpline: x=(-6.283185 6.283185) y=(-6.283185 6.283185)
            SimmRotationDof r3: axis=(0 1 0) coordinate=lumbar_rotation
              Value:
                natCubicSpline: x=(-6.283185 6.283185) y=(-6.283185 6.283185)
      MarkerSet:
        Marker Sternum: torso (0.1205126 0.3072634 -0.00336063)
        Marker R.Acromium: torso (-0.00046801 0.4292206 0.1658798)
        Marker L.Acromium: torso (-0.00115034 0.4404003 -0.1751491)
        Marker Top.Head: torso (0.09620813 0.6956138 0.00366415)
        Marker R.ASIS: pelvis (0.02343144 0.03623223 0.1308445)
        Marker L.ASIS: pelvis (0.02837436 0.02754274 -0.1312565)
        Marker V.Sacral: pelvis (-0.1725251 0.04037186 0.00702547)
        Marker R.Thigh.Upper: femur_r (0.04634189 -0.2198448 0.09180049)
        Marker R.Thigh.Front: femur_r (0.1084946 -0.2814136 -0.00075402)
        Marker R.Thigh.Rear: femur_r (0.03561212 -0.3404911 0.08185447)
        Marker R.Knee.Lat: femur_r (-0.00325079 -0.4259317 0.06137276)
        Marker R.Knee.Med: femur_r (0.00055159 -0.4428281 -0.05971431)
        Marker R.Shank.Upper: tibia_r (-0.0273598 -0.05970509 0.070176)
        Marker R.Shank.Front: tibia_r (0.05100337 -0.09521291 0.01972629)
        Marker R.Shank.Rear: tibia_r (-0.01137053 -0.145164 0.08028372)
        Marker R.Ankle.Lat: tibia_r (-0.00756646 -0.4304709 0.05550619)
        Marker R.Ankle.Med: tibia_r (0.0045587 -0.4160521 -0.03333903)
        Marker R.Heel: calcn_r (-0.02034204 0.01726569 -0.00555882)
        Marker R.Midfoot.Sup: calcn_r (0.1226637 0.03358438 -0.04041077)
        Marker R.Midfoot.Lat: calcn_r (0.1181924 0.00665741 0.0654048)
        Marker R.Toe.Lat: calcn_r (0.2088522 -0.01622086 0.07285245)
        Marker R.Toe.Med: calcn_r (0.2097417 0.00357244 -0.03452766)
        Marker R.Toe.Tip: calcn_r (0.2709043 0.00360966 -0.00313772)
        Marker L.Thigh.Upper: femur_l (0.02340074 -0.2066395 -0.09698569)
        Marker L.Thigh.Front: femur_l (0.1107156 -0.2488274 -0.03271396)
        Marker L.Thigh.Rear: femur_l (0.01572554 -0.3153198 -0.0821732)
        Marker L.Knee.Lat: femur_l (-0.00845094 -0.4456011 -0.06418188)
        Marker L.Knee.Med: femur_l (0.00760557 -0.4457514 0.05100004)
        Marker L.Shank.Upper: tibia_l (-0.00582634 -0.07136264 -0.0794519)
        Marker L.Shank.Front: tibia_l (0.04524643 -0.1213003 -0.03025532)
        Marker L.Shank.Rear: tibia_l (-0.02389651 -0.1143973 -0.08819646)
        Marker L.Ankle.Lat: tibia_l (-0.00257291 -0.4282434 -0.05714199)
        Marker L.Ankle.Med: tibia_l (0.01301792 -0.4052071 0.03298425)
        Marker L.Heel: calcn_l (-0.02224717 0.02734539 0.00667973)
        Marker L.Midfoot.Sup: calcn_l (0.1498296 0.03564788 0.03435716)
        Marker L.Midfoot.Lat: calcn_l (0.1333319 0.01697128 -0.06233714)
        Marker L.Toe.Lat: calcn_l (0.1959724 -0.00808386 -0.06769609)
        Marker L.Toe.Med: calcn_l (0.2117828 0.01166961 0.03259495)
        Marker L.Toe.Tip: calcn_l (0.2615045 0.00800538 0.008464)
