# OpenSim document version 20200
ScaleTool subject01:
  mass: 72.6 [kg]
  height: 1803.4
  age: 99
  notes: This is an example setup file for scale.exe.
  GenericModelMaker:
    model_file: gait2354_simbody.osim
    marker_set_file: gait2354_Scale_MarkerSet.xml
  ModelScaler:
    scaling_order: measurements manualScale
    marker_file: subject01_static.trc
    time_range: 1 2
    preserve_mass_distribution: true
    output_model_file: subject01_scaledOnly.osim
    output_scale_file: subject01_scaleSet_applied.xml
    ScaleSet: file=subject01_Scale_ScaleSet.xml
    MeasurementSet: file=gait2354_Scale_MeasurementSet.xml
  MarkerPlacer:
    marker_file: subject01_static.trc
    time_range: 1 1.01
    output_model_file: subject01_simbody.osim
    output_motion_file: subject01_static_output.mot
    IKTaskSet: file=gait2354_Scale_Tasks.xml
