# OpenSim document version 10600
Model subject01:
  length_units: meters
  force_units: N
  credits:
    Delp S.L., Loan J.P., Hoy M.G., Zajac F.E., Topp E.L., Rosen J.M., Thelen D.G., Anderson F.C., Seth A.
  publications:
    Notes: 3D, 23 DOF gait model created by D.G. Thelen, Univ. of Wisconsin-Madison, and Ajay Seth, Frank C. Anderson, and Scott L. Delp, Stanford University. Lower extremity joint defintions based on Delp et al. (1990). Low back joint and anthropometry based on Anderson and Pandy (1999, 2001). Planar knee model of Yamaguchi and Zajac (1989). Seth removed the patella to avoid kinematic constraints; insertions of the quadrucepts are handled with moving points in the tibia frame. Number of muscles was reduced by Anderson to improve simulation speed for demonstrations and is not intended to be used in research.
    Delp, S.L., Loan, J.P., Hoy, M.G., Zajac, F.E., Topp E.L., Rosen, J.M.: An interactive graphics-based model of the lower extremity to study orthopaedic surgical procedures, IEEE Transactions on Biomedical Engineering, vol. 37, pp. 757-767, 1990.
    Yamaguchi G.T., Zajac F.E.: A planar model of the knee joint to characterize the knee extensor mechanism." J . Biomecl7. vol. 21. pp. 1-10. 1989.
    Anderson F.C., Pandy M.G.: A dynamic optimization solution for vertical jumping in three dimensions. Computer Methods in Biomechanics and Biomedical Engineering 2:201-231, 1999.
    Anderson F.C., Pandy M.G.: Dynamic optimization of human walking. Journal of Biomechanical Engineering 123:381-390, 2001.
  defaults: Thelen2003Muscle default: muscle_model=9 max_isometric_force=546 optimal_fiber_length=0.0535
      tendon_slack_length=0.078 pennation_angle=0 activation_time_constant=0.01 deactivation_time_constant=0.04 Vmax=10
      Vmax0=5 FmaxTendonStrain=0.033 FmaxMuscleStrain=0.6 KshapeActive=0.5 KshapePassive=4 damping=0.05 Af=0.3 Flen=1.8
  DynamicsEngine:
    SimbodyEngine default: gravity=(0 -9.80665 0)
      BodySet:
        Body ground: mass=0 mass_center=(0 0 0) inertia_xx=0 inertia_yy=0 inertia_zz=0 meshes=treadmill.vtp
        Body pelvis: mass=11.37505 mass_center=(-0.0724376 0 0) inertia_xx=0.104232 inertia_yy=0.08831329
            inertia_zz=0.05870654 meshes=(sacrum.vtp pelvis.vtp l_pelvis.vtp)
          CustomJoint ground_pelvis: parent_body=ground location_in_parent=(0 0 0) location=(0 0 0)
            Coordinate pelvis_tx: default_value=0 initial_value=0 tolerance=0.00000001 stiffness=0 range=(-5 5)
                keys=p_key clamped=true restraint_active=false
            Coordinate pelvis_ty: default_value=0.93 initial_value=0.93 tolerance=0 stiffness=0 range=(-1 2) keys=q_key
                clamped=true restraint_active=false
            Coordinate pelvis_tz: default_value=0 initial_value=0 tolerance=0 stiffness=0 range=(-3 3) keys=q_key
                clamped=true restraint_active=false
            Coordinate pelvis_tilt: default_value=0 initial_value=0 tolerance=0 stiffness=0 range=(-1.570796 1.570796)
                keys=q_key clamped=true restraint_active=false
            Coordinate pelvis_list: default_value=0 initial_value=0 tolerance=0 stiffness=0 range=(-1.570796 1.570796)
                keys=q_key clamped=true restraint_active=false
            Coordinate pelvis_rotation: default_value=0 initial_value=0 tolerance=0 stiffness=0
                range=(-1.570796 1.570796) keys=q_key clamped=true restraint_active=false
            TransformAxis tx: coordinate=pelvis_tx is_rotation=false axis=(1 0 0)
            TransformAxis ty: coordinate=pelvis_ty is_rotation=false axis=(0 1 0)
            TransformAxis tz: coordinate=pelvis_tz is_rotation=false axis=(0 0 1)
            TransformAxis r1: coordinate=pelvis_tilt axis=(0 0 1)
            TransformAxis r2: coordinate=pelvis_list axis=(1 0 0)
            TransformAxis r3: coordinate=pelvis_rotation axis=(0 1 0)
        Body femur_r: mass=8.983943 mass_center=(0 -0.1950308 0) inertia_xx=0.1702189 inertia_yy=0.04462049
            inertia_zz=0.1794989 meshes=femur.vtp
          CustomJoint hip_r: parent_body=pelvis location_in_parent=(-0.0724376 -0.06772454 0.08555218) location=(0 0 0)
            Coordinate hip_flexion_r: default_value=0 initial_value=0 tolerance=0 stiffness=0
                range=(-2.094395 2.094395) keys=(h_key leftmouse_button) clamped=true restraint_active=false
            Coordinate hip_adduction_r: default_value=0 initial_value=0 tolerance=0 stiffness=0
                range=(-2.094395 2.094395) keys=(h_key leftmouse_button) clamped=true restraint_active=false
            Coordinate hip_rotation_r: default_value=0 initial_value=0 tolerance=0 stiffness=0
                range=(-2.094395 2.094395) keys=(h_key leftmouse_button) clamped=true restraint_active=false
            TransformAxis r1: coordinate=hip_flexion_r axis=(0 0 1)
            TransformAxis r2: coordinate=hip_adduction_r axis=(1 0 0)
            TransformAxis r3: coordinate=hip_rotation_r axis=(0 1 0)
        Body tibia_r: mass=3.484376 mass_center=(0 -0.1848538 0) inertia_xx=0.04756886 inertia_yy=0.00481352
            inertia_zz=0.04822954 meshes=(tibia.vtp fibula.vtp)
          CustomJoint knee_r: parent_body=femur_r location_in_parent=(0 0 0) location=(0 0 0)
            Coordinate knee_angle_r: default_value=0 initial_value=0 tolerance=0 stiffness=0
                range=(-2.094395 0.1745329) keys=k_key clamped=true restraint_active=false
            Coordinate tib_tx_r: default_value=0 initial_value=0 tolerance=0 stiffness=0 range=(-5 5) clamped=false
                restraint_active=false
            Coordinate tib_ty_r: default_value=0 initial_value=0 tolerance=0 stiffness=0 range=(-1 2) clamped=false
                restraint_active=false
            TransformAxis r1: coordinate=knee_angle_r axis=(0 0 1)
            TransformAxis tx: coordinate=tib_tx_r is_rotation=false axis=(1 0 0)
            TransformAxis ty: coordinate=tib_ty_r is_rotation=false axis=(0 1 0)
        Body patella_r: mass=0.09658699 mass_center=(0 0 0) inertia_xx=0.00110722 inertia_yy=0.00110722
            inertia_zz=0.00110722 meshes=pat.vtp
          CustomJoint tib_pat_r: parent_body=tibia_r location_in_parent=(0 0 0) location=(0 0 0)
            Coordinate pat_angle_r: default_value=-0.00116917 initial_value=-0.00116917 tolerance=0 stiffness=0
                range=(-2.094 0.175) clamped=false restraint_active=false
            Coordinate pat_tx_r: default_value=0.0496 initial_value=0.0496 tolerance=0 stiffness=0 range=(-5 5)
                clamped=false restraint_active=false
            Coordinate pat_ty_r: default_value=-0.0227 initial_value=-0.0227 tolerance=0 stiffness=0 range=(-5 5)
                clamped=false restraint_active=false
            TransformAxis r1: coordinate=pat_angle_r axis=(0 0 1)
            TransformAxis tx: coordinate=pat_tx_r is_rotation=false axis=(1 0 0)
            TransformAxis ty: coordinate=pat_ty_r is_rotation=false axis=(0 1 0)
        Body talus_r: mass=0.09658699 mass_center=(0 0 0) inertia_xx=0.00119859 inertia_yy=0.00119859
            inertia_zz=0.00119859 meshes=talus.vtp
          CustomJoint ankle_r: parent_body=tibia_r location_in_parent=(0 -0.4250649 0) location=(0 0 0)
            Coordinate ankle_angle_r: default_value=0 initial_value=0 tolerance=0 stiffness=0 range=(-1.571 1.571)
                keys=a_key clamped=false restraint_active=false
            TransformAxis r1: coordinate=ankle_angle_r axis=(-0.105 -0.174 0.979)
        Body calcn_r: mass=1.207337 mass_center=(0.1027085 0.03081254 0) inertia_xx=0.0010189 inertia_yy=0.0040756
            inertia_zz=0.0040756 meshes=foot.vtp
          CustomJoint subtalar_r: parent_body=talus_r location_in_parent=(-0.05458493 -0.04678708 0.00891182)
              location=(0 0 0)
            Coordinate subtalar_angle_r: default_value=0 initial_value=0 tolerance=0 stiffness=0 range=(-1.571 1.571)
                keys=a_key clamped=false restraint_active=false
            TransformAxis r1: coordinate=subtalar_angle_r axis=(0.787 0.605 -0.121)
        Body toes_r: mass=0.2095938 mass_center=(0.03594797 0.00616251 -0.01848753) inertia_xx=0 inertia_yy=0
            inertia_zz=0.0010189 meshes=bofoot.vtp
          CustomJoint mtp_r: parent_body=calcn_r location_in_parent=(0.1838482 -0.00205417 0.00102708) location=(0 0 0)
            Coordinate mtp_angle_r: default_value=0 initial_value=0 tolerance=0 stiffness=0 range=(-1.571 1.571)
                keys=t_key clamped=false restraint_active=false
            TransformAxis r1: coordinate=mtp_angle_r axis=(-0.581 0 0.814)
        Body femur_l: mass=8.983556 mass_center=(0 -0.1950308 0) inertia_xx=0.170346 inertia_yy=0.04449337
            inertia_zz=0.1792447 meshes=l_femur.vtp
          CustomJoint hip_l: parent_body=pelvis location_in_parent=(-0.07274497 -0.06762208 -0.08606447)
              location=(0 0 0)
            Coordinate hip_flexion_l: default_value=0 initial_value=0 tolerance=0 stiffness=0 range=(-2.094 2.094)
                keys=(h_key leftmouse_button) clamped=false restraint_active=false
            Coordinate hip_adduction_l: default_value=0 initial_value=0 tolerance=0 stiffness=0 range=(-2.094 2.094)
                keys=(h_key leftmouse_button) clamped=false restraint_active=false
            Coordinate hip_rotation_l: default_value=0 initial_value=0 tolerance=0 stiffness=0 range=(-2.094 2.094)
                keys=(h_key leftmouse_button) clamped=false restraint_active=false
            TransformAxis r1: coordinate=hip_flexion_l axis=(0 0 1)
            TransformAxis r2: coordinate=hip_adduction_l axis=(-1 0 0)
            TransformAxis r3: coordinate=hip_rotation_l axis=(0 -1 0)
        Body tibia_l: mass=3.484376 mass_center=(0 -0.1848538 0) inertia_xx=0.04756886 inertia_yy=0.00481352
            inertia_zz=0.04822954 meshes=(l_tibia.vtp l_fibula.vtp)
          CustomJoint knee_l: parent_body=femur_l location_in_parent=(0 0 0) location=(0 0 0)
            Coordinate knee_angle_l: default_value=0 initial_value=0 tolerance=0.00000001 stiffness=0
                range=(-2.094395 0.1745329) keys=k_key clamped=false restraint_active=false
            TransformAxis tx: coordinate=knee_angle_l is_rotation=false axis=(1 0 0)
              natCubicSpline: min_x=-1000000000000000000000000000000 max_x=1000000000000000000000000000000
                  min_y=-1000000000000000000000000000000 max_y=1000000000000000000000000000000
                  min_z=-1000000000000000000000000000000 max_z=1000000000000000000000000000000
                  x=(-2.094395 -1.745329 -1.396263 -1.047198 -0.6981317 -0.3490659 -0.1745329 0.1973442 0.337395 0.4901776 1.52146 2.094395)
                  y=(-0.00367117 0.00205356 0.00471516 0.00470368 0.00243215 -0.00114724 -0.00355644 -0.00599662 -0.00623525 -0.00639472 -0.00623525 -0.00602301)
            TransformAxis ty: coordinate=knee_angle_l is_rotation=false axis=(0 1 0)
              natCubicSpline: min_x=-1000000000000000000000000000000 max_x=1000000000000000000000000000000
                  min_y=-1000000000000000000000000000000 max_y=1000000000000000000000000000000
                  min_z=-1000000000000000000000000000000 max_z=1000000000000000000000000000000
                  x=(-2.094395 -1.22173 -0.5235988 -0.3490659 -0.1745329 0.1591486 2.094395)
                  y=(-0.4848236 -0.4683034 -0.4577488 -0.4561426 -0.4549954 -0.4534627 -0.454307)
            TransformAxis r1: coordinate=knee_angle_l axis=(0 0 1)
        Body patella_l: mass=0.09658699 mass_center=(0 0 0) inertia_xx=0.00110722 inertia_yy=0.00110722
            inertia_zz=0.00110722 meshes=l_patella.vtp
          CustomJoint tib_pat_l: parent_body=tibia_l location_in_parent=(0 0 0) location=(0 0 0)
            Coordinate pat_angle_l: default_value=-0.00116917 initial_value=-0.00116917 tolerance=0 stiffness=0
                range=(-2.094 0.175) clamped=false restraint_active=false
            Coordinate pat_tx_l: default_value=0.0496 initial_value=0.0496 tolerance=0 stiffness=0 range=(-5 5)
                clamped=false restraint_active=false
            Coordinate pat_ty_l: default_value=-0.0227 initial_value=-0.0227 tolerance=0 stiffness=0 range=(-5 5)
                clamped=false restraint_active=false
            TransformAxis r1: coordinate=pat_angle_l axis=(0 0 1)
            TransformAxis tx: coordinate=pat_tx_l is_rotation=false axis=(1 0 0)
            TransformAxis ty: coordinate=pat_ty_l is_rotation=false axis=(0 1 0)
        Body talus_l: mass=0.09658699 mass_center=(0 0 0) inertia_xx=0.00119859 inertia_yy=0.00119859
            inertia_zz=0.00119859 meshes=l_talus.vtp
          CustomJoint ankle_l: parent_body=tibia_l location_in_parent=(0 -0.4250649 0) location=(0 0 0)
            Coordinate ankle_angle_l: default_value=0 initial_value=0 tolerance=0 stiffness=0 range=(-1.047 1.047)
                keys=a_key clamped=false restraint_active=false
            TransformAxis r1: coordinate=ankle_angle_l axis=(0.105 -0.174 0.979)
        Body calcn_l: mass=1.207337 mass_center=(0.1027085 0.03081254 0) inertia_xx=0.0010189 inertia_yy=0.0040756
            inertia_zz=0.0040756 meshes=l_foot.vtp
          CustomJoint subtalar_l: parent_body=talus_l location_in_parent=(-0.05458493 -0.04678708 -0.00891182)
              location=(0 0 0)
            Coordinate subtalar_angle_l: default_value=0 initial_value=0 tolerance=0 stiffness=0 range=(-1.571 1.571)
                keys=a_key clamped=false restraint_active=false
            TransformAxis r1: coordinate=subtalar_angle_l axis=(-0.787 -0.605 -0.121)
        Body toes_l: mass=0.2095938 mass_center=(0.03594797 0.00616251 0.01848753) inertia_xx=0 inertia_yy=0
            inertia_zz=0.0010189 meshes=l_bofoot.vtp
          CustomJoint mtp_l: parent_body=calcn_l location_in_parent=(0.1838482 -0.00205417 -0.00102708)
              location=(0 0 0)
            Coordinate mtp_angle_l: default_value=0 initial_value=0 tolerance=0 stiffness=0 range=(-1.047 1.047)
                keys=t_key clamped=false restraint_active=false
            TransformAxis r1: coordinate=mtp_angle_l axis=(0.581 0 0.814)
        Body torso: mass=33.06849 mass_center=(0.0302058 0.3452777 0.01315084) inertia_xx=1.657498 inertia_yy=0.8489901
            inertia_zz=1.609145 meshes=(hat_spine.vtp hat_jaw.vtp hat_skull.vtp hat_ribs.vtp)
          CustomJoint back: parent_body=pelvis location_in_parent=(-0.1034823 0.08401532 0) location=(0 0 0)
            Coordinate lumbar_extension: default_value=0 initial_value=0 tolerance=0 stiffness=0 range=(-1.571 1.571)
                keys=q_key clamped=false restraint_active=false
            Coordinate lumbar_bending: default_value=0 initial_value=0 tolerance=0 stiffness=0 range=(-1.571 1.571)
                keys=q_key clamped=false restraint_active=false
            Coordinate lumbar_rotation: default_value=0 initial_value=0 tolerance=0 stiffness=0 range=(-1.571 1.571)
                keys=q_key clamped=false restraint_active=false
            TransformAxis r1: coordinate=lumbar_extension axis=(0 0 1)
            TransformAxis r2: coordinate=lumbar_bending axis=(1 0 0)
            TransformAxis r3: coordinate=lumbar_rotation axis=(0 1 0)
      ConstraintSet:
        CoordinateCouplerConstraint knee_tx_r: independent_coordinate_names=knee_angle_r
            dependent_coordinate_name=tib_tx_r
          coupled_coordinates_function: natCubicSpline: x=(-2.094395 -1.745329 -1.396263 -1.047198 -0.6981317 -0.3490659 -0.1745329 0.1973442 0.337395 0.4901776 1.52146 2.094395)
              y=(-0.00367117 0.00205356 0.00471516 0.00470368 0.00243215 -0.00114724 -0.00355644 -0.00599662 -0.00623525 -0.00639472 -0.00623525 -0.00602301)
        CoordinateCouplerConstraint knee_ty_r: independent_coordinate_names=knee_angle_r
            dependent_coordinate_name=tib_ty_r
          coupled_coordinates_function: natCubicSpline: x=(-2.094395 -1.22173 -0.5235988 -0.3490659 -0.1745329 0.1591486 2.094395)
              y=(-0.4848236 -0.4683034 -0.4577488 -0.4561426 -0.4549954 -0.4534627 -0.454307)
        CoordinateCouplerConstraint pat_tx_r: independent_coordinate_names=knee_angle_r
            dependent_coordinate_name=pat_tx_r
          coupled_coordinates_function: natCubicSpline: x=(-2.094395 -1.396263 -1.047198 -0.6981317 -0.3490659 -0.1745329 0 0.00017453 0.00034907 0.08726646 2.094395)
              y=(0.01710145 0.03202815 0.03766273 0.04250649 0.04636173 0.04784451 0.04903074 0.04903074 0.04903074 0.04903074 0.04903074)
        CoordinateCouplerConstraint pat_ty_r: independent_coordinate_names=knee_angle_r
            dependent_coordinate_name=pat_ty_r
          coupled_coordinates_function: natCubicSpline: x=(-2.094395 -1.570796 -1.396263 -1.047198 -0.6981317 -0.3490659 -0.1745329 0 0.00017453 0.00034907 0.08726646 2.094395)
              y=(-0.02164865 -0.01996816 -0.01977046 -0.02016587 -0.02085784 -0.02164865 -0.02204406 -0.02243947 -0.02243947 -0.02243947 -0.02243947 -0.02243947)
        CoordinateCouplerConstraint pat_angle_r: independent_coordinate_names=knee_angle_r
            dependent_coordinate_name=pat_angle_r
          coupled_coordinates_function: natCubicSpline: x=(-2.094395 -1.999973 -1.457524 -0.5263913 0.02792527 0.1745329)
              y=(0.3080506 0.3080506 0.3063053 0.270177 -0.03700098 -0.2799508)
        CoordinateCouplerConstraint pat_tx_l: independent_coordinate_names=knee_angle_l
            dependent_coordinate_name=pat_tx_l
          coupled_coordinates_function: natCubicSpline: x=(-2.094395 -1.396263 -1.047198 -0.6981317 -0.3490659 -0.1745329 0 0.00017453 0.00034907 0.08726646 2.094395)
              y=(0.01710145 0.03202815 0.03766273 0.04250649 0.04636173 0.04784451 0.04903074 0.04903074 0.04903074 0.04903074 0.04903074)
        CoordinateCouplerConstraint pat_ty_l: independent_coordinate_names=knee_angle_l
            dependent_coordinate_name=pat_ty_l
          coupled_coordinates_function: natCubicSpline: x=(-2.094395 -1.570796 -1.396263 -1.047198 -0.6981317 -0.3490659 -0.1745329 0 0.00017453 0.00034907 0.08726646 2.094395)
              y=(-0.02164865 -0.01996816 -0.01977046 -0.02016587 -0.02085784 -0.02164865 -0.02204406 -0.02243947 -0.02243947 -0.02243947 -0.02243947 -0.02243947)
        CoordinateCouplerConstraint pat_angle_l: independent_coordinate_names=knee_angle_l
            dependent_coordinate_name=pat_angle_l
          coupled_coordinates_function: natCubicSpline: x=(-2.094395 -1.999973 -1.457524 -0.5263913 0.02792527 0.1745329)
              y=(0.3080506 0.3080506 0.3063053 0.270177 -0.03700098 -0.2799508)
      MarkerSet:
        Marker Sternum: torso (0.1208212 0.3067572 -0.00326385)
        Marker R.Acromium: torso (-0.00032125 0.4287063 0.1658668)
        Marker L.Acromium: torso (-0.00067799 0.439902 -0.1751621)
        Marker Top.Head: torso (0.09650908 0.6951073 0.00375596)
        Marker R.ASIS: pelvis (0.02342325 0.03618784 0.1307961)
        Marker L.ASIS: pelvis (0.02838083 0.02759999 -0.131308)
        Marker V.Sacral: pelvis (-0.1725263 0.04037517 0.00696772)
        Marker R.Thigh.Upper: femur_r (0.04635595 -0.2198499 0.09173253)
        Marker R.Thigh.Front: femur_r (0.1084952 -0.2814335 -0.00082118)
        Marker R.Thigh.Rear: femur_r (0.03562446 -0.3404978 0.08180713)
        Marker R.Knee.Lat: femur_r (-0.0032416 -0.4259415 0.06134451)
        Marker R.Knee.Med: femur_r (0.00054333 -0.442857 -0.05974043)
        Marker R.Shank.Upper: tibia_r (-0.0273659 -0.05970675 0.07016577)
        Marker R.Shank.Front: tibia_r (0.05097909 -0.0952462 0.01971011)
        Marker R.Shank.Rear: tibia_r (-0.01140109 -0.1451689 0.08028444)
        Marker R.Ankle.Lat: tibia_r (-0.00768727 -0.4304808 0.05555073)
        Marker R.Ankle.Med: tibia_r (0.00442925 -0.4160795 -0.03329851)
        Marker R.Heel: calcn_r (-0.02022255 0.01732904 -0.00559795)
        Marker R.Midfoot.Sup: calcn_r (0.1227904 0.03359025 -0.0404472)
        Marker R.Midfoot.Lat: calcn_r (0.1183038 0.006712 0.06538012)
        Marker R.Toe.Lat: calcn_r (0.2089564 -0.01618947 0.07284436)
        Marker R.Toe.Med: calcn_r (0.2098592 0.00355547 -0.03454454)
        Marker R.Toe.Tip: calcn_r (0.2710196 0.00358884 -0.00315033)
        Marker L.Thigh.Upper: femur_l (0.02362715 -0.2066232 -0.09665219)
        Marker L.Thigh.Front: femur_l (0.110873 -0.2489028 -0.03234706)
        Marker L.Thigh.Rear: femur_l (0.01587325 -0.315307 -0.081906)
        Marker L.Knee.Lat: femur_l (-0.00839771 -0.445583 -0.06400398)
        Marker L.Knee.Med: femur_l (0.00758319 -0.4458084 0.05118834)
        Marker L.Shank.Upper: tibia_l (-0.00579506 -0.07133238 -0.07932247)
        Marker L.Shank.Front: tibia_l (0.04523078 -0.1213155 -0.03012333)
        Marker L.Shank.Rear: tibia_l (-0.02387345 -0.1143561 -0.08810388)
        Marker L.Ankle.Lat: tibia_l (-0.00266955 -0.4282273 -0.05722187)
        Marker L.Ankle.Med: tibia_l (0.01287186 -0.4052494 0.0329278)
        Marker L.Heel: calcn_l (-0.02212838 0.02740752 0.00666943)
        Marker L.Midfoot.Sup: calcn_l (0.1499495 0.03563589 0.0343619)
        Marker L.Midfoot.Lat: calcn_l (0.13345 0.01709652 -0.06235849)
        Marker L.Toe.Lat: calcn_l (0.1960854 -0.00796423 -0.06775078)
        Marker L.Toe.Med: calcn_l (0.2118978 0.01164719 0.03256781)
        Marker L.Toe.Tip: calcn_l (0.2616192 0.00800599 0.00843286)
  ActuatorSet:
    Thelen2003Muscle [values shared by the 54 below unless stated]: muscle_model=9 activation_time_constant=0.01
        deactivation_time_constant=0.04 Vmax=10 Vmax0=5 FmaxTendonStrain=0.033 FmaxMuscleStrain=0.6 KshapeActive=0.5
        KshapePassive=4 damping=0.05 Af=0.3 Flen=1.8
    Thelen2003Muscle glut_med1_r: max_isometric_force=1119 optimal_fiber_length=0.05640635
        tendon_slack_length=0.08223729 pennation_angle=0.1396263
      MusclePoint P1: pelvis (-0.04180274 0.03114714 0.1238714)
      MusclePoint P2: femur_r (-0.02500983 -0.01342271 0.06367182)
    Thelen2003Muscle glut_med2_r: max_isometric_force=873 optimal_fiber_length=0.08913177
        tendon_slack_length=0.05590513 pennation_angle=0
      MusclePoint P1: pelvis (-0.08760134 0.04559368 0.0784826)
      MusclePoint P2: femur_r (-0.02959879 -0.00665399 0.06045955)
    Thelen2003Muscle glut_med3_r: max_isometric_force=1000 optimal_fiber_length=0.06853064
        tendon_slack_length=0.05622483 pennation_angle=0.3316126
      MusclePoint P1: pelvis (-0.1253058 0.01075806 0.06639259)
      MusclePoint P2: femur_r (-0.03544972 -0.00539203 0.05942703)
    Thelen2003Muscle bifemlh_r: max_isometric_force=2700 optimal_fiber_length=0.1236311 tendon_slack_length=0.369759
        pennation_angle=0
      MusclePoint P1: pelvis (-0.1290557 -0.1050909 0.07114663)
      MusclePoint P2: tibia_r (-0.02975454 -0.03558683 0.02909223)
      MusclePoint P3: tibia_r (-0.02313144 -0.05565384 0.03390634)
    Thelen2003Muscle bifemsh_r: max_isometric_force=804 optimal_fiber_length=0.1914449 tendon_slack_length=0.09848899
        pennation_angle=0.4014257
      MusclePoint P1: femur_r (0.0057362 -0.2421824 0.02684542)
      MusclePoint P2: tibia_r (-0.02975454 -0.03558683 0.02909223)
      MusclePoint P3: tibia_r (-0.02313144 -0.05565384 0.03390634)
    Thelen2003Muscle sar_r: max_isometric_force=156 optimal_fiber_length=0.5742156 tendon_slack_length=0.1104261
        pennation_angle=0
      MusclePoint P1: pelvis (-0.01567603 -0.00133195 0.1272525)
      MusclePoint P2: femur_r (-0.00344172 -0.4093352 -0.0482988)
      MusclePoint P3: tibia_r (-0.00553573 -0.04141911 -0.03944207)
      MusclePoint P4: tibia_r (0.00593114 -0.058224 -0.03786043)
      MusclePoint P5: tibia_r (0.02402111 -0.08303593 -0.02491078)
    Thelen2003Muscle add_mag2_r: max_isometric_force=2343 optimal_fiber_length=0.1409897 tendon_slack_length=0.1398245
        pennation_angle=0.05235988
      MusclePoint P1: pelvis (-0.08514235 -0.1221296 0.03155697)
      MusclePoint P2: femur_r (0.0061951 -0.2621443 0.02604235)
    Thelen2003Muscle tfl_r: max_isometric_force=233 optimal_fiber_length=0.1060379 tendon_slack_length=0.4743801
        pennation_angle=0.05235988
      MusclePoint P1: pelvis (-0.03186435 0.02192595 0.12715)
      MusclePoint P2: femur_r (0.03372886 -0.1141504 0.06849023)
      MusclePoint P3: femur_r (0.0061951 -0.4645175 0.04095647)
      MusclePoint P4: tibia_r (0.00593114 -0.04814107 0.02935913)
    Thelen2003Muscle pect_r: max_isometric_force=266 optimal_fiber_length=0.1116559 tendon_slack_length=0.03684646
        pennation_angle=0
      MusclePoint P1: pelvis (-0.04415927 -0.07868752 0.04620842)
      MusclePoint P2: femur_r (-0.01399633 -0.09430313 0.02902517)
    Thelen2003Muscle grac_r: max_isometric_force=162 optimal_fiber_length=0.3965859 tendon_slack_length=0.1419597
        pennation_angle=0.05235988
      MusclePoint P1: pelvis (-0.07582895 -0.1216173 0.02862668)
      MuscleViaPoint P2: tibia_r (-0.02626506 -0.03153388 -0.03730686) range=(-0.4363323 0.1745329)
          coordinate=knee_angle_r
      MusclePoint P3: tibia_r (-0.019207 -0.05093859 -0.03538912)
      MusclePoint P4: tibia_r (0.00593114 -0.08264052 -0.02253832)
    Thelen2003Muscle glut_max1_r: max_isometric_force=573 optimal_fiber_length=0.151587 tendon_slack_length=0.1334393
        pennation_angle=0.08726646
      MusclePoint P1: pelvis (-0.122437 0.06270411 0.07172039)
      MusclePoint P2: pelvis (-0.1322729 0.00122949 0.09077753)
      MusclePoint P3: femur_r (-0.05242887 -0.02845155 0.04497181)
      MusclePoint P4: femur_r (-0.03177855 -0.06493378 0.05392028)
    Thelen2003Muscle glut_max2_r: max_isometric_force=819 optimal_fiber_length=0.1593947 tendon_slack_length=0.1377084
        pennation_angle=0
      MusclePoint P1: pelvis (-0.1382154 0.01803256 0.05768369)
      MusclePoint P2: pelvis (-0.1409818 -0.05327801 0.09364634)
      MusclePoint P3: femur_r (-0.04887242 -0.06080372 0.03361413)
      MusclePoint P4: femur_r (-0.01789694 -0.1165596 0.04806936)
    Thelen2003Muscle glut_max3_r: max_isometric_force=552 optimal_fiber_length=0.1562884 tendon_slack_length=0.1573737
        pennation_angle=0.08726646
      MusclePoint P1: pelvis (-0.1594242 -0.03217172 0.00594255)
      MusclePoint P2: pelvis (-0.1566578 -0.1077855 0.04129045)
      MusclePoint P3: femur_r (-0.03430248 -0.1194277 0.01548774)
      MusclePoint P4: femur_r (-0.00688344 -0.1627934 0.04715156)
    Thelen2003Muscle iliacus_r: max_isometric_force=1073 optimal_fiber_length=0.1061641 tendon_slack_length=0.1061641
        pennation_angle=0.1221731
      MusclePoint P1: pelvis (-0.06905649 0.03739706 0.08749888)
      MusclePoint P2: pelvis (-0.02643409 -0.05635174 0.0830932)
      MuscleViaPoint P3: pelvis (-0.02950782 -0.08247845 0.08360549) range=(-1.570796 0.7853982)
          coordinate=hip_flexion_r
      MusclePoint P4: femur_r (0.00195031 -0.06229513 0.00653927)
      MusclePoint P5: femur_r (-0.02214173 -0.0712436 0.0147994)
    Thelen2003Muscle psoas_r: max_isometric_force=1113 optimal_fiber_length=0.1051723 tendon_slack_length=0.1682757
        pennation_angle=0.1396263
      MusclePoint P1: pelvis (-0.06629013 0.09087998 0.02961028)
      MusclePoint P2: pelvis (-0.02438493 -0.05840089 0.0777654)
      MuscleViaPoint P3: pelvis (-0.02950782 -0.08247845 0.08360549) range=(-1.570796 0.7853982)
          coordinate=hip_flexion_r
      MusclePoint P4: femur_r (0.00183558 -0.05816507 0.00435951)
      MusclePoint P5: femur_r (-0.02156811 -0.06849023 0.0119313)
    Thelen2003Muscle quad_fem_r: max_isometric_force=381 optimal_fiber_length=0.05807418 tendon_slack_length=0.02581075
        pennation_angle=0
      MusclePoint P1: pelvis (-0.1171092 -0.1179288 0.05327801)
      MusclePoint P2: femur_r (-0.04370984 -0.04118592 0.04198898)
    Thelen2003Muscle gem_r: max_isometric_force=164 optimal_fiber_length=0.02609439 tendon_slack_length=0.04240338
        pennation_angle=0
      MusclePoint P1: pelvis (-0.1160846 -0.08401532 0.0731548)
      MusclePoint P2: femur_r (-0.01629081 -0.00378589 0.05082273)
    Thelen2003Muscle peri_r: max_isometric_force=444 optimal_fiber_length=0.02732926 tendon_slack_length=0.1208794
        pennation_angle=0.1745329
      MusclePoint P1: pelvis (-0.1430309 0.00030737 0.02407756)
      MusclePoint P2: pelvis (-0.122232 -0.02827833 0.06731471)
      MusclePoint P3: femur_r (-0.01697915 -0.00413006 0.05013439)
    Thelen2003Muscle rect_fem_r: max_isometric_force=1169 optimal_fiber_length=0.1304624 tendon_slack_length=0.354766
        pennation_angle=0.08726646
      MusclePoint P1: pelvis (-0.03022502 -0.03186435 0.09917906)
      MuscleViaPoint P2: femur_r (0.03831782 -0.4623377 0.00217976) range=(-2.617994 -1.459968) coordinate=knee_angle_r
      MovingMusclePoint P3: tibia_r (0.06200386 0.02046554 0.00138393) x_coordinate=knee_angle_r
          y_coordinate=knee_angle_r z_coordinate=knee_angle_r
        XAttachment:
          natCubicSpline: min_x=-1000000000000000000000000000000 max_x=1000000000000000000000000000000
              min_y=-1000000000000000000000000000000 max_y=1000000000000000000000000000000
              min_z=-1000000000000000000000000000000 max_z=1000000000000000000000000000000
              x=(-2.094395 -1.999973 -1.570796 -1.457524 -1.396263 -1.047198 -0.6981317 -0.5263913 -0.3490659 -0.1745329 0 0.00017453 0.00034907 0.02792527 0.08726646 0.1745329 2.094395)
              y=(0.01540168 0.0177873 0.02719239 0.02931598 0.0304085 0.03614982 0.04172301 0.04457268 0.04783562 0.05281671 0.06104876 0.06105797 0.06106719 0.06258172 0.06622507 0.07246216 0.05668989)
        YAttachment:
          natCubicSpline: min_x=-1000000000000000000000000000000 max_x=1000000000000000000000000000000
              min_y=-1000000000000000000000000000000 max_y=1000000000000000000000000000000
              min_z=-1000000000000000000000000000000 max_z=1000000000000000000000000000000
              x=(-2.094395 -1.999973 -1.570796 -1.457524 -1.396263 -1.047198 -0.6981317 -0.5263913 -0.3490659 -0.1745329 0 0.00017453 0.00034907 0.02792527 0.08726646 0.1745329 2.094395)
              y=(0.02314292 0.0234886 0.0248259 0.02498935 0.02502409 0.02463241 0.02395914 0.02357106 0.02315093 0.02250313 0.02074319 0.02074063 0.02073806 0.02028693 0.01895533 0.01577232 -0.06660408)
        ZAttachment:
          natCubicSpline: min_x=-1000000000000000000000000000000 max_x=1000000000000000000000000000000
              min_y=-1000000000000000000000000000000 max_y=1000000000000000000000000000000
              min_z=-1000000000000000000000000000000 max_z=1000000000000000000000000000000 x=(-2.0944 0.1745)
              y=(0.00138393 0.00138393)
    Thelen2003Muscle vas_int_r: max_isometric_force=5000 optimal_fiber_length=0.1246787 tendon_slack_length=0.1351657
        pennation_angle=0.05235988
      MusclePoint P1: femur_r (0.03326996 -0.220729 0.03556444)
      MusclePoint P2: femur_r (0.03843254 -0.2390848 0.03269634)
      MuscleViaPoint P3: femur_r (0.03935033 -0.4623377 0.00630982) range=(-2.617994 -1.42) coordinate=knee_angle_r
      MovingMusclePoint P4: tibia_r (0.05587783 0.02486127 0.00177934) x_coordinate=knee_angle_r
          y_coordinate=knee_angle_r z_coordinate=knee_angle_r
        XAttachment:
          natCubicSpline: min_x=-1000000000000000000000000000000 max_x=1000000000000000000000000000000
              min_y=-1000000000000000000000000000000 max_y=1000000000000000000000000000000
              min_z=-1000000000000000000000000000000 max_z=1000000000000000000000000000000
              x=(-2.094395 -1.999973 -1.570796 -1.457524 -1.396263 -1.047198 -0.6981317 -0.5263913 -0.3490659 -0.1745329 0 0.00017453 0.00034907 0.02792527 0.08726646 0.1745329 2.094395)
              y=(0.00817835 0.01056397 0.01997228 0.02209643 0.02318904 0.02893556 0.0345454 0.03743639 0.04078338 0.04599468 0.05482667 0.05483679 0.05484692 0.05651553 0.06056877 0.0676514 0.0641371)
        YAttachment:
          natCubicSpline: min_x=-1000000000000000000000000000000 max_x=1000000000000000000000000000000
              min_y=-1000000000000000000000000000000 max_y=1000000000000000000000000000000
              min_z=-1000000000000000000000000000000 max_z=1000000000000000000000000000000
              x=(-2.094395 -1.999973 -1.570796 -1.457524 -1.396263 -1.047198 -0.6981317 -0.5263913 -0.3490659 -0.1745329 0 0.00017453 0.00034907 0.02792527 0.08726646 0.1745329 2.094395)
              y=(0.02530524 0.02565091 0.02699895 0.02716426 0.02719932 0.02682484 0.0262687 0.02600533 0.02581894 0.02571437 0.02500204 0.0250008 0.02499956 0.02476505 0.02394117 0.02157825 -0.06778358)
        ZAttachment:
          natCubicSpline: min_x=-1000000000000000000000000000000 max_x=1000000000000000000000000000000
              min_y=-1000000000000000000000000000000 max_y=1000000000000000000000000000000
              min_z=-1000000000000000000000000000000 max_z=1000000000000000000000000000000 x=(-2.0944 2.0944)
              y=(0.00177934 0.00177934)
    Thelen2003Muscle med_gas_r: max_isometric_force=2500 optimal_fiber_length=0.09013062 tendon_slack_length=0.3605225
        pennation_angle=0.296706
      MusclePoint P1: femur_r (-0.02179756 -0.4507506 -0.02696014)
      MuscleViaPoint P2: femur_r (-0.0344172 -0.4614199 -0.02959879) range=(-0.7853982 0.1745329)
          coordinate=knee_angle_r
      MusclePoint P3: calcn_r (0 0.03183963 -0.00544355)
    Thelen2003Muscle soleus_r: max_isometric_force=4000 optimal_fiber_length=0.08046591 tendon_slack_length=0.2212813
        pennation_angle=0.4363323
      MusclePoint P1: tibia_r (-0.00237246 -0.1515406 0.00701851)
      MusclePoint P2: calcn_r (0 0.03183963 -0.00544355)
    Thelen2003Muscle tib_post_r: max_isometric_force=3600 optimal_fiber_length=0.0310788 tendon_slack_length=0.310788
        pennation_angle=0.2094395
      MusclePoint P1: tibia_r (-0.00929212 -0.1332529 0.00187819)
      MusclePoint P2: tibia_r (-0.01423473 -0.4004507 -0.02263718)
      MusclePoint P3: calcn_r (0.04282943 0.03430463 -0.02937462)
      MusclePoint P4: calcn_r (0.07929094 0.01633065 -0.02886108)
    Thelen2003Muscle tib_ant_r: max_isometric_force=3000 optimal_fiber_length=0.09791397 tendon_slack_length=0.2228042
        pennation_angle=0.08726646
      MusclePoint P1: tibia_r (0.01769456 -0.1605361 0.01136801)
      MusclePoint P2: tibia_r (0.03252241 -0.3905654 -0.01749686)
      MusclePoint P3: calcn_r (0.1197581 0.01828211 -0.03132609)
    Thelen2003Muscle glut_med1_l: max_isometric_force=1119 optimal_fiber_length=0.05641772
        tendon_slack_length=0.08225387 pennation_angle=0.1396263
      MusclePoint P1: pelvis (-0.04180274 0.03114714 -0.1238714)
      MusclePoint P2: femur_l (-0.02500983 -0.01342271 -0.06367182)
    Thelen2003Muscle glut_med2_l: max_isometric_force=873 optimal_fiber_length=0.089145 tendon_slack_length=0.05591343
        pennation_angle=0
      MusclePoint P1: pelvis (-0.08760134 0.04559368 -0.0784826)
      MusclePoint P2: femur_l (-0.02959879 -0.00665399 -0.06045955)
    Thelen2003Muscle glut_med3_l: max_isometric_force=1000 optimal_fiber_length=0.06854462
        tendon_slack_length=0.0562363 pennation_angle=0.3316126
      MusclePoint P1: pelvis (-0.1253058 0.01075806 -0.06639259)
      MusclePoint P2: femur_l (-0.03544972 -0.00539203 -0.05942703)
    Thelen2003Muscle bifemlh_l: max_isometric_force=2700 optimal_fiber_length=0.1236312 tendon_slack_length=0.3697595
        pennation_angle=0
      MusclePoint P1: pelvis (-0.1290557 -0.1050909 -0.07114663)
      MusclePoint P2: tibia_l (-0.02975454 -0.03558683 -0.02909223)
      MusclePoint P3: tibia_l (-0.02313144 -0.05565384 -0.03390634)
    Thelen2003Muscle bifemsh_l: max_isometric_force=804 optimal_fiber_length=0.1914449 tendon_slack_length=0.09848899
        pennation_angle=0.4014257
      MusclePoint P1: femur_l (0.0057362 -0.2421824 -0.02684542)
      MusclePoint P2: tibia_l (-0.02975454 -0.03558683 -0.02909223)
      MusclePoint P3: tibia_l (-0.02313144 -0.05565384 -0.03390634)
    Thelen2003Muscle sar_l: max_isometric_force=156 optimal_fiber_length=0.5742262 tendon_slack_length=0.1104281
        pennation_angle=0
      MusclePoint P1: pelvis (-0.01567603 -0.00133195 -0.1272525)
      MusclePoint P2: femur_l (-0.00344172 -0.4093352 0.0482988)
      MusclePoint P3: tibia_l (-0.00553573 -0.04141911 0.03944207)
      MusclePoint P4: tibia_l (0.00593114 -0.058224 0.03786043)
      MusclePoint P5: tibia_l (0.02402111 -0.08303593 0.02491078)
    Thelen2003Muscle add_mag2_l: max_isometric_force=2343 optimal_fiber_length=0.1409721 tendon_slack_length=0.139807
        pennation_angle=0.05235988
      MusclePoint P1: pelvis (-0.08514235 -0.1221296 -0.03155697)
      MusclePoint P2: femur_l (0.0061951 -0.2621443 -0.02604235)
    Thelen2003Muscle tfl_l: max_isometric_force=233 optimal_fiber_length=0.10604 tendon_slack_length=0.4743893
        pennation_angle=0.05235988
      MusclePoint P1: pelvis (-0.03186435 0.02192595 -0.12715)
      MusclePoint P2: femur_l (0.03372886 -0.1141504 -0.06849023)
      MusclePoint P3: femur_l (0.0061951 -0.4645175 -0.04095647)
      MusclePoint P4: tibia_l (0.00593114 -0.04814107 -0.02935913)
    Thelen2003Muscle pect_l: max_isometric_force=266 optimal_fiber_length=0.1116044 tendon_slack_length=0.03682944
        pennation_angle=0
      MusclePoint P1: pelvis (-0.04415927 -0.07868752 -0.04620842)
      MusclePoint P2: femur_l (-0.01399633 -0.09430313 -0.02902517)
    Thelen2003Muscle grac_l: max_isometric_force=162 optimal_fiber_length=0.3965871 tendon_slack_length=0.1419602
        pennation_angle=0.05235988
      MusclePoint P1: pelvis (-0.07582895 -0.1216173 -0.02862668)
      MuscleViaPoint P2: tibia_l (-0.02626506 -0.03153388 0.03730686) range=(-0.4363323 0.1745329)
          coordinate=knee_angle_l
      MusclePoint P3: tibia_l (-0.019207 -0.05093859 0.03538912)
      MusclePoint P4: tibia_l (0.00593114 -0.08264052 0.02253832)
    Thelen2003Muscle glut_max1_l: max_isometric_force=573 optimal_fiber_length=0.1516106 tendon_slack_length=0.13346
        pennation_angle=0.08726646
      MusclePoint P1: pelvis (-0.122437 0.06270411 -0.07172039)
      MusclePoint P2: pelvis (-0.1322729 0.00122949 -0.09077753)
      MusclePoint P3: femur_l (-0.05242887 -0.02845155 -0.04497181)
      MusclePoint P4: femur_l (-0.03177855 -0.06493378 -0.05392028)
    Thelen2003Muscle glut_max2_l: max_isometric_force=819 optimal_fiber_length=0.1594224 tendon_slack_length=0.1377322
        pennation_angle=0
      MusclePoint P1: pelvis (-0.1382154 0.01803256 -0.05768369)
      MusclePoint P2: pelvis (-0.1409818 -0.05327801 -0.09364634)
      MusclePoint P3: femur_l (-0.04887242 -0.06080372 -0.03361413)
      MusclePoint P4: femur_l (-0.01789694 -0.1165596 -0.04806936)
    Thelen2003Muscle glut_max3_l: max_isometric_force=552 optimal_fiber_length=0.156287 tendon_slack_length=0.1573723
        pennation_angle=0.08726646
      MusclePoint P1: pelvis (-0.1594242 -0.03217172 -0.00594255)
      MusclePoint P2: pelvis (-0.1566578 -0.1077855 -0.04129045)
      MusclePoint P3: femur_l (-0.03430248 -0.1194277 -0.01548774)
      MusclePoint P4: femur_l (-0.00688344 -0.1627934 -0.04715156)
    Thelen2003Muscle iliacus_l: max_isometric_force=1073 optimal_fiber_length=0.1061496 tendon_slack_length=0.1061496
        pennation_angle=0.1221731
      MusclePoint P1: pelvis (-0.06905649 0.03739706 -0.08749888)
      MusclePoint P2: pelvis (-0.02643409 -0.05635174 -0.0830932)
      MuscleViaPoint P3: pelvis (-0.02950782 -0.08247845 -0.08360549) range=(-1.570796 0.7853982)
          coordinate=hip_flexion_l
      MusclePoint P4: femur_l (0.00195031 -0.06229513 -0.00653927)
      MusclePoint P5: femur_l (-0.02214173 -0.0712436 -0.0147994)
    Thelen2003Muscle psoas_l: max_isometric_force=1113 optimal_fiber_length=0.1051614 tendon_slack_length=0.1682582
        pennation_angle=0.1396263
      MusclePoint P1: pelvis (-0.06629013 0.09087998 -0.02961028)
      MusclePoint P2: pelvis (-0.02438493 -0.05840089 -0.0777654)
      MuscleViaPoint P3: pelvis (-0.02950782 -0.08247845 -0.08360549) range=(-1.570796 0.7853982)
          coordinate=hip_flexion_l
      MusclePoint P4: femur_l (0.00183558 -0.05816507 -0.00435951)
      MusclePoint P5: femur_l (-0.02156811 -0.06849023 -0.0119313)
    Thelen2003Muscle quad_fem_l: max_isometric_force=381 optimal_fiber_length=0.05807076 tendon_slack_length=0.02580922
        pennation_angle=0
      MusclePoint P1: pelvis (-0.1171092 -0.1179288 -0.05327801)
      MusclePoint P2: femur_l (-0.04370984 -0.04118592 -0.04198898)
    Thelen2003Muscle gem_l: max_isometric_force=164 optimal_fiber_length=0.02609693 tendon_slack_length=0.04240751
        pennation_angle=0
      MusclePoint P1: pelvis (-0.1160846 -0.08401532 -0.0731548)
      MusclePoint P2: femur_l (-0.01629081 -0.00378589 -0.05082273)
    Thelen2003Muscle peri_l: max_isometric_force=444 optimal_fiber_length=0.02733368 tendon_slack_length=0.120899
        pennation_angle=0.1745329
      MusclePoint P1: pelvis (-0.1430309 0.00030737 -0.02407756)
      MusclePoint P2: pelvis (-0.122232 -0.02827833 -0.06731471)
      MusclePoint P3: femur_l (-0.01697915 -0.00413006 -0.05013439)
    Thelen2003Muscle rect_fem_l: max_isometric_force=1169 optimal_fiber_length=0.1304678 tendon_slack_length=0.3547808
        pennation_angle=0.08726646
      MusclePoint P1: pelvis (-0.03022502 -0.03186435 -0.09917906)
      MuscleViaPoint P2: femur_l (0.03831782 -0.4623377 -0.00217976) range=(-2.617994 -1.459968)
          coordinate=knee_angle_l
      MovingMusclePoint P3: tibia_l (0.05873098 0.02133987 -0.00138393) x_coordinate=knee_angle_l
          y_coordinate=knee_angle_l z_coordinate=knee_angle_l
        XAttachment:
          natCubicSpline: min_x=-1000000000000000000000000000000 max_x=1000000000000000000000000000000
              min_y=-1000000000000000000000000000000 max_y=1000000000000000000000000000000
              min_z=-1000000000000000000000000000000 max_z=1000000000000000000000000000000
              x=(-2.094395 -1.999973 -1.570796 -1.457524 -1.396263 -1.047198 -0.6981317 -0.5263913 -0.3490659 -0.1745329 0 0.00017453 0.00034907 0.02792527 0.08726646 0.1745329 2.094395)
              y=(0.01540168 0.0177873 0.02719239 0.02931598 0.0304085 0.03614982 0.04172301 0.04457268 0.04783562 0.05281671 0.06104876 0.06105797 0.06106719 0.06258172 0.06622507 0.07246216 0.05668989)
        YAttachment:
          natCubicSpline: min_x=-1000000000000000000000000000000 max_x=1000000000000000000000000000000
              min_y=-1000000000000000000000000000000 max_y=1000000000000000000000000000000
              min_z=-1000000000000000000000000000000 max_z=1000000000000000000000000000000
              x=(-2.094395 -1.999973 -1.570796 -1.457524 -1.396263 -1.047198 -0.6981317 -0.5263913 -0.3490659 -0.1745329 0 0.00017453 0.00034907 0.02792527 0.08726646 0.1745329 2.094395)
              y=(0.02314292 0.0234886 0.0248259 0.02498935 0.02502409 0.02463241 0.02395914 0.02357106 0.02315093 0.02250313 0.02074319 0.02074063 0.02073806 0.02028693 0.01895533 0.01577232 -0.06660408)
        ZAttachment:
          natCubicSpline: min_x=-1000000000000000000000000000000 max_x=1000000000000000000000000000000
              min_y=-1000000000000000000000000000000 max_y=1000000000000000000000000000000
              min_z=-1000000000000000000000000000000 max_z=1000000000000000000000000000000 x=(-2.0944 0.1745)
              y=(-0.00138393 -0.00138393)
    Thelen2003Muscle vas_int_l: max_isometric_force=5000 optimal_fiber_length=0.1246787 tendon_slack_length=0.1351657
        pennation_angle=0.05235988
      MusclePoint P1: femur_l (0.03326996 -0.220729 -0.03556444)
      MusclePoint P2: femur_l (0.03843254 -0.2390848 -0.03269634)
      MuscleViaPoint P3: femur_l (0.03935033 -0.4623377 -0.00630982) range=(-2.617994 -1.42) coordinate=knee_angle_l
      MovingMusclePoint P4: tibia_l (0.05230026 0.0252786 -0.00177934) x_coordinate=knee_angle_l
          y_coordinate=knee_angle_l z_coordinate=knee_angle_l
        XAttachment:
          natCubicSpline: min_x=-1000000000000000000000000000000 max_x=1000000000000000000000000000000
              min_y=-1000000000000000000000000000000 max_y=1000000000000000000000000000000
              min_z=-1000000000000000000000000000000 max_z=1000000000000000000000000000000
              x=(-2.094395 -1.999973 -1.570796 -1.457524 -1.396263 -1.047198 -0.6981317 -0.5263913 -0.3490659 -0.1745329 0 0.00017453 0.00034907 0.02792527 0.08726646 0.1745329 2.094395)
              y=(0.00817835 0.01056397 0.01997228 0.02209643 0.02318904 0.02893556 0.0345454 0.03743639 0.04078338 0.04599468 0.05482667 0.05483679 0.05484692 0.05651553 0.06056877 0.0676514 0.0641371)
        YAttachment:
          natCubicSpline: min_x=-1000000000000000000000000000000 max_x=1000000000000000000000000000000
              min_y=-1000000000000000000000000000000 max_y=1000000000000000000000000000000
              min_z=-1000000000000000000000000000000 max_z=1000000000000000000000000000000
              x=(-2.094395 -1.999973 -1.570796 -1.457524 -1.396263 -1.047198 -0.6981317 -0.5263913 -0.3490659 -0.1745329 0 0.00017453 0.00034907 0.02792527 0.08726646 0.1745329 2.094395)
              y=(0.02530524 0.02565091 0.02699895 0.02716426 0.02719932 0.02682484 0.0262687 0.02600533 0.02581894 0.02571437 0.02500204 0.0250008 0.02499956 0.02476505 0.02394117 0.02157825 -0.06778358)
        ZAttachment:
          natCubicSpline: min_x=-1000000000000000000000000000000 max_x=1000000000000000000000000000000
              min_y=-1000000000000000000000000000000 max_y=1000000000000000000000000000000
              min_z=-1000000000000000000000000000000 max_z=1000000000000000000000000000000 x=(-2.0944 2.0944)
              y=(-0.00177934 -0.00177934)
    Thelen2003Muscle med_gas_l: max_isometric_force=2500 optimal_fiber_length=0.09013062 tendon_slack_length=0.3605225
        pennation_angle=0.296706
      MusclePoint P1: femur_l (-0.02179756 -0.4507506 0.02696014)
      MuscleViaPoint P2: femur_l (-0.0344172 -0.4614199 0.02959879) range=(-0.7853982 0.1745329)
          coordinate=knee_angle_l
      MusclePoint P3: calcn_l (0 0.03183963 0.00544355)
    Thelen2003Muscle soleus_l: max_isometric_force=4000 optimal_fiber_length=0.08046591 tendon_slack_length=0.2212813
        pennation_angle=0.4363323
      MusclePoint P1: tibia_l (-0.00237246 -0.1515406 -0.00701851)
      MusclePoint P2: calcn_l (0 0.03183963 0.00544355)
    Thelen2003Muscle tib_post_l: max_isometric_force=3600 optimal_fiber_length=0.0310788 tendon_slack_length=0.310788
        pennation_angle=0.2094395
      MusclePoint P1: tibia_l (-0.00929212 -0.1332529 -0.00187819)
      MusclePoint P2: tibia_l (-0.01423473 -0.4004507 0.02263718)
      MusclePoint P3: calcn_l (0.04282943 0.03430463 0.02937462)
      MusclePoint P4: calcn_l (0.07929094 0.01633065 0.02886108)
    Thelen2003Muscle tib_ant_l: max_isometric_force=3000 optimal_fiber_length=0.09791397 tendon_slack_length=0.2228042
        pennation_angle=0.08726646
      MusclePoint P1: tibia_l (0.01769456 -0.1605361 -0.01136801)
      MusclePoint P2: tibia_l (0.03252241 -0.3905654 0.01749686)
      MusclePoint P3: calcn_l (0.1197581 0.01828211 0.03132609)
    Thelen2003Muscle ercspn_r: max_isometric_force=2500 optimal_fiber_length=0.1278059 tendon_slack_length=0.03195148
        pennation_angle=0
      MusclePoint P1: pelvis (-0.1434408 0.04497893 0.04467156)
      MusclePoint P2: torso (-0.0593446 0.1186892 0.02600372)
    Thelen2003Muscle ercspn_l: max_isometric_force=2500 optimal_fiber_length=0.1278059 tendon_slack_length=0.03195148
        pennation_angle=0
      MusclePoint P1: pelvis (-0.1434408 0.04497893 -0.04467156)
      MusclePoint P2: torso (-0.0593446 0.1186892 -0.02600372)
    Thelen2003Muscle intobl_r: max_isometric_force=900 optimal_fiber_length=0.1061446 tendon_slack_length=0.1061446
        pennation_angle=0
      MusclePoint P1: pelvis (-0.04098308 0.07172039 0.1185436)
      MusclePoint P2: torso (0.07552949 0.1726388 0.01618489)
    Thelen2003Muscle intobl_l: max_isometric_force=900 optimal_fiber_length=0.1061446 tendon_slack_length=0.1061446
        pennation_angle=0
      MusclePoint P1: pelvis (-0.04098308 0.07172039 -0.1185436)
      MusclePoint P2: torso (0.07552949 0.1726388 -0.01618489)
    Thelen2003Muscle extobl_r: max_isometric_force=900 optimal_fiber_length=0.1263236 tendon_slack_length=0.1473775
        pennation_angle=0
      MusclePoint P1: pelvis (-0.03073731 -0.0651631 0.01024577)
      MusclePoint P2: torso (0.07013452 0.1186892 0.1186892)
    Thelen2003Muscle extobl_l: max_isometric_force=900 optimal_fiber_length=0.1263236 tendon_slack_length=0.1473775
        pennation_angle=0
      MusclePoint P1: pelvis (-0.03073731 -0.0651631 -0.01024577)
      MusclePoint P2: torso (0.07013452 0.1186892 -0.1186892)
    ObjectGroup R_hip_abd: members=(glut_max1_r glut_med1_r glut_med2_r glut_med3_r peri_r sar_r tfl_r)
    ObjectGroup R_hip_flex: members=(glut_med1_r grac_r iliacus_r pect_r psoas_r rect_fem_r sar_r tfl_r)
    ObjectGroup R_hip_inrot: members=(glut_med1_r iliacus_r psoas_r tfl_r)
    ObjectGroup R_hip_exrot: members=(gem_r glut_med3_r peri_r quad_fem_r)
    ObjectGroup R_hip_ext: members=(add_mag2_r bifemlh_r glut_max1_r glut_max2_r glut_max3_r glut_med3_r)
    ObjectGroup R_hip_add: members=(add_mag2_r bifemlh_r grac_r pect_r)
    ObjectGroup R_knee_bend: members=(bifemlh_r bifemsh_r grac_r med_gas_r sar_r)
    ObjectGroup R_knee_ext: members=(rect_fem_r vas_int_r)
    ObjectGroup R_ankle_pf: members=(med_gas_r soleus_r tib_post_r)
    ObjectGroup R_inverter: members=(tib_ant_r tib_post_r)
    ObjectGroup R_ankle_df: members=tib_ant_r
    ObjectGroup L_hip_abd: members=(glut_max1_l glut_med1_l glut_med2_l glut_med3_l peri_l sar_l tfl_l)
    ObjectGroup L_hip_flex: members=(glut_med1_l grac_l iliacus_l pect_l psoas_l rect_fem_l sar_l tfl_l)
    ObjectGroup L_hip_inrot: members=(glut_med1_l iliacus_l psoas_l tfl_l)
    ObjectGroup L_hip_exrot: members=(gem_l glut_med3_l peri_l quad_fem_l)
    ObjectGroup L_hip_ext: members=(add_mag2_l bifemlh_l glut_max1_l glut_max2_l glut_max3_l glut_med3_l)
    ObjectGroup L_hip_add: members=(add_mag2_l bifemlh_l grac_l pect_l)
    ObjectGroup L_knee_bend: members=(bifemlh_l bifemsh_l grac_l med_gas_l sar_l)
    ObjectGroup L_knee_ext: members=(rect_fem_l vas_int_l)
    ObjectGroup L_ankle_pf: members=(med_gas_l soleus_l tib_post_l)
    ObjectGroup L_inverter: members=(tib_ant_l tib_post_l)
    ObjectGroup L_ankle_df: members=tib_ant_l
    ObjectGroup back_ext: members=(ercspn_l ercspn_r)
    ObjectGroup back_rlb: members=(ercspn_r extobl_r intobl_r)
    ObjectGroup back_introt: members=(ercspn_r extobl_l intobl_r)
    ObjectGroup back_llb: members=(ercspn_l extobl_l intobl_l)
    ObjectGroup back_extrot: members=(ercspn_l extobl_r intobl_l)
    ObjectGroup back_flex: members=(extobl_l extobl_r intobl_l intobl_r)
