Model 3DGaitModelSimple:
  angle_units: radians
  DynamicsEngine:
    SimmKinematicsEngine: gravity=(0 -9.80665 0)
      BodySet:
        SimmBody ground: mass=0 mass_center=(0 0 0) inertia=(0 0 0 0 0 0 0 0 0)
        SimmBody pelvis: mass=10.32938 mass_center=(-0.0724376 0 0)
            inertia=(0.09465028 0 0 0 0.08019493 0 0 0 0.05330983) meshes=(sacrum2.vtp pelvis.vtp l_pelvis.vtp)
        SimmBody femur_r: mass=8.158078 mass_center=(0 -0.1950308 0)
            inertia=(0.1545712 0 0 0 0.04051867 0 0 0 0.1629982) meshes=femur.vtp
        SimmBody tibia_r: mass=3.251777 mass_center=(0 -0.1845572 0)
            inertia=(0.04319601 0 0 0 0.00437102 0 0 0 0.04379595) meshes=(tibia.vtp fibula.vtp)
        SimmBody patella_r: mass=0.08770807 mass_center=(0 0 0) inertia=(0.00100536 0 0 0 0.00100536 0 0 0 0.00100536)
            meshes=pat.vtp
        SimmBody talus_r: mass=0.08770807 mass_center=(0 0 0) inertia=(0.00108841 0 0 0 0.00108841 0 0 0 0.00108841)
            meshes=talus.vtp
        SimmBody calcn_r: mass=1.096351 mass_center=(0.1027085 0.03081254 0)
            inertia=(0.00129533 0 0 0 0.00360842 0 0 0 0.00379346) meshes=foot.vtp
        SimmBody toes_r: mass=0.1899757 mass_center=(0.03553713 0.00616251 -0.01797398)
            inertia=(0.00009252 0 0 0 0.00018505 0 0 0 0.00092524) meshes=bofoot.vtp
        SimmBody femur_l: mass=8.158078 mass_center=(0 -0.1950308 0)
            inertia=(0.1545712 0 0 0 0.04051867 0 0 0 0.1629982) meshes=l_femur.vtp
        SimmBody tibia_l: mass=3.251777 mass_center=(0 -0.1845572 0)
            inertia=(0.04319601 0 0 0 0.00437102 0 0 0 0.04379595) meshes=(l_tibia.vtp l_fibula.vtp)
        SimmBody patella_l: mass=0.08770807 mass_center=(0 0 0) inertia=(0.00100536 0 0 0 0.00100536 0 0 0 0.00100536)
            meshes=l_patella.vtp
        SimmBody talus_l: mass=0.08770807 mass_center=(0 0 0) inertia=(0.00108841 0 0 0 0.00108841 0 0 0 0.00108841)
            meshes=l_talus.vtp
        SimmBody calcn_l: mass=1.096351 mass_center=(0.1027085 0.03081254 0)
            inertia=(0.00129533 0 0 0 0.00360842 0 0 0 0.00379346) meshes=l_foot.vtp
        SimmBody toes_l: mass=0.1899757 mass_center=(0.03553713 0.00616251 0.01797398)
            inertia=(0.00009252 0 0 0 0.00018505 0 0 0 0.00092524) meshes=l_bofoot.vtp
        SimmBody torso: mass=30.02826 mass_center=(-0.0323916 0.3455104 0)
            inertia=(1.507671 0 0 0 0.7724959 0 0 0 1.463601)
            meshes=(hat_spine.vtp hat_jaw.vtp hat_skull.vtp hat_ribs.vtp)
        SimmBody humerus_r: mass=1.782666 mass_center=(0 -0.1780125 0)
            inertia=(0.01226933 0 0 0 0.00423254 0 0 0 0.01377193) meshes=humerus_rv.vtp
        SimmBody ulna_r: mass=0.5328265 mass_center=(0 -0.129561 0)
            inertia=(0.00300205 0 0 0 0.00062636 0 0 0 0.00325645) meshes=ulna_rv.vtp
        SimmBody radius_r: mass=0.5328265 mass_center=(0 -0.129561 0)
            inertia=(0.00300205 0 0 0 0.00062636 0 0 0 0.00325645) meshes=radius_rv.vtp
        SimmBody hand_r: mass=0.4012644 mass_center=(0 -0.06792666 0)
            inertia=(0.00077849 0 0 0 0.00047739 0 0 0 0.00116948)
            meshes=(pisiform_rvs.vtp lunate_rvs.vtp scaphoid_rvs.vtp triquetrum_rvs.vtp hamate_rvs.vtp capitate_rvs.vtp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)
        SimmBody humerus_l: mass=1.782666 mass_center=(0 -0.1780125 0)
            inertia=(0.01226933 0 0 0 0.00423254 0 0 0 0.01377193) meshes=humerus_lv.vtp
        SimmBody ulna_l: mass=0.5328265 mass_center=(0 -0.129561 0)
            inertia=(0.00300205 0 0 0 0.00062636 0 0 0 0.00325645) meshes=ulna_lv.vtp
        SimmBody radius_l: mass=0.5328265 mass_center=(0 -0.129561 0)
            inertia=(0.00300205 0 0 0 0.00062636 0 0 0 0.00325645) meshes=radius_lv.vtp
        SimmBody hand_l: mass=0.4012644 mass_center=(0 -0.06792666 0)
            inertia=(0.00077849 0 0 0 0.00047739 0 0 0 0.00116948)
            meshes=(pisiform_lvs.vtp lunate_lvs.vtp scaphoid_lvs.vtp triquetrum_lvs.vtp hamate_lvs.vtp capitate_lvs.vtp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)
        SimmBody r_scapula: mass=0 mass_center=(0 0 0) inertia=(0 0 0 0 0 0 0 0 0) meshes=r_scapula.vtp
        SimmBody r_clavicle: mass=0 mass_center=(0 0 0) inertia=(0 0 0 0 0 0 0 0 0) meshes=r_clavicle.vtp
        SimmBody l_scapula: mass=0 mass_center=(0 0 0) inertia=(0 0 0 0 0 0 0 0 0) meshes=l_scapula.vtp
        SimmBody l_clavicle: mass=0 mass_center=(0 0 0) inertia=(0 0 0 0 0 0 0 0 0) meshes=l_clavicle.vtp
      SimmCoordinate [values shared by the 37 below unless stated]: tolerance=0.00000001 stiffness=0 clamped=true
          restraint_active=false default_value=0
      SimmCoordinate pelvis_tx: range=(-5 5) default_value=0.12 keys=p_key
      SimmCoordinate pelvis_ty: range=(-1 2) default_value=0.93 keys=q_key
      SimmCoordinate pelvis_tz: range=(-3 3) keys=q_key
      SimmCoordinate pelvis_list: range=(-1.570796 1.570796) keys=q_key
      SimmCoordinate pelvis_rotation: range=(-1.570796 1.570796) keys=q_key
      SimmCoordinate pelvis_tilt: range=(-1.570796 1.570796) keys=q_key
      SimmCoordinate hip_flexion_r: range=(-2.094395 2.094395) keys=(h_key leftmouse_button)
      SimmCoordinate hip_adduction_r: range=(-2.094395 2.094395) keys=(h_key leftmouse_button)
      SimmCoordinate hip_rotation_r: range=(-2.094395 2.094395) keys=(h_key leftmouse_button)
      SimmCoordinate knee_angle_r: range=(-2.094395 0.1745329) keys=k_key
      SimmCoordinate ankle_angle_r: range=(-1.570796 1.570796) keys=a_key
      SimmCoordinate subtalar_angle_r: range=(-1.570796 1.570796) keys=a_key locked=true
      SimmCoordinate mtp_angle_r: range=(-1.570796 1.570796) keys=t_key locked=true
      SimmCoordinate hip_flexion_l: range=(-2.094395 2.094395) keys=(h_key leftmouse_button)
      SimmCoordinate hip_adduction_l: range=(-2.094395 2.094395) keys=(h_key leftmouse_button)
      SimmCoordinate hip_rotation_l: range=(-2.094395 2.094395) keys=(h_key leftmouse_button)
      SimmCoordinate knee_angle_l: range=(-2.094395 0.1745329) keys=k_key
      SimmCoordinate ankle_angle_l: range=(-1.047198 1.047198) keys=a_key
      SimmCoordinate subtalar_angle_l: range=(-1.570796 1.570796) keys=a_key locked=true
      SimmCoordinate mtp_angle_l: range=(-1.047198 1.047198) keys=t_key locked=true
      SimmCoordinate lumbar_extension: range=(-1.570796 1.570796) keys=q_key
      SimmCoordinate lumbar_bending: range=(-1.570796 1.570796) keys=q_key
      SimmCoordinate lumbar_rotation: range=(-1.570796 1.570796) keys=q_key
      SimmCoordinate arm_add_r: range=(-2.094395 1.570796)
      SimmCoordinate arm_rot_r: range=(-1.570796 1.570796)
      SimmCoordinate arm_flex_r: range=(-1.570796 1.570796)
      SimmCoordinate elbow_flex_r: range=(0 2.268928)
      SimmCoordinate pro_sup_r: range=(0 1.570796) default_value=1.047198
      SimmCoordinate wrist_dev_r: range=(-0.4363323 0.6108652)
      SimmCoordinate wrist_flex_r: range=(-1.22173 1.22173)
      SimmCoordinate arm_add_l: range=(-2.094395 1.570796)
      SimmCoordinate arm_rot_l: range=(-1.570796 1.570796)
      SimmCoordinate arm_flex_l: range=(-1.570796 1.570796)
      SimmCoordinate elbow_flex_l: range=(0 2.268928)
      SimmCoordinate pro_sup_l: range=(0 1.570796) default_value=1.047198
      SimmCoordinate wrist_dev_l: range=(-0.4363323 0.6108652)
      SimmCoordinate wrist_flex_l: range=(-1.22173 1.22173)
      JointSet:
        SimmJoint ground_pelvis: bodies=(ground pelvis)
          DofSet:
            SimmTranslationDof tx: coordinate=pelvis_tx
              Value:
                natCubicSpline: x=(-360 360) y=(-360 360)
            SimmTranslationDof ty: coordinate=pelvis_ty
              Value:
                natCubicSpline: x=(-360 360) y=(-360 360)
            SimmTranslationDof tz: coordinate=pelvis_tz
              Value:
                natCubicSpline: x=(-360 360) y=(-360 360)
            SimmRotationDof r1: axis=(0 0 1) coordinate=pelvis_tilt
              Value:
                natCubicSpline: x=(-6.283185 6.283185) y=(-6.283185 6.283185)
            SimmRotationDof r2: axis=(1 0 0) coordinate=pelvis_list
              Value:
                natCubicSpline: x=(-6.283185 6.283185) y=(-6.283185 6.283185)
            SimmRotationDof r3: axis=(0 1 0) coordinate=pelvis_rotation
              Value:
                natCubicSpline: x=(-6.283185 6.283185) y=(-6.283185 6.283185)
        SimmJoint hip_r: bodies=(pelvis femur_r)
          DofSet:
            SimmTranslationDof tx:
              Value: Constant(value=-0.0724376)
            SimmTranslationDof ty:
              Value: Constant(value=-0.06772454)
            SimmTranslationDof tz:
              Value: Constant(value=0.08555218)
            SimmRotationDof r1: axis=(0 0 1) coordinate=hip_flexion_r
              Value:
                natCubicSpline: x=(-6.283185 6.283185) y=(-6.283185 6.283185)
            SimmRotationDof r2: axis=(1 0 0) coordinate=hip_adduction_r
              Value:
                natCubicSpline: x=(-6.283185 6.283185) y=(-6.283185 6.283185)
            SimmRotationDof r3: axis=(0 1 0) coordinate=hip_rotation_r
              Value:
                natCubicSpline: x=(-6.283185 6.283185) y=(-6.283185 6.283185)
        SimmJoint knee_r: bodies=(femur_r tibia_r)
          DofSet:
            SimmTranslationDof tx: coordinate=knee_angle_r
              Value:
                natCubicSpline: x=(-2.094395 -1.745329 -1.396263 -1.047198 -0.6981317 -0.3490659 -0.1745329 0.1973442 0.337395 0.4901776 1.52146 2.094395)
                    y=(-0.00367117 0.00205356 0.00471516 0.00470368 0.00243215 -0.00114724 -0.00355644 -0.00599662 -0.00623525 -0.00639472 -0.00623525 -0.00602301)
            SimmTranslationDof ty: coordinate=knee_angle_r
              Value:
                natCubicSpline: x=(-2.094395 -1.22173 -0.5235988 -0.3490659 -0.1745329 0.1591486 2.094395)
                    y=(-0.4848236 -0.4683034 -0.4577488 -0.4561426 -0.4549954 -0.4534627 -0.454307)
            SimmTranslationDof tz:
              Value: Constant(value=0)
            SimmRotationDof r1: axis=(0 0 1) coordinate=knee_angle_r
              Value:
                natCubicSpline: x=(-6.283185 6.283185) y=(-6.283185 6.283185)
            SimmRotationDof r2: axis=(1 0 0)
              Value: Constant(value=0)
            SimmRotationDof r3: axis=(0 1 0)
              Value: Constant(value=0)
        SimmJoint tib_pat_r: bodies=(tibia_r patella_r)
          DofSet:
            SimmTranslationDof tx: coordinate=knee_angle_r
              Value:
                natCubicSpline: x=(-2.094395 -1.396263 -1.047198 -0.6981317 -0.3490659 -0.1745329 0 0.00017453 0.00034907 0.08726646 2.094395)
                    y=(0.01710145 0.03202815 0.03766273 0.04250649 0.04636173 0.04784451 0.04903074 0.04903074 0.04903074 0.04903074 0.04903074)
            SimmTranslationDof ty: coordinate=knee_angle_r
              Value:
                natCubicSpline: x=(-2.094395 -1.570796 -1.396263 -1.047198 -0.6981317 -0.3490659 -0.1745329 0 0.00017453 0.00034907 0.08726646 2.094395)
                    y=(-0.02164865 -0.01996816 -0.01977046 -0.02016587 -0.02085784 -0.02164865 -0.02204406 -0.02243947 -0.02243947 -0.02243947 -0.02243947 -0.02243947)
            SimmTranslationDof tz:
              Value: Constant(value=0.00237246)
            SimmRotationDof r1: axis=(0 0 1) coordinate=knee_angle_r
              Value:
                natCubicSpline: x=(-2.094395 -1.999973 -1.457524 -0.5263913 0.02792527 0.1745329)
                    y=(0.3080506 0.3080506 0.3063053 0.270177 -0.03700098 -0.2799508)
            SimmRotationDof r2: axis=(1 0 0)
              Value: Constant(value=0)
            SimmRotationDof r3: axis=(0 1 0)
              Value: Constant(value=0)
        SimmJoint ankle_r: bodies=(tibia_r talus_r)
          DofSet:
            SimmTranslationDof tx:
              Value: Constant(value=0)
            SimmTranslationDof ty:
              Value: Constant(value=-0.4250649)
            SimmTranslationDof tz:
              Value: Constant(value=0)
            SimmRotationDof r1: axis=(-0.1050135 -0.1740224 0.9791263) coordinate=ankle_angle_r
              Value:
                natCubicSpline: x=(-6.283185 6.283185) y=(-6.283185 6.283185)
            SimmRotationDof r2: axis=(1 0 0)
              Value: Constant(value=0)
            SimmRotationDof r3: axis=(0 1 0)
              Value: Constant(value=0)
        SimmJoint subtalar_r: bodies=(talus_r calcn_r)
          DofSet:
            SimmTranslationDof tx:
              Value: Constant(value=-0.05432871)
            SimmTranslationDof ty:
              Value: Constant(value=-0.04673138)
            SimmTranslationDof tz:
              Value: Constant(value=0.00882271)
            SimmRotationDof r1: axis=(0.7871796 0.6047475 -0.1209495) coordinate=subtalar_angle_r
              Value:
                natCubicSpline: x=(-6.283185 6.283185) y=(-6.283185 6.283185)
            SimmRotationDof r2: axis=(0 1 0)
              Value: Constant(value=0)
            SimmRotationDof r3: axis=(0 0 1)
              Value: Constant(value=0)
        SimmJoint mtp_r: bodies=(calcn_r toes_r)
          DofSet:
            SimmTranslationDof tx:
              Value: Constant(value=0.1836428)
            SimmTranslationDof ty:
              Value: Constant(value=-0.00205417)
            SimmTranslationDof tz:
              Value: Constant(value=0.00110925)
            SimmRotationDof r1: axis=(-0.5809544 0 0.8139361) coordinate=mtp_angle_r
              Value:
                natCubicSpline: x=(-6.283185 6.283185) y=(-6.283185 6.283185)
            SimmRotationDof r2: axis=(1 0 0)
              Value: Constant(value=0)
            SimmRotationDof r3: axis=(0 1 0)
              Value: Constant(value=0)
        SimmJoint hip_l: bodies=(pelvis femur_l)
          DofSet:
            SimmTranslationDof tx:
              Value: Constant(value=-0.0724376)
            SimmTranslationDof ty:
              Value: Constant(value=-0.06772454)
            SimmTranslationDof tz:
              Value: Constant(value=-0.08555218)
            SimmRotationDof r1: axis=(0 0 1) coordinate=hip_flexion_l
              Value:
                natCubicSpline: x=(-6.283185 6.283185) y=(-6.283185 6.283185)
            SimmRotationDof r2: axis=(-1 0 0) coordinate=hip_adduction_l
              Value:
                natCubicSpline: x=(-6.283185 6.283185) y=(-6.283185 6.283185)
            SimmRotationDof r3: axis=(0 -1 0) coordinate=hip_rotation_l
              Value:
                natCubicSpline: x=(-6.283185 6.283185) y=(-6.283185 6.283185)
        SimmJoint knee_l: bodies=(femur_l tibia_l)
          DofSet:
            SimmTranslationDof tx: coordinate=knee_angle_l
              Value:
                natCubicSpline: x=(-2.094395 -1.745329 -1.396263 -1.047198 -0.6981317 -0.3490659 -0.1745329 0.1973442 0.337395 0.4901776 1.52146 2.094395)
                    y=(-0.00367117 0.00205356 0.00471516 0.00470368 0.00243215 -0.00114724 -0.00355644 -0.00599662 -0.00623525 -0.00639472 -0.00623525 -0.00602301)
            SimmTranslationDof ty: coordinate=knee_angle_l
              Value:
                natCubicSpline: x=(-2.094395 -1.22173 -0.5235988 -0.3490659 -0.1745329 0.1591486 2.094395)
                    y=(-0.4848236 -0.4683034 -0.4577488 -0.4561426 -0.4549954 -0.4534627 -0.454307)
            SimmTranslationDof tz:
              Value: Constant(value=0)
            SimmRotationDof r1: axis=(0 0 1) coordinate=knee_angle_l
              Value:
                natCubicSpline: x=(-6.283185 6.283185) y=(-6.283185 6.283185)
            SimmRotationDof r2: axis=(1 0 0)
              Value: Constant(value=0)
            SimmRotationDof r3: axis=(0 1 0)
              Value: Constant(value=0)
        SimmJoint tib_pat_l: bodies=(tibia_l patella_l)
          DofSet:
            SimmTranslationDof tx: coordinate=knee_angle_l
              Value:
                natCubicSpline: x=(-2.094395 -1.396263 -1.047198 -0.6981317 -0.3490659 -0.1745329 0 0.00017453 0.00034907 0.08726646 2.094395)
                    y=(0.01710145 0.03202815 0.03766273 0.04250649 0.04636173 0.04784451 0.04903074 0.04903074 0.04903074 0.04903074 0.04903074)
            SimmTranslationDof ty: coordinate=knee_angle_l
              Value:
                natCubicSpline: x=(-2.094395 -1.570796 -1.396263 -1.047198 -0.6981317 -0.3490659 -0.1745329 0 0.00017453 0.00034907 0.08726646 2.094395)
                    y=(-0.02164865 -0.01996816 -0.01977046 -0.02016587 -0.02085784 -0.02164865 -0.02204406 -0.02243947 -0.02243947 -0.02243947 -0.02243947 -0.02243947)
            SimmTranslationDof tz:
              Value: Constant(value=-0.00237246)
            SimmRotationDof r1: axis=(0 0 1) coordinate=knee_angle_l
              Value:
                natCubicSpline: x=(-2.094395 -1.999973 -1.457524 -0.5263913 0.02792527 0.1745329)
                    y=(0.3080506 0.3080506 0.3063053 0.270177 -0.03700098 -0.2799508)
            SimmRotationDof r2: axis=(1 0 0)
              Value: Constant(value=0)
            SimmRotationDof r3: axis=(0 1 0)
              Value: Constant(value=0)
        SimmJoint ankle_l: bodies=(tibia_l talus_l)
          DofSet:
            SimmTranslationDof tx:
              Value: Constant(value=0)
            SimmTranslationDof ty:
              Value: Constant(value=-0.4250649)
            SimmTranslationDof tz:
              Value: Constant(value=0)
            SimmRotationDof r1: axis=(0.1050135 -0.1740224 0.9791263) coordinate=ankle_angle_l
              Value:
                natCubicSpline: x=(-6.283185 6.283185) y=(-6.283185 6.283185)
            SimmRotationDof r2: axis=(1 0 0)
              Value: Constant(value=0)
            SimmRotationDof r3: axis=(0 1 0)
              Value: Constant(value=0)
        SimmJoint subtalar_l: bodies=(talus_l calcn_l)
          DofSet:
            SimmTranslationDof tx:
              Value: Constant(value=-0.05432871)
            SimmTranslationDof ty:
              Value: Constant(value=-0.04673138)
            SimmTranslationDof tz:
              Value: Constant(value=-0.00882271)
            SimmRotationDof r1: axis=(-0.7871796 -0.6047475 -0.1209495) coordinate=subtalar_angle_l
              Value:
                natCubicSpline: x=(-6.283185 6.283185) y=(-6.283185 6.283185)
            SimmRotationDof r2: axis=(0 1 0)
              Value: Constant(value=0)
            SimmRotationDof r3: axis=(0 0 1)
              Value: Constant(value=0)
        SimmJoint mtp_l: bodies=(calcn_l toes_l)
          DofSet:
            SimmTranslationDof tx:
              Value: Constant(value=0.1836428)
            SimmTranslationDof ty:
              Value: Constant(value=-0.00205417)
            SimmTranslationDof tz:
              Value: Constant(value=-0.00110925)
            SimmRotationDof r1: axis=(0.5809544 0 0.8139361) coordinate=mtp_angle_l
              Value:
                natCubicSpline: x=(-6.283185 6.283185) y=(-6.283185 6.283185)
            SimmRotationDof r2: axis=(1 0 0)
              Value: Constant(value=0)
            SimmRotationDof r3: axis=(0 1 0)
              Value: Constant(value=0)
        SimmJoint back: bodies=(pelvis torso)
          DofSet:
            SimmTranslationDof tx:
              Value: Constant(value=-0.1031749)
            SimmTranslationDof ty:
              Value: Constant(value=0.08350303)
            SimmTranslationDof tz:
              Value: Constant(value=0)
            SimmRotationDof r1: axis=(0 0 1) coordinate=lumbar_extension
              Value:
                natCubicSpline: x=(-6.283185 6.283185) y=(-6.283185 6.283185)
            SimmRotationDof r2: axis=(1 0 0) coordinate=lumbar_bending
              Value:
                natCubicSpline: x=(-6.283185 6.283185) y=(-6.283185 6.283185)
            SimmRotationDof r3: axis=(0 1 0) coordinate=lumbar_rotation
              Value:
                natCubicSpline: x=(-6.283185 6.283185) y=(-6.283185 6.283185)
        SimmJoint acromial_r: bodies=(torso humerus_r)
          DofSet:
            SimmTranslationDof tx:
              Value: Constant(value=0.00340652)
            SimmTranslationDof ty:
              Value: Constant(value=0.4011159)
            SimmTranslationDof tz:
              Value: Constant(value=0.1835524)
            SimmRotationDof r1: axis=(1 0 0) coordinate=arm_add_r
              Value:
                natCubicSpline: x=(-6.283185 6.283185) y=(-6.283185 6.283185)
            SimmRotationDof r2: axis=(0 0 1) coordinate=arm_flex_r
              Value:
                natCubicSpline: x=(-6.283185 6.283185) y=(-6.283185 6.283185)
            SimmRotationDof r3: axis=(0 1 0) coordinate=arm_rot_r
              Value:
                natCubicSpline: x=(-6.283185 6.283185) y=(-6.283185 6.283185)
        SimmJoint elbow_r: bodies=(humerus_r ulna_r)
          DofSet:
            SimmTranslationDof tx:
              Value: Constant(value=0.01422352)
            SimmTranslationDof ty:
              Value: Constant(value=-0.3097846)
            SimmTranslationDof tz:
              Value: Constant(value=-0.01038304)
            SimmRotationDof r1: axis=(0.226047 0.022269 0.9738618) coordinate=elbow_flex_r
              Value:
                natCubicSpline: x=(-6.283185 6.283185) y=(-6.283185 6.283185)
            SimmRotationDof r2: axis=(0 1 0)
              Value: Constant(value=0)
            SimmRotationDof r3: axis=(1 0 0)
              Value: Constant(value=0)
        SimmJoint radioulnar_r: bodies=(ulna_r radius_r)
          DofSet:
            SimmTranslationDof tx:
              Value: Constant(value=-0.00723133)
            SimmTranslationDof ty:
              Value: Constant(value=-0.01398216)
            SimmTranslationDof tz:
              Value: Constant(value=0.02803849)
            SimmRotationDof r1: axis=(1 0 0)
              Value: Constant(value=0)
            SimmRotationDof r2: axis=(0.05639803 0.9984065 0.001952) coordinate=pro_sup_r
              Value:
                natCubicSpline: x=(-6.283185 6.283185) y=(-6.283185 6.283185)
            SimmRotationDof r3: axis=(0 0 1)
              Value: Constant(value=0)
        SimmJoint radius_hand_r: bodies=(radius_r hand_r)
          DofSet:
            SimmTranslationDof tx:
              Value: Constant(value=-0.00945653)
            SimmTranslationDof ty:
              Value: Constant(value=-0.2535224)
            SimmTranslationDof tz:
              Value: Constant(value=0.01463036)
            SimmRotationDof r1: axis=(0 0 1) coordinate=wrist_flex_r
              Value:
                natCubicSpline: x=(-6.283185 6.283185) y=(-6.283185 6.283185)
            SimmRotationDof r2: axis=(0 1 0)
              Value: Constant(value=0)
            SimmRotationDof r3: axis=(1 0 0) coordinate=wrist_dev_r
              Value:
                natCubicSpline: x=(-6.283185 6.283185) y=(-6.283185 6.283185)
        SimmJoint acromial_l: bodies=(torso humerus_l)
          DofSet:
            SimmTranslationDof tx:
              Value: Constant(value=0.00340652)
            SimmTranslationDof ty:
              Value: Constant(value=0.4011159)
            SimmTranslationDof tz:
              Value: Constant(value=-0.1835524)
            SimmRotationDof r1: axis=(-1 0 0) coordinate=arm_add_l
              Value:
                natCubicSpline: x=(-6.283185 6.283185) y=(-6.283185 6.283185)
            SimmRotationDof r2: axis=(0 0 1) coordinate=arm_flex_l
              Value:
                natCubicSpline: x=(-6.283185 6.283185) y=(-6.283185 6.283185)
            SimmRotationDof r3: axis=(0 -1 0) coordinate=arm_rot_l
              Value:
                natCubicSpline: x=(-6.283185 6.283185) y=(-6.283185 6.283185)
        SimmJoint elbow_l: bodies=(humerus_l ulna_l)
          DofSet:
            SimmTranslationDof tx:
              Value: Constant(value=0.01422352)
            SimmTranslationDof ty:
              Value: Constant(value=-0.3097846)
            SimmTranslationDof tz:
              Value: Constant(value=0.01038304)
            SimmRotationDof r1: axis=(-0.226047 -0.022269 0.9738618) coordinate=elbow_flex_l
              Value:
                natCubicSpline: x=(-6.283185 6.283185) y=(-6.283185 6.283185)
            SimmRotationDof r2: axis=(0 -1 0)
              Value: Constant(value=0)
            SimmRotationDof r3: axis=(-1 0 0)
              Value: Constant(value=0)
        SimmJoint radioulnar_l: bodies=(ulna_l radius_l)
          DofSet:
            SimmTranslationDof tx:
              Value: Constant(value=-0.00723133)
            SimmTranslationDof ty:
              Value: Constant(value=-0.01398216)
            SimmTranslationDof tz:
              Value: Constant(value=-0.02803849)
            SimmRotationDof r1: axis=(-1 0 0)
              Value: Constant(value=0)
            SimmRotationDof r2: axis=(-0.05639803 -0.9984065 0.001952) coordinate=pro_sup_l
              Value:
                natCubicSpline: x=(-6.283185 6.283185) y=(-6.283185 6.283185)
            SimmRotationDof r3: axis=(0 0 1)
              Value: Constant(value=0)
        SimmJoint radius_hand_l: bodies=(radius_l hand_l)
          DofSet:
            SimmTranslationDof tx:
              Value: Constant(value=-0.00945653)
            SimmTranslationDof ty:
              Value: Constant(value=-0.2535224)
            SimmTranslationDof tz:
              Value: Constant(value=-0.01463036)
            SimmRotationDof r1: axis=(0 0 1) coordinate=wrist_flex_l
              Value:
                natCubicSpline: x=(-6.283185 6.283185) y=(-6.283185 6.283185)
            SimmRotationDof r2: axis=(0 -1 0)
              Value: Constant(value=0)
            SimmRotationDof r3: axis=(-1 0 0) coordinate=wrist_dev_l
              Value:
                natCubicSpline: x=(-6.283185 6.283185) y=(-6.283185 6.283185)
        SimmJoint r_scapulothoracic: bodies=(torso r_scapula)
          DofSet:
            SimmTranslationDof tx:
              Value: Constant(value=0.01371244)
            SimmTranslationDof ty:
              Value: Constant(value=0.4378264)
            SimmTranslationDof tz:
              Value: Constant(value=0.1738349)
            SimmRotationDof r1: axis=(1 0 0)
              Value: Constant(value=0)
            SimmRotationDof r2: axis=(0 1 0)
              Value: Constant(value=-0.2617994)
            SimmRotationDof r3: axis=(0 0 1)
              Value: Constant(value=-0.1745329)
        SimmJoint r_sternoclavicular: bodies=(torso r_clavicle)
          DofSet:
            SimmTranslationDof tx:
              Value: Constant(value=0.02915244)
            SimmTranslationDof ty:
              Value: Constant(value=0.4161241)
            SimmTranslationDof tz:
              Value: Constant(value=0.02749507)
            SimmRotationDof r1: axis=(1 0 0)
              Value: Constant(value=-0.03490659)
            SimmRotationDof r2: axis=(0 1 0)
              Value: Constant(value=-0.04363323)
            SimmRotationDof r3: axis=(0 0 1)
              Value: Constant(value=0)
        SimmJoint l_scapulothoracic: bodies=(torso l_scapula)
          DofSet:
            SimmTranslationDof tx:
              Value: Constant(value=0.01371244)
            SimmTranslationDof ty:
              Value: Constant(value=0.4378264)
            SimmTranslationDof tz:
              Value: Constant(value=-0.1738349)
            SimmRotationDof r1: axis=(1 0 0)
              Value: Constant(value=0)
            SimmRotationDof r2: axis=(0 1 0)
              Value: Constant(value=0.2617994)
            SimmRotationDof r3: axis=(0 0 1)
              Value: Constant(value=-0.1745329)
        SimmJoint l_sternoclavicular: bodies=(torso l_clavicle)
          DofSet:
            SimmTranslationDof tx:
              Value: Constant(value=0.02915244)
            SimmTranslationDof ty:
              Value: Constant(value=0.4161241)
            SimmTranslationDof tz:
              Value: Constant(value=-0.02749507)
            SimmRotationDof r1: axis=(1 0 0)
              Value: Constant(value=0.03490659)
            SimmRotationDof r2: axis=(0 1 0)
              Value: Constant(value=0.04363323)
            SimmRotationDof r3: axis=(0 0 1)
              Value: Constant(value=0)
      MarkerSet:
        Marker Sternum: torso (0.07558039 0.323916 0)
        Marker R.Acromium: torso (-0.0323916 0.4750767 0.161958)
        Marker L.Acromium: torso (-0.0323916 0.4750767 -0.161958)
        Marker Top.Head: torso (0.00090696 0.709376 0)
        Marker R.ASIS: pelvis (0.02049154 0.03073731 0.1311459)
        Marker L.ASIS: pelvis (0.02049154 0.03073731 -0.1311459)
        Marker V.Sacral: pelvis (-0.1639323 0.04098308 0)
        Marker R.Thigh.Upper: femur_r (0.02065032 -0.229448 0.07342336)
        Marker R.Thigh.Front: femur_r (0.0917792 -0.28681 0.00539203)
        Marker R.Thigh.Rear: femur_r (0.0114724 -0.344172 0.0688344)
        Marker R.Knee.Lat: femur_r (0 -0.463485 0.057362)
        Marker R.Knee.Med: femur_r (0 -0.463485 -0.057362)
        Marker R.Shank.Upper: tibia_r (0.00494262 -0.064254 0.04942615)
        Marker R.Shank.Front: tibia_r (0.04942615 -0.07908184 0)
        Marker R.Shank.Rear: tibia_r (0.01977046 -0.128508 0.04942615)
        Marker R.Ankle.Lat: tibia_r (-0.00494262 -0.4052944 0.05239172)
        Marker R.Ankle.Med: tibia_r (0.00593114 -0.3843377 -0.03756387)
        Marker R.Heel: calcn_r (-0.0205417 0.0205417 0)
        Marker R.Midfoot.Sup: calcn_r (0.133521 0.03081254 -0.03081254)
        Marker R.Midfoot.Lat: calcn_r (0.1027085 0.0205417 0.04108339)
        Marker R.Toe.Lat: calcn_r (0.1951461 0 0.06676051)
        Marker R.Toe.Med: calcn_r (0.1951461 0.00513542 -0.04108339)
        Marker R.Toe.Tip: calcn_r (0.267042 0.00513542 0)
        Marker L.Thigh.Upper: femur_l (0.02065032 -0.229448 -0.07342336)
        Marker L.Thigh.Front: femur_l (0.0917792 -0.28681 -0.00539203)
        Marker L.Thigh.Rear: femur_l (0.0114724 -0.344172 -0.0688344)
        Marker L.Knee.Lat: femur_l (0 -0.463485 -0.057362)
        Marker L.Knee.Med: femur_l (0 -0.463485 0.057362)
        Marker L.Shank.Upper: tibia_l (0.00494262 -0.064254 -0.04942615)
        Marker L.Shank.Front: tibia_l (0.04942615 -0.07908184 0)
        Marker L.Shank.Rear: tibia_l (-0.01977046 -0.128508 -0.04942615)
        Marker L.Ankle.Lat: tibia_l (-0.00494262 -0.4052944 -0.05239172)
        Marker L.Ankle.Med: tibia_l (0.00593114 -0.3843377 0.03756387)
        Marker L.Heel: calcn_l (-0.0205417 0.0205417 0)
        Marker L.Midfoot.Sup: calcn_l (0.133521 0.03081254 0.03081254)
        Marker L.Midfoot.Lat: calcn_l (0.1027085 0.0205417 -0.04108339)
        Marker L.Toe.Lat: calcn_l (0.1951461 0 -0.06676051)
        Marker L.Toe.Med: calcn_l (0.1951461 0.00513542 0.04108339)
        Marker L.Toe.Tip: calcn_l (0.267042 0.00513542 0)
        Marker R.Bicep: humerus_r (0.0432852 -0.1623195 0)
        Marker R.Tricep: humerus_r (-0.0432852 -0.1623195 0)
        Marker R.Biceps.Lateral: humerus_r (0.0324639 -0.1623195 0.0216426)
        Marker R.Elbow: humerus_r (0.0163077 -0.3041543 0.04100191)
        Marker R.Elbow.Lateral: humerus_r (0.0163077 -0.3041543 0.04100191)
        Marker R.Elbow.Lat: humerus_r (0.0163077 -0.3041543 0.04100191)
        Marker R.Elbow.Medial: humerus_r (0.00424195 -0.3037431 -0.04540617)
        Marker R.Elbow.Med: humerus_r (0.00424195 -0.3037431 -0.04540617)
        Marker R.Forearm: ulna_r (0 -0.1612457 0)
        Marker R.Wrist.Lat: radius_r (-0.01645782 -0.2501674 -0.01976873)
        Marker R.Wrist.Med: radius_r (-0.00339691 -0.2398477 0.05361959)
        Marker R.Hand: hand_r (-0.02992584 -0.0498764 0)
        Marker L.Bicep: humerus_l (0.0432852 -0.1623195 0)
        Marker L.Tricep: humerus_l (-0.0432852 -0.1623195 0)
        Marker L.Biceps.Lateral: humerus_l (0.0324639 -0.1623195 -0.0216426)
        Marker L.Elbow: humerus_l (0.01481436 -0.30423 -0.04100191)
        Marker L.Elbow.Lateral: humerus_l (0.01481436 -0.30423 -0.04100191)
        Marker L.Elbow.Lat: humerus_l (0.01481436 -0.30423 -0.04100191)
        Marker L.Elbow.Medial: humerus_l (0.00573529 -0.3036024 0.05101161)
        Marker L.Elbow.Med: humerus_l (0.00573529 -0.3036024 0.05101161)
        Marker L.Forearm: ulna_l (0 -0.1612457 0)
        Marker L.Wrist.Lat: radius_l (-0.01645782 -0.2501674 0.01976873)
        Marker L.Wrist.Med: radius_l (-0.00339691 -0.2398477 -0.05361959)
        Marker L.Hand: hand_l (-0.02992584 -0.0498764 0)
