# OpenSim document version 20200
ForceSet:
  datafile: subject01_walk1_grf.mot
  PrescribedForce ExternalForce_1: body=calcn_r pointIsGlobal=true forceIsGlobal=true
    FunctionSet forceFunctions:
      NaturalCubicSpline #1: x=(0 0.0017 0.0033 0.005 0.0067 0.0083 0.01 0.0117 0.0133 0.015)
          y=(101.512 103.2044 104.8845 106.5399 108.1584 109.7278 111.2361 112.6717 114.0235 115.2811)
      NaturalCubicSpline #2: x=(0 0.0017 0.0033 0.005 0.0067 0.0083 0.01 0.0117 0.0133 0.015)
          y=(745.4661 743.0973 740.7135 738.2996 735.8402 733.3196 730.7219 728.0305 725.2286 722.2992)
      NaturalCubicSpline #3: x=(0 0.0017 0.0033 0.005 0.0067 0.0083 0.01 0.0117 0.0133 0.015)
          y=(-47.44871 -46.86967 -46.28801 -45.7013 -45.10743 -44.5048 -43.89243 -43.27004 -42.63818 -41.99815)
    FunctionSet pointFunctions:
      NaturalCubicSpline #4: x=(0 0.0017 0.0033 0.005 0.0067 0.0083 0.01 0.0117 0.0133 0.015)
          y=(0.3789828 0.3780951 0.3771974 0.3762851 0.3753538 0.374399 0.373416 0.3724006 0.3713484 0.3702554)
      NaturalCubicSpline #5: x=(0 0.0017 0.0033 0.005 0.0067 0.0083 0.01 0.0117 0.0133 0.015)
          y=(-0.0075 -0.0075 -0.0075 -0.0075 -0.0075 -0.0075 -0.0075 -0.0075 -0.0075 -0.0075)
      NaturalCubicSpline #6: x=(0 0.0017 0.0033 0.005 0.0067 0.0083 0.01 0.0117 0.0133 0.015)
          y=(0.1277465 0.1281014 0.1284551 0.1288046 0.1291466 0.1294783 0.1297971 0.1301005 0.1303867 0.1306539)
    FunctionSet torqueFunctions:
      NaturalCubicSpline #13: x=(0 0.0017 0.0033 0.005 0.0067 0.0083 0.01 0.0117 0.0133 0.015) y=(0 0 0 0 0 0 0 0 0 0)
      NaturalCubicSpline #14: x=(0 0.0017 0.0033 0.005 0.0067 0.0083 0.01 0.0117 0.0133 0.015)
          y=(13.53783 12.55074 11.57152 10.60988 9.674945 8.774881 7.916795 7.106505 6.348495 5.645878)
      NaturalCubicSpline #15: x=(0 0.0017 0.0033 0.005 0.0067 0.0083 0.01 0.0117 0.0133 0.015) y=(0 0 0 0 0 0 0 0 0 0)
  PrescribedForce ExternalForce_2: body=calcn_l pointIsGlobal=true forceIsGlobal=true
    FunctionSet forceFunctions:
      NaturalCubicSpline #7: x=(0 0.0017 0.0033 0.005 0.0067 0.0083 0.01 0.0117 0.0133 0.015)
          y=(17.26938 18.9138 20.50537 21.99211 23.32367 24.45219 25.33324 25.92667 26.19748 26.11679)
      NaturalCubicSpline #8: x=(0 0.0017 0.0033 0.005 0.0067 0.0083 0.01 0.0117 0.0133 0.015)
          y=(20.49185 28.77853 37.07206 45.37815 53.70014 62.0382 70.38866 78.74372 87.09152 95.41657)
      NaturalCubicSpline #9: x=(0 0.0017 0.0033 0.005 0.0067 0.0083 0.01 0.0117 0.0133 0.015)
          y=(-7.469301 -7.857527 -8.27208 -8.737692 -9.276108 -9.904722 -10.63559 -11.47468 -12.42152 -13.46923)
    FunctionSet pointFunctions:
      NaturalCubicSpline #10: x=(0 0.0017 0.0033 0.005 0.0067 0.0083 0.01 0.0117 0.0133 0.015)
          y=(0.8100966 0.8099035 0.8096828 0.8094349 0.8091605 0.8088601 0.8085341 0.8081832 0.8078078 0.8074085)
      NaturalCubicSpline #11: x=(0 0.0017 0.0033 0.005 0.0067 0.0083 0.01 0.0117 0.0133 0.015)
          y=(-0.0075 -0.0075 -0.0075 -0.0075 -0.0075 -0.0075 -0.0075 -0.0075 -0.0075 -0.0075)
      NaturalCubicSpline #12: x=(0 0.0017 0.0033 0.005 0.0067 0.0083 0.01 0.0117 0.0133 0.015)
          y=(-0.05354309 -0.05269428 -0.05191409 -0.05120007 -0.05054975 -0.04996068 -0.04943038 -0.04895641 -0.0485363 -0.04816759)
    FunctionSet torqueFunctions:
      NaturalCubicSpline #16: x=(0 0.0017 0.0033 0.005 0.0067 0.0083 0.01 0.0117 0.0133 0.015)
          y=(1.55504 1.31259 1.085612 0.876302 0.6866192 0.5181367 0.3719098 0.2483853 0.1473672 0.06801119)
      NaturalCubicSpline #17: x=(0 0.0017 0.0033 0.005 0.0067 0.0083 0.01 0.0117 0.0133 0.015)
          y=(-0.7574194 -0.6390173 -0.5205599 -0.4004905 -0.2770961 -0.1485653 -0.01302259 0.1313532 0.2863007 0.4533702)
      NaturalCubicSpline #18: x=(0 0.0017 0.0033 0.005 0.0067 0.0083 0.01 0.0117 0.0133 0.015)
          y=(6.880303 6.119822 5.374582 4.655784 3.973706 3.337257 2.753723 2.228478 1.764856 1.364156)
