# OpenSim document version 20200
AnalyzeTool subject01:
  model_file: subject01_simbody_adjusted.osim
  replace_force_set: false
  force_set_files: gait2392_SO_weak_Residual_Actuators.xml
  results_directory: ResultsStaticOptimization
  output_precision: 20
  initial_time: 0.5
  final_time: 2
  solve_for_equilibrium_for_auxiliary_states: false
  maximum_number_of_integrator_steps: 20000
  maximum_integrator_step_size: 1
  minimum_integrator_step_size: 0.00000001
  integrator_error_tolerance: 0.001
  coordinates_file: subject01_walk1_RRA_Kinematics_q.sto
  lowpass_cutoff_frequency_for_coordinates: -1
  external_loads_file: foot_floor_loads.xml
  external_loads_model_kinematics_file: subject01_walk1_RRA_Kinematics_q.sto
  lowpass_cutoff_frequency_for_load_kinematics: -1
  AnalysisSet Analyses:
    StaticOptimization: start_time=0.5 end_time=2 step_interval=10 in_degrees=true use_model_force_set=true
        activation_exponent=2 use_muscle_physiology=true
