# OpenSim document version 20300
AnalyzeTool subject01:
  replace_force_set: true
  force_set_files: gait2392_RRA_Actuators.xml
  results_directory: ResultsRRA
  output_precision: 20
  initial_time: 0.5
  final_time: 2
  solve_for_equilibrium_for_auxiliary_states: false
  maximum_number_of_integrator_steps: 20000
  maximum_integrator_step_size: 1
  minimum_integrator_step_size: 0.00000001
  integrator_error_tolerance: 0.001
  external_loads_file: subject01_walk1_grf.xml
  states_file: ResultsRRA/subject01_states.sto
  lowpass_cutoff_frequency_for_coordinates: -1
  AnalysisSet Analyses:
    JointReaction: start_time=0.5 end_time=2 step_interval=1 in_degrees=true joint_names=(hip_r knee_r knee_r)
        apply_on_bodies=(child child parent) express_in_frame=(ground child child)
