# OpenSim document version 10600
Model leg39:
  length_units: meters
  force_units: N
  credits:
    Delp S.L., Loan J.P., Hoy M.G., Zajac F.E., Topp E.L., Rosen J.M., Thelen D.G., Anderson F.C., Seth A., Reinbolt J.A.
  publications:
    Notes: 2D, 3 DOF leg model created by D.G. Thelen, Univ. of Wisconsin-Madison, and Jeff Reinbolt, Ajay Seth, Frank C. Anderson, and Scott L. Delp, Stanford University. Lower extremity joint defintions based on Delp et al. (1990). Planar knee model of Yamaguchi and Zajac (1989). Number of muscles was reduced by Reinbolt and Anderson to improve simulation speed for demonstrations and is not intended to be used in research.
    Delp, S.L., Loan, J.P., Hoy, M.G., Zajac, F.E., Topp E.L., Rosen, J.M.: An interactive graphics-based model of the lower extremity to study orthopaedic surgical procedures, IEEE Transactions on Biomedical Engineering, vol. 37, pp. 757-767, 1990.
    Yamaguchi G.T., Zajac F.E.: A planar model of the knee joint to characterize the knee extensor mechanism." J . Biomecl7. vol. 21. pp. 1-10. 1989.
    Anderson F.C., Pandy M.G.: A dynamic optimization solution for vertical jumping in three dimensions. Computer Methods in Biomechanics and Biomedical Engineering 2:201-231, 1999.
    Anderson F.C., Pandy M.G.: Dynamic optimization of human walking. Journal of Biomechanical Engineering 123:381-390, 2001.
  defaults: Thelen2003Muscle default: muscle_model=9 max_isometric_force=546 optimal_fiber_length=0.0535
      tendon_slack_length=0.078 pennation_angle=0 activation_time_constant=0.01 deactivation_time_constant=0.04 Vmax=10
      Vmax0=5 FmaxTendonStrain=0.033 FmaxMuscleStrain=0.6 KshapeActive=0.5 KshapePassive=4 damping=0.05 Af=0.3 Flen=1.8
  DynamicsEngine:
    SimbodyEngine default: gravity=(0 -9.80665 0)
      BodySet:
        Body ground: mass=0 mass_center=(0 0 0) inertia_xx=0 inertia_yy=0 inertia_zz=0
        Body pelvis: mass=10.75379 mass_center=(-0.07395121 0 0) inertia_xx=0.1027003 inertia_yy=0.08701554
            inertia_zz=0.05784385 meshes=(sacrum.vtp pelvis.vtp l_pelvis.vtp)
          CustomJoint ground_pelvis: parent_body=ground location_in_parent=(-0.02590204 -0.03189392 0) location=(0 0 0)
            Coordinate pelvis_tilt: default_value=0 initial_value=0 tolerance=0.00001 stiffness=0
                range=(-1.570796 1.570796) keys=q_key clamped=true locked=true restraint_active=false
            TransformAxis r1: coordinate=pelvis_tilt axis=(0 0 1)
        Body femur_r: mass=8.549266 mass_center=(0 -0.1995426 0) inertia_xx=0.1695643 inertia_yy=0.0444489
            inertia_zz=0.1788087 meshes=femur_r.vtp
          CustomJoint hip_r: parent_body=pelvis location_in_parent=(-0.07395121 -0.06913966 0.08733982)
              location=(0 0 0)
            Coordinate hip_angle_r: default_value=0 initial_value=0 tolerance=0.00001 stiffness=0
                range=(-2.094395 2.094395) keys=(h_key leftmouse_button) clamped=true restraint_active=false
            TransformAxis r1: coordinate=hip_angle_r axis=(0 0 1)
        Body tibia_r: mass=4.674042 mass_center=(0 -0.2098001 0) inertia_xx=0.08023514 inertia_yy=0.008119032
            inertia_zz=0.08134951 meshes=(tibia.vtp fibula.vtp)
          CustomJoint knee_r: parent_body=femur_r location_in_parent=(0 0 0) location=(0 0 0)
            Coordinate knee_angle_r: default_value=0 initial_value=0 tolerance=0.00001 stiffness=0
                range=(-2.094395 0.1745329) keys=k_key clamped=true restraint_active=false
            Coordinate tib_tx_r: default_value=0 initial_value=0 tolerance=0.00001 stiffness=0 range=(-5 5)
                clamped=false restraint_active=false
            Coordinate tib_ty_r: default_value=0 initial_value=0 tolerance=0.00001 stiffness=0 range=(-1 2)
                clamped=false restraint_active=false
            TransformAxis r1: coordinate=knee_angle_r axis=(0 0 1)
            TransformAxis tx: coordinate=tib_tx_r is_rotation=false axis=(1 0 0)
            TransformAxis ty: coordinate=tib_ty_r is_rotation=false axis=(0 1 0)
        Body patella_r: mass=0.09191376 mass_center=(0 0 0) inertia_xx=0.001102962 inertia_yy=0.001102962
            inertia_zz=0.001102962 meshes=pat.vtp
          CustomJoint tib_pat_r: parent_body=tibia_r location_in_parent=(0 0 0) location=(0 0 0)
            Coordinate pat_angle_r: default_value=-0.00116917 initial_value=-0.00116917 tolerance=0.00001 stiffness=0
                range=(-2.094 0.175) clamped=false restraint_active=false
            Coordinate pat_tx_r: default_value=0.0496 initial_value=0.0496 tolerance=0.00001 stiffness=0 range=(-5 5)
                clamped=false restraint_active=false
            Coordinate pat_ty_r: default_value=-0.0227 initial_value=-0.0227 tolerance=0.00001 stiffness=0 range=(-5 5)
                clamped=false restraint_active=false
            TransformAxis r1: coordinate=pat_angle_r axis=(0 0 1)
            TransformAxis tx: coordinate=pat_tx_r is_rotation=false axis=(1 0 0)
            TransformAxis ty: coordinate=pat_ty_r is_rotation=false axis=(0 1 0)
        Body talus_r: mass=0.1260686 mass_center=(0 0 0) inertia_xx=0.002021659 inertia_yy=0.002021659
            inertia_zz=0.002021659 meshes=talus.vtp
          CustomJoint ankle_r: parent_body=tibia_r location_in_parent=(0 -0.4832031 0) location=(0 0 0)
            Coordinate ankle_angle_r: default_value=0 initial_value=0 tolerance=0.00001 stiffness=0
                range=(-1.571 1.571) keys=a_key clamped=false restraint_active=false
            TransformAxis r1: coordinate=ankle_angle_r axis=(-0.105 -0.174 0.979)
        Body calcn_r: mass=1.072248 mass_center=(0.1026929 0.03080786 0) inertia_xx=0.00090462 inertia_yy=0.00361848
            inertia_zz=0.00361848 meshes=foot.vtp
          CustomJoint subtalar_r: parent_body=talus_r location_in_parent=(-0.06205078 -0.05318638 0.01013073)
              location=(0 0 0)
            Coordinate subtalar_angle_r: default_value=0 initial_value=0 tolerance=0.00001 stiffness=0
                range=(-1.571 1.571) keys=a_key clamped=true locked=true restraint_active=false
            TransformAxis r1: coordinate=subtalar_angle_r axis=(0.787 0.605 -0.121)
        Body toes_r: mass=0.1861423 mass_center=(0.03594251 0.006161573 -0.01848472) inertia_xx=0 inertia_yy=0
            inertia_zz=0.00090462 meshes=bofoot.vtp
          CustomJoint mtp_r: parent_body=calcn_r location_in_parent=(0.1838202 -0.002053858 0.001026924)
              location=(0 0 0)
            Coordinate mtp_angle_r: default_value=0 initial_value=0 tolerance=0.00001 stiffness=0 range=(-1.571 1.571)
                keys=t_key clamped=true locked=true restraint_active=false
            TransformAxis r1: coordinate=mtp_angle_r axis=(-0.581 0 0.814)
      ConstraintSet:
        CoordinateCouplerConstraint [values shared by the 5 below unless stated]: independent_coordinate_names=knee_angle_r
        CoordinateCouplerConstraint knee_tx_r: dependent_coordinate_name=tib_tx_r
          coupled_coordinates_function: natCubicSpline: x=(-2.094395 -1.745329 -1.396263 -1.047198 -0.6981317 -0.3490659 -0.1745329 0.1973442 0.337395 0.4901776 1.52146 2.094395)
              y=(-0.003756098 0.002101066 0.004824239 0.004812494 0.002488415 -0.00117378 -0.003638714 -0.006135344 -0.006379494 -0.006542654 -0.006379494 -0.006162345)
        CoordinateCouplerConstraint knee_ty_r: dependent_coordinate_name=tib_ty_r
          coupled_coordinates_function: natCubicSpline: x=(-2.094395 -1.22173 -0.5235988 -0.3490659 -0.1745329 0.1591486 2.094395)
              y=(-0.4960394 -0.479137 -0.4683382 -0.4666949 -0.4655211 -0.4639529 -0.4648168)
        CoordinateCouplerConstraint pat_tx_r: dependent_coordinate_name=pat_tx_r
          coupled_coordinates_function: natCubicSpline: x=(-2.094395 -1.396263 -1.047198 -0.6981317 -0.3490659 -0.1745329 0 0.00017453 0.00034907 0.08726646 2.094395)
              y=(0.0194405 0.0364088 0.04281405 0.04832031 0.05270285 0.05438844 0.05573692 0.05573692 0.05573692 0.05573692 0.05573692)
        CoordinateCouplerConstraint pat_ty_r: dependent_coordinate_name=pat_ty_r
          coupled_coordinates_function: natCubicSpline: x=(-2.094395 -1.570796 -1.396263 -1.047198 -0.6981317 -0.3490659 -0.1745329 0 0.00017453 0.00034907 0.08726646 2.094395)
              y=(-0.02460964 -0.0226993 -0.02247456 -0.02292406 -0.02371067 -0.02460964 -0.02505914 -0.02550863 -0.02550863 -0.02550863 -0.02550863 -0.02550863)
        CoordinateCouplerConstraint pat_angle_r: dependent_coordinate_name=pat_angle_r
          coupled_coordinates_function: natCubicSpline: x=(-2.094395 -1.999973 -1.457524 -0.5263913 0.02792527 0.1745329)
              y=(0.3080506 0.3080506 0.3063053 0.270177 -0.03700098 -0.2799508)
      MarkerSet:
        Marker R.ASIS: pelvis (0.002013637 -0.001509267 0.1297641)
        Marker L.ASIS: pelvis (0.002013637 -0.001509267 -0.1323762)
        Marker V.Sacral: pelvis (-0.196272 -0.001509879 0.0102176)
        Marker R.Thigh.Upper: femur_r (0.002461936 -0.2749985 0.0844135)
        Marker R.Thigh.Front: femur_r (0.06113162 -0.3343335 -0.0116532)
        Marker R.Thigh.Rear: femur_r (0.008308041 -0.3962305 0.07645618)
        Marker R.Shank.Upper: tibia_r (-0.03283881 -0.08876997 0.07178619)
        Marker R.Shank.Front: tibia_r (0.04004573 -0.1272284 0.01598314)
        Marker R.Shank.Rear: tibia_r (-0.01907349 -0.1746572 0.0813596)
        Marker R.Heel: calcn_r (-0.01538345 0.05764099 0.002800495)
        Marker R.Midfoot.Lat: calcn_r (0.1273542 0.03613896 0.06191929)
        Marker R.Toe.Tip: calcn_r (0.2730852 0.02168915 -0.01919809)
  ActuatorSet:
    Thelen2003Muscle [values shared by the 9 below unless stated]: muscle_model=9 activation_time_constant=0.01
        deactivation_time_constant=0.04 Vmax=10 Vmax0=5 FmaxTendonStrain=0.033 FmaxMuscleStrain=0.6 KshapeActive=0.5
        KshapePassive=4 damping=0.05 Af=0.3 Flen=1.8
    Thelen2003Muscle bifemlh_r: max_isometric_force=2594 optimal_fiber_length=0.1282385 tendon_slack_length=0.383539
        pennation_angle=0
      MusclePoint P1: pelvis (-0.1317524 -0.1072868 0.07263326)
      MusclePoint P2: tibia_r (-0.03382422 -0.04045422 0.03307132)
      MusclePoint P3: tibia_r (-0.02629524 -0.06326589 0.03854388)
    Thelen2003Muscle bifemsh_r: max_isometric_force=960 optimal_fiber_length=0.2008373 tendon_slack_length=0.1033209
        pennation_angle=0.4014257
      MusclePoint P1: femur_r (0.0058689 -0.2477849 0.02746645)
      MusclePoint P2: tibia_r (-0.03382422 -0.04045422 0.03307132)
      MusclePoint P3: tibia_r (-0.02629524 -0.06326589 0.03854388)
    Thelen2003Muscle glut_max2_r: max_isometric_force=1944 optimal_fiber_length=0.1629139 tendon_slack_length=0.1407488
        pennation_angle=0
      MusclePoint P1: pelvis (-0.1411035 0.01840936 0.05888901)
      MusclePoint P2: pelvis (-0.1439277 -0.05439127 0.09560311)
      MusclePoint P3: femur_r (-0.05000302 -0.06221034 0.03439175)
      MusclePoint P4: femur_r (-0.01831096 -0.119256 0.04918138)
    Thelen2003Muscle psoas_r: max_isometric_force=2342 optimal_fiber_length=0.1074282 tendon_slack_length=0.171885
        pennation_angle=0.1396263
      MusclePoint P1: pelvis (-0.06767528 0.09277894 0.030229)
      MusclePoint P2: pelvis (-0.02489446 -0.05962119 0.07939033)
      MuscleViaPoint P3: pelvis (-0.03012439 -0.08420186 0.08535245) range=(-1.570796 0.7853982) coordinate=hip_angle_r
      MusclePoint P4: femur_r (0.001878044 -0.05951064 0.004460362)
      MusclePoint P5: femur_r (-0.02206706 -0.07007466 0.01220732)
    Thelen2003Muscle rect_fem_r: max_isometric_force=1169 optimal_fiber_length=0.1328739 tendon_slack_length=0.3613238
        pennation_angle=0.08726646
      MusclePoint P1: pelvis (-0.03085658 -0.03253017 0.1012514)
      MuscleViaPoint P2: femur_r (0.03920425 -0.4730333 0.002230186) range=(-2.617994 -1.459968)
          coordinate=knee_angle_r
      MovingMusclePoint P3: tibia_r (0.0693987 0.02358034 0.001573217) x_coordinate=knee_angle_r
          y_coordinate=knee_angle_r z_coordinate=knee_angle_r
        XAttachment:
          natCubicSpline: min_x=-1000000000000000000000000000000 max_x=1000000000000000000000000000000
              min_y=-1000000000000000000000000000000 max_y=1000000000000000000000000000000
              min_z=-1000000000000000000000000000000 max_z=1000000000000000000000000000000
              x=(-2.094395 -1.999973 -1.570796 -1.457524 -1.396263 -1.047198 -0.6981317 -0.5263913 -0.3490659 -0.1745329 0 0.00017453 0.00034907 0.02792527 0.08726646 0.1745329 2.094395)
              y=(0.01750824 0.02022016 0.03091163 0.03332567 0.03456762 0.04109421 0.04742967 0.05066911 0.05437834 0.06004071 0.0693987 0.06940917 0.06941965 0.07114133 0.075283 0.08237317 0.06444365)
        YAttachment:
          natCubicSpline: min_x=-1000000000000000000000000000000 max_x=1000000000000000000000000000000
              min_y=-1000000000000000000000000000000 max_y=1000000000000000000000000000000
              min_z=-1000000000000000000000000000000 max_z=1000000000000000000000000000000
              x=(-2.094395 -1.999973 -1.570796 -1.457524 -1.396263 -1.047198 -0.6981317 -0.5263913 -0.3490659 -0.1745329 0 0.00017453 0.00034907 0.02792527 0.08726646 0.1745329 2.094395)
              y=(0.02630829 0.02670125 0.02822146 0.02840727 0.02844676 0.02800151 0.02723615 0.02679499 0.0263174 0.025581 0.02358034 0.02357743 0.02357451 0.02306167 0.02154794 0.01792958 -0.07571385)
        ZAttachment:
          natCubicSpline: min_x=-1000000000000000000000000000000 max_x=1000000000000000000000000000000
              min_y=-1000000000000000000000000000000 max_y=1000000000000000000000000000000
              min_z=-1000000000000000000000000000000 max_z=1000000000000000000000000000000 x=(-2.0944 0.1745)
              y=(0.001573217 0.001573217)
    Thelen2003Muscle vas_int_r: max_isometric_force=4530 optimal_fiber_length=0.1261733 tendon_slack_length=0.136786
        pennation_angle=0.05235988
      MusclePoint P1: femur_r (0.03403962 -0.2258353 0.03638718)
      MusclePoint P2: femur_r (0.03932163 -0.2446157 0.03345273)
      MuscleViaPoint P3: femur_r (0.04026065 -0.4730333 0.00645579) range=(-2.617994 -1.42) coordinate=knee_angle_r
      MovingMusclePoint P4: tibia_r (0.06232559 0.02842169 0.002022709) x_coordinate=knee_angle_r
          y_coordinate=knee_angle_r z_coordinate=knee_angle_r
        XAttachment:
          natCubicSpline: min_x=-1000000000000000000000000000000 max_x=1000000000000000000000000000000
              min_y=-1000000000000000000000000000000 max_y=1000000000000000000000000000000
              min_z=-1000000000000000000000000000000 max_z=1000000000000000000000000000000
              x=(-2.094395 -1.999973 -1.570796 -1.457524 -1.396263 -1.047198 -0.6981317 -0.5263913 -0.3490659 -0.1745329 0 0.00017453 0.00034907 0.02792527 0.08726646 0.1745329 2.094395)
              y=(0.009296944 0.01200886 0.02270399 0.02511867 0.02636072 0.03289322 0.03927035 0.04255675 0.04636153 0.0522856 0.06232559 0.06233709 0.06234861 0.06424544 0.06885306 0.07690442 0.07290945)
        YAttachment:
          natCubicSpline: min_x=-1000000000000000000000000000000 max_x=1000000000000000000000000000000
              min_y=-1000000000000000000000000000000 max_y=1000000000000000000000000000000
              min_z=-1000000000000000000000000000000 max_z=1000000000000000000000000000000
              x=(-2.094395 -1.999973 -1.570796 -1.457524 -1.396263 -1.047198 -0.6981317 -0.5263913 -0.3490659 -0.1745329 0 0.00017453 0.00034907 0.02792527 0.08726646 0.1745329 2.094395)
              y=(0.02876636 0.02915931 0.03069173 0.03087965 0.03091951 0.03049381 0.0298616 0.02956221 0.02935032 0.02923145 0.02842169 0.02842028 0.02841887 0.02815229 0.02721572 0.02452961 -0.07705468)
        ZAttachment:
          natCubicSpline: min_x=-1000000000000000000000000000000 max_x=1000000000000000000000000000000
              min_y=-1000000000000000000000000000000 max_y=1000000000000000000000000000000
              min_z=-1000000000000000000000000000000 max_z=1000000000000000000000000000000 x=(-2.0944 2.0944)
              y=(0.002022709 0.002022709)
    Thelen2003Muscle med_gas_r: max_isometric_force=2241 optimal_fiber_length=0.1031128 tendon_slack_length=0.4124513
        pennation_angle=0.296706
      MusclePoint P1: femur_r (-0.02230182 -0.4611781 -0.02758383)
      MuscleViaPoint P2: femur_r (-0.0352134 -0.4720943 -0.03028352) range=(-0.7853982 0.1745329)
          coordinate=knee_angle_r
      MusclePoint P3: calcn_r (0 0.03183479 -0.005442723)
    Thelen2003Muscle soleus_r: max_isometric_force=5137 optimal_fiber_length=0.092647 tendon_slack_length=0.2547793
        pennation_angle=0.4363323
      MusclePoint P1: tibia_r (-0.002696953 -0.1722675 0.007978467)
      MusclePoint P2: calcn_r (0 0.03183479 -0.005442723)
    Thelen2003Muscle tib_ant_r: max_isometric_force=1759 optimal_fiber_length=0.1100528 tendon_slack_length=0.2504262
        pennation_angle=0.08726646
      MusclePoint P1: tibia_r (0.02011473 -0.1824935 0.01292287)
      MusclePoint P2: tibia_r (0.03697066 -0.443985 -0.01988999)
      MusclePoint P3: calcn_r (0.1197399 0.01827933 -0.03132133)
