# OpenSim document version 10600
ControlSet Control Set:
  defaults: ControlLinear default: is_model_control=true extrapolate=true default_min=0.02 default_max=1
      filter_on=false use_steps=false kp=100 kv=20
  ControlLinear [values shared by the 9 below unless stated]: is_model_control=true extrapolate=true default_min=0
      default_max=1 filter_on=false use_steps=false kp=100 kv=20
  ControlLinear bifemlh_r.excitation:
    x_nodes:
      ControlLinearNode: t=0 value=0.04
      ControlLinearNode: t=0.1243813 value=0.04
      ControlLinearNode: t=0.2743205 value=0.04
      ControlLinearNode: t=0.4 value=0.04
  ControlLinear bifemsh_r.excitation:
    x_nodes:
      ControlLinearNode: t=0 value=0.04
      ControlLinearNode: t=0.1235294 value=0.04
      ControlLinearNode: t=0.279432 value=0.04
      ControlLinearNode: t=0.4 value=0.04
  ControlLinear glut_max2_r.excitation:
    x_nodes:
      ControlLinearNode: t=0 value=0
      ControlLinearNode: t=0.1243813 value=0
      ControlLinearNode: t=0.279432 value=0
      ControlLinearNode: t=0.4 value=0
  ControlLinear psoas_r.excitation:
    x_nodes:
      ControlLinearNode: t=0 value=0.04
      ControlLinearNode: t=0.1235294 value=0.04
      ControlLinearNode: t=0.2768763 value=0.04
      ControlLinearNode: t=0.4 value=0.04
  ControlLinear rect_fem_r.excitation:
    x_nodes:
      ControlLinearNode: t=0 value=0
      ControlLinearNode: t=0.1243813 value=0
      ControlLinearNode: t=0.2751724 value=0
      ControlLinearNode: t=0.4 value=0
  ControlLinear vas_int_r.excitation:
    x_nodes:
      ControlLinearNode: t=0 value=0
      ControlLinearNode: t=0.1269371 value=0
      ControlLinearNode: t=0.2734686 value=0
      ControlLinearNode: t=0.4 value=0
  ControlLinear med_gas_r.excitation:
    x_nodes:
      ControlLinearNode: t=0 value=0
      ControlLinearNode: t=0.1260852 value=0
      ControlLinearNode: t=0.2760243 value=0
      ControlLinearNode: t=0.4 value=0
  ControlLinear soleus_r.excitation:
    x_nodes:
      ControlLinearNode: t=0 value=0
      ControlLinearNode: t=0.1260852 value=0
      ControlLinearNode: t=0.2811359 value=0
      ControlLinearNode: t=0.4 value=0
  ControlLinear tib_ant_r.excitation:
    x_nodes:
      ControlLinearNode: t=0 value=0.04
      ControlLinearNode: t=0.1218256 value=0.04
      ControlLinearNode: t=0.2777282 value=0.04
      ControlLinearNode: t=0.4 value=0.04
