# OpenSim document version 20200
Model:
  length_units: meters
  force_units: N
  gravity: 0 -9.8065 0
  ForceSet:
    HuntCrossleyForce: transition_velocity=0.01
      ContactParametersSet:
        ContactParameters: geometry=(ball ground) stiffness=1000000 dissipation=0.001 static_friction=0
            dynamic_friction=0 viscous_friction=0
  BodySet:
    Body ground: mass=0 mass_center=(0 0 0) inertia_xx=1 inertia_yy=1 inertia_zz=1
    Body ball: mass=1 mass_center=(0 0 0) inertia_xx=1 inertia_yy=1 inertia_zz=1
      FreeJoint: parent_body=ground location_in_parent=(0 0 0) location=(0 0 0) use_euler_angles=true
        Coordinate free_q0: motion_type=rotational default_value=0 initial_value=0 range=(-999999.9 999999.9)
            clamped=false
        Coordinate free_q1: motion_type=rotational default_value=0 initial_value=0 range=(-999999.9 999999.9)
            clamped=false
        Coordinate free_q2: motion_type=rotational default_value=0 initial_value=0 range=(-999999.9 999999.9)
            clamped=false
        Coordinate free_q3: motion_type=translational default_value=0 initial_value=0 range=(-999999.9 999999.9)
            clamped=false
        Coordinate free_q4: motion_type=translational default_value=0 initial_value=0 range=(-999999.9 999999.9)
            clamped=false
        Coordinate free_q5: motion_type=translational default_value=0 initial_value=0 range=(-999999.9 999999.9)
            clamped=false
  ContactGeometrySet:
    ContactHalfSpace ground: body_name=ground location=(0 0 0) orientation=(0 0 -1.570796)
    ContactSphere ball: body_name=ball location=(0 0 0) radius=0.5
